// SBML level 2 version 1

model testid()
  // mTOR_pathway
  // This model consists of various sub-modules. They are as follows: 1) BDNF receptor signaling 2) AKT signaling 3) 4E-BP model 4) S6 Kinase model 5) CaMKIII model 6) Protein synthesis model 7) CaM 8) PKC 9) MAPK model.

  // Compartments:
  compartment default_compartment = 1e-18;
  compartment geometry = 1e-12;
  compartment geometry_sbo_1_sbc_ = 1e-12;
  compartment geometry_sbo_2_sbc_ = 1e-12;
  compartment geometry_sbo_3_sbc_ = 1e-12;
  compartment geometry_sbo_4_sbc_ = 1e-12;
  compartment geometry_sbo_5_sbc_ = 1e-12;
  compartment geometry_sbo_6_sbc_ = 1e-12;
  compartment geometry_sbo_7_sbc_ = 1e-12;
  compartment geometry_sbo_8_sbc_ = 1e-12;
  compartment geometry_sbo_9_sbc_ = 1e-12;
  compartment geometry_sbo_10_sbc_ = 1e-12;
  compartment geometry_sbo_11_sbc_ = 1e-12;
  compartment geometry_sbo_12_sbc_ = 1e-12;
  compartment geometry_sbo_13_sbc_ = 1e-12;
  compartment geometry_sbo_14_sbc_ = 1e-12;
  compartment geometry_sbo_15_sbc_ = 1e-12;
  compartment geometry_sbo_16_sbc_ = 1e-12;

  // Species:
  species PLC_g in geometry = 0.1;
  species PLC_g_star in geometry = 0;
  species PIP3 in geometry = 0;
  species PDK1 in geometry_sbo_2_sbc_ = 1;
  species PDK1_slash_S6K_phospho_slash_S6K_phospho_cplx in geometry_sbo_2_sbc_ = 0;
  species PP2A in geometry = 0.15;
  species PP2A_slash_dephos_clus_S6K_slash_dephos_clus_S6K_cplx in geometry = 0;
  species PP2A_slash_dephos_S6K_slash_dephos_S6K_cplx in geometry = 0;
  species PP2A_slash_dephosp_S6K_slash_dephosp_S6K_cplx in geometry = 0;
  species PP2A_slash_Dephos_AKTser473_slash_Dephos_AKTser473_cplx in geometry = 0;
  species PP2A_slash_Dephosph_AKTthr308_slash_Dephosph_AKTthr308_cplx in geometry = 0;
  species PP2A_slash_eEF2thr_minus_56_dephospho_slash_eEF2thr_minus_56_dephospho_cplx in geometry = 0;
  species PP2A_slash_PP2A_4E_minus_BP_star_star_slash_PP2A_4E_minus_BP_star_star_cplx in geometry = 0;
  species PP2A_slash_PP2A_4E_minus_BP_star_slash_PP2A_4E_minus_BP_star_cplx in geometry = 0;
  species PP2A_slash_PP2A_4E_minus_BP_slash_PP2A_4E_minus_BP_cplx in geometry = 0;
  species PP2A_slash_PP2A_4EBP_slash_PP2A_4EBP_cplx in geometry = 0;
  species AKT_mod_slash_PIP3_AKT in geometry = 0;
  species AKT_mod_slash_PIP3_PDK1 in geometry = 0;
  species AKT_mod_slash_PIP3_PDK1_slash_phospho_thr308_slash_phospho_thr308_cplx in geometry = 0;
  species AKT_mod_slash_PIP3_PDK2 in geometry = 0.003;
  species AKT_mod_slash_PIP3_PDK2_slash_phosp_AKTser473_slash_phosp_AKTser473_cplx in geometry = 0;
  species AKT_mod_slash_PIP3_AKT_thr308 in geometry = 0;
  species AKT_mod_slash_PIP3_AKT_minus_t308_s473 in geometry = 0;
  species AKT_mod_slash_PIP3_AKT_minus_t308_s473_slash_TSC2_phospho_slash_TSC2_phospho_cplx in geometry = 0;
  species AKT_mod_slash_AKT in geometry = 0.2000067;
  species AKT_mod_slash_TSC1_minus_TSC2_star in geometry = 0;
  species TrKB_mod_slash_TrKB in geometry = 0.25;
  species TrKB_mod_slash_BDNF_TrkB2_clx in geometry = 0;
  species TrKB_mod_slash_BDNF_TrkB_clx in geometry = 0;
  species TrKB_mod_slash_BDNF_TrkB2_star_clx in geometry = 0;
  species TrKB_mod_slash_BDNF_TrkB2_star_clx_slash_PLC_g_phospho_slash_PLC_g_phospho_cplx in geometry = 0;
  species TrKB_mod_slash_BDNF_TrkB2_star_clx_slash_Shc_phospho_slash_Shc_phospho_cplx in geometry = 0;
  species TrKB_mod_slash_Shc_star_Grb2_minus_Gab1_PI3K_clx in geometry = 0;
  species TrKB_mod_slash_Shc_star_Grb2_minus_Gab1_PI3K_clx_slash_Phospho_slash_Phospho_cplx in geometry = 0;
  species PI3K_mod_slash_PI3K in geometry = 0.1;
  species PI3K_mod_slash_PI3K_basal in geometry = 0;
  species PI3K_mod_slash_PI3K_basal_slash_basal_phosp_slash_basal_phosp_cplx in geometry = 0;
  species PI3K_mod_slash_Shc in geometry = 0.5;
  species PI3K_mod_slash_Shc_star_Grb2_clx in geometry_sbo_2_sbc_ = 0;
  species PI3K_mod_slash_Gab1 in geometry_sbo_1_sbc_ = 0.7;
  species PI3K_mod_slash_Shc_star_Grb2_minus_Gab1_clx in geometry = 0;
  species PLCg_basal in geometry_sbo_4_sbc_ = 0.0007;
  species PLCg_basal_slash_PLC_g_phospho_slash_PLC_g_phospho_cplx in geometry_sbo_4_sbc_ = 0;
  species TSC1_minus_TSC2 in geometry = 1;
  species TSC1_minus_TSC2_slash_TSC2phospho_slash_TSC2phospho_cplx in geometry = 0;
  species eIF4E in geometry = 0;
  species Rheb_minus_GTP in geometry = 1;
  species Rheb_minus_GDP in geometry_sbo_6_sbc_ = 0;
  species mTOR_model_slash_TOR_minus_clx in geometry = 0.6;
  species TOR_Rheb_minus_GTP_clx in geometry = 0;
  species TOR_Rheb_minus_GTP_clx_slash_S6K_phospho_slash_S6K_phospho_cplx in geometry = 0;
  species TOR_Rheb_minus_GTP_clx_slash_TOR_4E_minus_BP_phospho_slash_TOR_4E_minus_BP_phospho_cplx in geometry = 0;
  species TOR_Rheb_minus_GTP_clx_slash_TOR_4E_minus_BP_star_slash_TOR_4E_minus_BP_star_cplx in geometry = 0;
  species S6Kinase_slash_S6K_star in geometry = 0;
  species S6Kinase_slash_S6K in geometry = 1.25;
  species S6Kinase_slash_S6K_thr_minus_412 in geometry = 0;
  species S6Kinase_slash_S6K_thr_minus_412_slash_S6_phos_slash_S6_phos_cplx in geometry = 0;
  species num_4E_minus_BP_mod_slash_4E_minus_BP in geometry = 0;
  species num_4E_minus_BP_mod_slash_4E_minus_BP_thr37_46_s65 in geometry = 0;
  species num_4E_minus_BP_mod_slash_eIF4E_minus_BP in geometry = 0.2;
  species num_4E_minus_BP_mod_slash_eIF4E_minus_BP_thr37_46 in geometry = 0;
  species num_4E_minus_BP_mod_slash_eIF4E_4E_minus_BP_t37_46_s65 in geometry = 0;
  species num_40S in geometry = 0;
  species eIF4G_minus_A_clx in geometry = 0;
  species eIF4A in geometry = 0.2000033;
  species eIF4G in geometry = 0.04000067;
  species eIF4F in geometry = 0;
  species mRNA in geometry = 0.07999967;
  species PPhosphatase2A_slash_craf_star_star_minus_deph_slash_craf_star_star_minus_deph_cplx in geometry = 0;
  species eIF4F_minus_mRNA_clx in geometry = 0;
  species num_43S_complex_slash_Q_dot_R in geometry = 0;
  species num_43S_complex_slash_RM in geometry = 0;
  species num_43S_complex_slash_Quaternary_clx in geometry = 0.047;
  species S6K_thr_minus_252 in geometry = 0;
  species S6K_thr_minus_252_slash_camkIII_phospho_slash_camkIII_phospho_cplx in geometry = 0;
  species S6K_thr_minus_252_slash_S6_phospho_slash_S6_phospho_cplx in geometry = 0;
  species CaM_minus_Ca4 in geometry = 0;
  species CaMKIII in geometry = 0.06;
  species CaMKIII_CaM_minus_Ca4 in geometry = 0;
  species CaMKIII_CaM_minus_Ca4_slash_phospho_slash_phospho_cplx in geometry = 0;
  species eEF2 in geometry = 0.5;
  species eEFthr_minus_56 in geometry = 0;
  species CaM_slash_CaM in geometry = 20;
  species CaM_slash_CaM_minus_Ca3 in geometry = 0;
  species CaM_slash_CaM_minus_Ca2 in geometry = 0;
  species CaM_slash_CaM_minus_Ca in geometry = 0;
  species Ca in geometry = 0.08;
  species CaMKIII_basal in geometry = 1e-5;
  species CaMKIII_basal_slash_eEF2thr56_basal_slash_eEF2thr56_basal_cplx in geometry = 0;
  species CaMKIII_star in geometry = 0;
  species S6K_basal in geometry = 0.001;
  species S6K_basal_slash_CaMKIII_basal_slash_CaMKIII_basal_cplx in geometry = 0;
  species Translation_clx in geometry = 0;
  species Translation_clx_slash_pro_syn_slash_pro_syn_cplx in geometry = 0;
  species Translation_clx_slash_rad_pro_syn_slash_rad_pro_syn_cplx in geometry = 0;
  species peptide in geometry = 0;
  species degraded_protein in geometry = 0;
  species protein in geometry = 0;
  species num_80S_ribos_clx in geometry = 0;
  species Grb2 in geometry = 1;
  species Shc_star in geometry = 0;
  species MAPK_star in geometry = 0;
  species MAPK_star_slash_cluster_phospho_S6K_slash_cluster_phospho_S6K_cplx in geometry = 0;
  species MAPK_star_slash_MAPK_star_minus_feedback_slash_MAPK_star_minus_feedback_cplx in geometry = 0;
  species MAPK_star_slash_phosph_Sos_slash_phosph_Sos_cplx in geometry = 0;
  species MAPK_star_slash_MAPK_4E_minus_BP_star_star_slash_MAPK_4E_minus_BP_star_star_cplx in geometry = 0;
  species MAPK_star_slash_MAPK_4E_minus_BP_phospho_slash_MAPK_4E_minus_BP_phospho_cplx in geometry = 0;
  species PKC_minus_active_slash_PKC_minus_act_minus_raf_slash_PKC_minus_act_minus_raf_cplx in geometry = 0;
  species PKC_minus_active_slash_PKC_minus_inact_minus_GAP_slash_PKC_minus_inact_minus_GAP_cplx in geometry = 0;
  species PKC_minus_active_slash_PKC_minus_act_minus_GEF_slash_PKC_minus_act_minus_GEF_cplx in geometry = 0;
  species MAPK_slash_craf_minus_1 in geometry = 0.5;
  species MAPK_slash_craf_minus_1_star in geometry = 0;
  species MAPK_slash_MAPKK in geometry = 0.5;
  species MAPK_slash_MAPK in geometry = 3.6;
  species MAPK_slash_craf_minus_1_star_star in geometry = 0;
  species MAPK_slash_MAPK_minus_tyr in geometry = 0;
  species MAPK_slash_MAPKK_star in geometry = 0;
  species MAPK_slash_MAPKK_star_slash_MAPKKtyr_slash_MAPKKtyr_cplx in geometry = 0;
  species MAPK_slash_MAPKK_star_slash_MAPKKthr_slash_MAPKKthr_cplx in geometry = 0;
  species MAPK_slash_MAPKK_minus_ser in geometry = 0;
  species MAPK_slash_Raf_star_minus_GTP_minus_Ras in geometry = 0;
  species MAPK_slash_Raf_star_minus_GTP_minus_Ras_slash_Raf_star_minus_GTP_minus_Ras_dot_1_slash_Raf_star_minus_GTP_minus_Ras_dot_1_cplx in geometry = 0;
  species MAPK_slash_Raf_star_minus_GTP_minus_Ras_slash_Raf_star_minus_GTP_minus_Ras_dot_2_slash_Raf_star_minus_GTP_minus_Ras_dot_2_cplx in geometry = 0;
  species MKP_minus_1 in geometry = 0.02;
  species MKP_minus_1_slash_MKP1_minus_tyr_minus_deph_slash_MKP1_minus_tyr_minus_deph_cplx in geometry = 0;
  species MKP_minus_1_slash_MKP1_minus_thr_minus_deph_slash_MKP1_minus_thr_minus_deph_cplx in geometry = 0;
  species PPhosphatase2A in geometry = 1;
  species PPhosphatase2A_slash_craf_minus_deph_slash_craf_minus_deph_cplx in geometry = 0;
  species PPhosphatase2A_slash_MAPKK_minus_deph_slash_MAPKK_minus_deph_cplx in geometry = 0;
  species PPhosphatase2A_slash_MAPKK_minus_deph_minus_ser_slash_MAPKK_minus_deph_minus_ser_cplx in geometry = 0;
  species Ras_slash_inact_minus_GEF in geometry = 0.1;
  species Ras_slash_inact_minus_GEF_slash_basal_GEF_activity_slash_basal_GEF_activity_cplx in geometry = 0;
  species Ras_slash_GEF_star in geometry = 0;
  species Ras_slash_GEF_star_slash_GEF_star_minus_act_minus_ras_slash_GEF_star_minus_act_minus_ras_cplx in geometry = 0;
  species Ras_slash_GTP_minus_Ras in geometry = 0;
  species Ras_slash_GDP_minus_Ras in geometry = 0.5;
  species Ras_slash_GAP_star in geometry = 0;
  species Ras_slash_GAP in geometry = 0.01;
  species Ras_slash_GAP_slash_GAP_minus_inact_minus_ras_slash_GAP_minus_inact_minus_ras_cplx in geometry = 0;
  species Ras_slash_CaM_minus_GEF in geometry = 0;
  species Ras_slash_CaM_minus_GEF_slash_CaM_minus_GEF_minus_act_minus_ras_slash_CaM_minus_GEF_minus_act_minus_ras_cplx in geometry = 0;
  species Shc_star_dot_Sos_dot_Grb2 in geometry = 0;
  species Shc_star_dot_Sos_dot_Grb2_slash_Sos_dot_Ras_GEF_slash_Sos_dot_Ras_GEF_cplx in geometry = 0;
  species Sos_slash_Sos_star_dot_Grb2 in geometry = 0;
  species Sos_slash_Sos_dot_Grb2 in geometry = 0;
  species Sos_slash_Sos_star in geometry = 0;
  species Sos_slash_Sos in geometry = 0.1;
  species num_43Scomplex in geometry = 0;
  species PKC_slash_PKC_minus_Ca in geometry = 3.720833e-17;
  species PKC_slash_PKC_minus_DAG_minus_AA_star in geometry = 4.913667e-18;
  species PKC_slash_PKC_minus_Ca_minus_AA_star in geometry = 1.75e-16;
  species PKC_slash_PKC_minus_Ca_minus_memb_star in geometry = 1.3896e-17;
  species PKC_slash_PKC_minus_DAG_minus_memb_star in geometry = 9.435167e-21;
  species PKC_slash_PKC_minus_basal_star in geometry = 0.02;
  species PKC_slash_PKC_minus_AA_star in geometry = 1.813333e-17;
  species PKC_slash_PKC_minus_Ca_minus_DAG in geometry = 8.463167e-23;
  species PKC_slash_PKC_minus_DAG in geometry = 1.161017e-16;
  species PKC_slash_PKC_minus_DAG_minus_AA in geometry = 2.518833e-19;
  species PKC_slash_PKC_minus_cytosolic in geometry = 1;
  species Basal_Translation in geometry_sbo_10_sbc_ = 0.0002;
  species Basal_Translation_slash_basal_syn_slash_basal_syn_cplx in geometry_sbo_10_sbc_ = 0;
  species Basal_Translation_slash_rad_basal_syn_slash_rad_basal_syn_cplx in geometry_sbo_10_sbc_ = 0;
  species rad_AA in geometry_sbo_13_sbc_ = 0;
  species rad_peptide in geometry_sbo_13_sbc_ = 0;
  species rad_protein in geometry_sbo_13_sbc_ = 0;
  species rad_deg_pro in geometry_sbo_13_sbc_ = 0;
  species num_40S_basal in geometry_sbo_14_sbc_ = 0.0001;
  species num_40S_basal_slash_basal_slash_basal_cplx in geometry_sbo_14_sbc_ = 0;
  species num_4E_minus_BP_t37_46 in geometry_sbo_11_sbc_ = 0;
  species PTEN in geometry_sbo_15_sbc_ = 0.27;
  species PTEN_slash_PIP3_dephosp_slash_PIP3_dephosp_cplx in geometry_sbo_15_sbc_ = 0;
  species Ras_minus_GTP_PI3K in geometry_sbo_16_sbc_ = 0;
  species Ras_minus_GTP_PI3K_slash_PIP2_phospho_Ras_minus_GTP_slash_PIP2_phospho_Ras_minus_GTP_cplx in geometry_sbo_16_sbc_ = 0;
  species $BDNF in geometry = 5e-5;
  species $TrKB_mod_slash_Int_BDNF_TrKB2_star_clx in geometry = 0.25;
  species $PI3K_mod_slash_PIP2 in geometry = 7;
  // Inactivated form of S6K
  species $S6Kinase_slash_40S_inact in geometry = 0.02;
  species $num_60S_R in geometry = 0.068;
  species $AA in geometry = 0.1;
  // The conc of this has been a problem. Schaecter and Benowitz use 50 uM, but Shinomura et al have < 5. So I have altered the DAG-dependent rates in the PKC model to reflect this.
  species $DAG in geometry = 11;
  species $Arachidonic_Acid in geometry = 5;
  species PKC_minus_active in geometry;

  // Assignment rules:
  PKC_minus_active := PKC_slash_PKC_minus_DAG_minus_AA_star + PKC_slash_PKC_minus_Ca_minus_memb_star + PKC_slash_PKC_minus_Ca_minus_AA_star + PKC_slash_PKC_minus_DAG_minus_memb_star + PKC_slash_PKC_minus_basal_star + PKC_slash_PKC_minus_AA_star;

  // Reactions:
  // kf*AKT_mod_slash_AKT*PIP3-kb*AKT_mod_slash_PIP3_AKT
  AKT_mod_slash_PIP3_bind_AKT: AKT_mod_slash_AKT + PIP3 -> AKT_mod_slash_PIP3_AKT; AKT_mod_slash_PIP3_bind_AKT_kf*AKT_mod_slash_AKT*PIP3 - AKT_mod_slash_PIP3_bind_AKT_kb*AKT_mod_slash_PIP3_AKT;
    AKT_mod_slash_PIP3_bind_AKT_kf = 4.49988e-11 vol_uMINVsecINV; AKT_mod_slash_PIP3_bind_AKT_kb = 8.899703e-14 vol_secINV;
  // kf*PDK1*PIP3-kb*AKT_mod_slash_PIP3_PDK1
  AKT_mod_slash_PIP3_bind_PDK1: PDK1 + PIP3 -> AKT_mod_slash_PIP3_PDK1; AKT_mod_slash_PIP3_bind_PDK1_kf*PDK1*PIP3 - AKT_mod_slash_PIP3_bind_PDK1_kb*AKT_mod_slash_PIP3_PDK1;
    AKT_mod_slash_PIP3_bind_PDK1_kf = 6.99996666e-13 vol_uMINVsecINV; AKT_mod_slash_PIP3_bind_PDK1_kb = 9.8e-13 vol_secINV;
  // kf*AKT_mod_slash_TSC1_minus_TSC2_star-kb*TSC1_minus_TSC2
  AKT_mod_slash_TSC1_minus_2_dephospho: AKT_mod_slash_TSC1_minus_TSC2_star -> TSC1_minus_TSC2; AKT_mod_slash_TSC1_minus_2_dephospho_kf*AKT_mod_slash_TSC1_minus_TSC2_star - AKT_mod_slash_TSC1_minus_2_dephospho_kb*TSC1_minus_TSC2;
    AKT_mod_slash_TSC1_minus_2_dephospho_kf = 1e-14 vol_secINV; AKT_mod_slash_TSC1_minus_2_dephospho_kb = 0 vol_secINV;
  // kf*TrKB_mod_slash_BDNF_TrkB2_clx-kb*TrKB_mod_slash_BDNF_TrkB2_star_clx
  TrKB_mod_slash_Autophos_TrKB: TrKB_mod_slash_BDNF_TrkB2_clx -> TrKB_mod_slash_BDNF_TrkB2_star_clx; TrKB_mod_slash_Autophos_TrKB_kf*TrKB_mod_slash_BDNF_TrkB2_clx - TrKB_mod_slash_Autophos_TrKB_kb*TrKB_mod_slash_BDNF_TrkB2_star_clx;
    TrKB_mod_slash_Autophos_TrKB_kf = 1.999933e-14 vol_secINV; TrKB_mod_slash_Autophos_TrKB_kb = 0 vol_secINV;
  // kf*TrKB_mod_slash_BDNF_TrkB_clx*TrKB_mod_slash_TrKB-kb*TrKB_mod_slash_BDNF_TrkB2_clx
  TrKB_mod_slash_Dimeriz_TrKB: TrKB_mod_slash_BDNF_TrkB_clx + TrKB_mod_slash_TrKB -> TrKB_mod_slash_BDNF_TrkB2_clx; TrKB_mod_slash_Dimeriz_TrKB_kf*TrKB_mod_slash_BDNF_TrkB_clx*TrKB_mod_slash_TrKB - TrKB_mod_slash_Dimeriz_TrKB_kb*TrKB_mod_slash_BDNF_TrkB2_clx;
    TrKB_mod_slash_Dimeriz_TrKB_kf = 9.998867e-13 vol_uMINVsecINV; TrKB_mod_slash_Dimeriz_TrKB_kb = 1.999933e-14 vol_secINV;
  // kf*TrKB_mod_slash_TrKB*BDNF-kb*TrKB_mod_slash_BDNF_TrkB_clx
  TrKB_mod_slash_Ligand_binding: TrKB_mod_slash_TrKB + $BDNF -> TrKB_mod_slash_BDNF_TrkB_clx; TrKB_mod_slash_Ligand_binding_kf*TrKB_mod_slash_TrKB*BDNF - TrKB_mod_slash_Ligand_binding_kb*TrKB_mod_slash_BDNF_TrkB_clx;
    TrKB_mod_slash_Ligand_binding_kf = 9.9998e-13 vol_uMINVsecINV; TrKB_mod_slash_Ligand_binding_kb = 4.999667e-14 vol_secINV;
  // kf*PLC_g_star-kb*PLC_g
  TrKB_mod_slash_PLC_g_star_dephospho: PLC_g_star -> PLC_g; TrKB_mod_slash_PLC_g_star_dephospho_kf*PLC_g_star - TrKB_mod_slash_PLC_g_star_dephospho_kb*PLC_g;
    TrKB_mod_slash_PLC_g_star_dephospho_kf = 7e-14 vol_secINV; TrKB_mod_slash_PLC_g_star_dephospho_kb = 0 vol_secINV;
  // kf*mRNA*eIF4F-kb*eIF4F_minus_mRNA_clx
  eIF4F_mRNA_clx: mRNA + eIF4F -> eIF4F_minus_mRNA_clx; eIF4F_mRNA_clx_kf*mRNA*eIF4F - eIF4F_mRNA_clx_kb*eIF4F_minus_mRNA_clx;
    eIF4F_mRNA_clx_kf = 1.999973e-13 vol_uMINVsecINV; eIF4F_mRNA_clx_kb = 7.7e-14 vol_secINV;
  // kf*TrKB_mod_slash_BDNF_TrkB2_star_clx-kb*TrKB_mod_slash_Int_BDNF_TrKB2_star_clx^2
  TrKB_mod_slash_LR_Internalize: TrKB_mod_slash_BDNF_TrkB2_star_clx -> 2 $TrKB_mod_slash_Int_BDNF_TrKB2_star_clx; TrKB_mod_slash_LR_Internalize_kf*TrKB_mod_slash_BDNF_TrkB2_star_clx - TrKB_mod_slash_LR_Internalize_kb*TrKB_mod_slash_Int_BDNF_TrKB2_star_clx^2;
    TrKB_mod_slash_LR_Internalize_kf = 9.999667e-15 vol_secINV; TrKB_mod_slash_LR_Internalize_kb = 0 vol_uMINVsecINV;
  // kf*TrKB_mod_slash_Int_BDNF_TrKB2_star_clx-kb*TrKB_mod_slash_TrKB
  TrKB_mod_slash_LR_cycling: $TrKB_mod_slash_Int_BDNF_TrKB2_star_clx -> TrKB_mod_slash_TrKB; TrKB_mod_slash_LR_cycling_kf*TrKB_mod_slash_Int_BDNF_TrKB2_star_clx - TrKB_mod_slash_LR_cycling_kb*TrKB_mod_slash_TrKB;
    TrKB_mod_slash_LR_cycling_kf = 1e-15 vol_secINV; TrKB_mod_slash_LR_cycling_kb = 9.999333e-16 vol_secINV;
  // kf*Shc_star-kb*PI3K_mod_slash_Shc
  PI3K_mod_slash_Shc_star_dephospho: Shc_star -> PI3K_mod_slash_Shc; PI3K_mod_slash_Shc_star_dephospho_kf*Shc_star - PI3K_mod_slash_Shc_star_dephospho_kb*PI3K_mod_slash_Shc;
    PI3K_mod_slash_Shc_star_dephospho_kf = 2e-13 vol_secINV; PI3K_mod_slash_Shc_star_dephospho_kb = 0 vol_secINV;
  // kf*Grb2*Shc_star-kb*PI3K_mod_slash_Shc_star_Grb2_clx
  PI3K_mod_slash_Grb2_bind_Shc: Grb2 + Shc_star -> PI3K_mod_slash_Shc_star_Grb2_clx; PI3K_mod_slash_Grb2_bind_Shc_kf*Grb2*Shc_star - PI3K_mod_slash_Grb2_bind_Shc_kb*PI3K_mod_slash_Shc_star_Grb2_clx;
    PI3K_mod_slash_Grb2_bind_Shc_kf = 1.00002e-12 vol_uMINVsecINV; PI3K_mod_slash_Grb2_bind_Shc_kb = 1e-12 vol_secINV;
  // kf*PI3K_mod_slash_Gab1*PI3K_mod_slash_Shc_star_Grb2_clx-kb*PI3K_mod_slash_Shc_star_Grb2_minus_Gab1_clx
  PI3K_mod_slash_bind_Gab1: PI3K_mod_slash_Gab1 + PI3K_mod_slash_Shc_star_Grb2_clx -> PI3K_mod_slash_Shc_star_Grb2_minus_Gab1_clx; PI3K_mod_slash_bind_Gab1_kf*PI3K_mod_slash_Gab1*PI3K_mod_slash_Shc_star_Grb2_clx - PI3K_mod_slash_bind_Gab1_kb*PI3K_mod_slash_Shc_star_Grb2_minus_Gab1_clx;
    PI3K_mod_slash_bind_Gab1_kf = 3e-13 vol_uMINVsecINV; PI3K_mod_slash_bind_Gab1_kb = 1e-12 vol_secINV;
  // kf*PI3K_mod_slash_PI3K*PI3K_mod_slash_Shc_star_Grb2_minus_Gab1_clx-kb*TrKB_mod_slash_Shc_star_Grb2_minus_Gab1_PI3K_clx
  PI3K_mod_slash_PI3K_act: PI3K_mod_slash_PI3K + PI3K_mod_slash_Shc_star_Grb2_minus_Gab1_clx -> TrKB_mod_slash_Shc_star_Grb2_minus_Gab1_PI3K_clx; PI3K_mod_slash_PI3K_act_kf*PI3K_mod_slash_PI3K*PI3K_mod_slash_Shc_star_Grb2_minus_Gab1_clx - PI3K_mod_slash_PI3K_act_kb*TrKB_mod_slash_Shc_star_Grb2_minus_Gab1_PI3K_clx;
    PI3K_mod_slash_PI3K_act_kf = 4.999993e-12 vol_uMINVsecINV; PI3K_mod_slash_PI3K_act_kb = 7.999733e-14 vol_secINV;
  // kf*PI3K_mod_slash_PI3K-kb*PI3K_mod_slash_PI3K_basal
  PI3K_mod_slash_basal_PI3K_act: PI3K_mod_slash_PI3K -> PI3K_mod_slash_PI3K_basal; PI3K_mod_slash_basal_PI3K_act_kf*PI3K_mod_slash_PI3K - PI3K_mod_slash_basal_PI3K_act_kb*PI3K_mod_slash_PI3K_basal;
    PI3K_mod_slash_basal_PI3K_act_kf = 6.799773e-16 vol_secINV; PI3K_mod_slash_basal_PI3K_act_kb = 4.5e-13 vol_secINV;
  // kf*Rheb_minus_GTP*mTOR_model_slash_TOR_minus_clx-kb*TOR_Rheb_minus_GTP_clx
  mTOR_model_slash_Rheb_minus_GTP_bind_TORclx: Rheb_minus_GTP + mTOR_model_slash_TOR_minus_clx -> TOR_Rheb_minus_GTP_clx; mTOR_model_slash_Rheb_minus_GTP_bind_TORclx_kf*Rheb_minus_GTP*mTOR_model_slash_TOR_minus_clx - mTOR_model_slash_Rheb_minus_GTP_bind_TORclx_kb*TOR_Rheb_minus_GTP_clx;
    mTOR_model_slash_Rheb_minus_GTP_bind_TORclx_kf = 6e-12 vol_uMINVsecINV; mTOR_model_slash_Rheb_minus_GTP_bind_TORclx_kb = 3e-12 vol_secINV;
  // kf*num_40S-kb*S6Kinase_slash_40S_inact
  S6Kinase_slash_S6_dephosph: num_40S -> $S6Kinase_slash_40S_inact; S6Kinase_slash_S6_dephosph_kf*num_40S - S6Kinase_slash_S6_dephosph_kb*S6Kinase_slash_40S_inact;
    S6Kinase_slash_S6_dephosph_kf = 1e-14 vol_secINV; S6Kinase_slash_S6_dephosph_kb = 0 vol_secINV;
  // kf*num_4E_minus_BP_mod_slash_4E_minus_BP*eIF4E-kb*num_4E_minus_BP_mod_slash_eIF4E_minus_BP
  num_4E_minus_BP_mod_slash_eIF4E_bind_BP2: num_4E_minus_BP_mod_slash_4E_minus_BP + eIF4E -> num_4E_minus_BP_mod_slash_eIF4E_minus_BP; num_4E_minus_BP_mod_slash_eIF4E_bind_BP2_kf*num_4E_minus_BP_mod_slash_4E_minus_BP*eIF4E - num_4E_minus_BP_mod_slash_eIF4E_bind_BP2_kb*num_4E_minus_BP_mod_slash_eIF4E_minus_BP;
    num_4E_minus_BP_mod_slash_eIF4E_bind_BP2_kf = 4.999897e-11 vol_uMINVsecINV; num_4E_minus_BP_mod_slash_eIF4E_bind_BP2_kb = 1.5e-13 vol_secINV;
  // kf*num_4E_minus_BP_mod_slash_eIF4E_4E_minus_BP_t37_46_s65-kb*eIF4E*num_4E_minus_BP_mod_slash_4E_minus_BP_thr37_46_s65
  num_4E_minus_BP_mod_slash_eIF4E_minus_BP2_disso: num_4E_minus_BP_mod_slash_eIF4E_4E_minus_BP_t37_46_s65 -> eIF4E + num_4E_minus_BP_mod_slash_4E_minus_BP_thr37_46_s65; num_4E_minus_BP_mod_slash_eIF4E_minus_BP2_disso_kf*num_4E_minus_BP_mod_slash_eIF4E_4E_minus_BP_t37_46_s65 - num_4E_minus_BP_mod_slash_eIF4E_minus_BP2_disso_kb*eIF4E*num_4E_minus_BP_mod_slash_4E_minus_BP_thr37_46_s65;
    num_4E_minus_BP_mod_slash_eIF4E_minus_BP2_disso_kf = 4e-12 vol_secINV; num_4E_minus_BP_mod_slash_eIF4E_minus_BP2_disso_kb = 1.000003e-12 vol_uMINVsecINV;
  // kf*eIF4G_minus_A_clx*eIF4E-kb*eIF4F
  eIF4F_clx: eIF4G_minus_A_clx + eIF4E -> eIF4F; eIF4F_clx_kf*eIF4G_minus_A_clx*eIF4E - eIF4F_clx_kb*eIF4F;
    eIF4F_clx_kf = 2.99996e-11 vol_uMINVsecINV; eIF4F_clx_kb = 9.999833e-14 vol_secINV;
  // kf*eIF4A*eIF4G-kb*eIF4G_minus_A_clx
  eIF4G_A_clx: eIF4A + eIF4G -> eIF4G_minus_A_clx; eIF4G_A_clx_kf*eIF4A*eIF4G - eIF4G_A_clx_kb*eIF4G_minus_A_clx;
    eIF4G_A_clx_kf = 2.99996e-13 vol_uMINVsecINV; eIF4G_A_clx_kb = 9.999833e-13 vol_secINV;
  // kf*num_40S*num_43S_complex_slash_Quaternary_clx-kb*num_43S_complex_slash_Q_dot_R
  num_43S_complex_slash_Q_binds_R: num_40S + num_43S_complex_slash_Quaternary_clx -> num_43S_complex_slash_Q_dot_R; num_43S_complex_slash_Q_binds_R_kf*num_40S*num_43S_complex_slash_Quaternary_clx - num_43S_complex_slash_Q_binds_R_kb*num_43S_complex_slash_Q_dot_R;
    num_43S_complex_slash_Q_binds_R_kf = 4.8e-13 vol_uMINVsecINV; num_43S_complex_slash_Q_binds_R_kb = 5e-13 vol_secINV;
  // kf*num_43S_complex_slash_Q_dot_R*eIF4F_minus_mRNA_clx-kb*num_43Scomplex
  num_43S_complex_slash_QR_binds_M: num_43S_complex_slash_Q_dot_R + eIF4F_minus_mRNA_clx -> num_43Scomplex; num_43S_complex_slash_QR_binds_M_kf*num_43S_complex_slash_Q_dot_R*eIF4F_minus_mRNA_clx - num_43S_complex_slash_QR_binds_M_kb*num_43Scomplex;
    num_43S_complex_slash_QR_binds_M_kf = 4.90002e-13 vol_uMINVsecINV; num_43S_complex_slash_QR_binds_M_kb = 4.5e-15 vol_secINV;
  // kf*eIF4F_minus_mRNA_clx*num_40S-kb*num_43S_complex_slash_RM
  num_43S_complex_slash_R_binds_M: eIF4F_minus_mRNA_clx + num_40S -> num_43S_complex_slash_RM; num_43S_complex_slash_R_binds_M_kf*eIF4F_minus_mRNA_clx*num_40S - num_43S_complex_slash_R_binds_M_kb*num_43S_complex_slash_RM;
    num_43S_complex_slash_R_binds_M_kf = 1.27998e-12 vol_uMINVsecINV; num_43S_complex_slash_R_binds_M_kb = 7.19e-13 vol_secINV;
  // kf*num_43S_complex_slash_RM*num_43S_complex_slash_Quaternary_clx-kb*num_43Scomplex
  num_43S_complex_slash_RM_binds_Q: num_43S_complex_slash_RM + num_43S_complex_slash_Quaternary_clx -> num_43Scomplex; num_43S_complex_slash_RM_binds_Q_kf*num_43S_complex_slash_RM*num_43S_complex_slash_Quaternary_clx - num_43S_complex_slash_RM_binds_Q_kb*num_43Scomplex;
    num_43S_complex_slash_RM_binds_Q_kf = 9.7998e-14 vol_uMINVsecINV; num_43S_complex_slash_RM_binds_Q_kb = 1.69e-15 vol_secINV;
  // kf*CaM_slash_CaM_minus_Ca3*Ca-kb*CaM_minus_Ca4
  // Use K3 = 21.5 uM here from Stemmer and Klee table 3. kb/kf =21.5 * 6e5 so kf = 7.75e-7, kb = 10
  CaM_slash_CaM_minus_Ca3_minus_bind_minus_Ca: CaM_slash_CaM_minus_Ca3 + Ca -> CaM_minus_Ca4; CaM_slash_CaM_minus_Ca3_minus_bind_minus_Ca_kf*CaM_slash_CaM_minus_Ca3*Ca - CaM_slash_CaM_minus_Ca3_minus_bind_minus_Ca_kb*CaM_minus_Ca4;
    CaM_slash_CaM_minus_Ca3_minus_bind_minus_Ca_kf = 4.65006e-13 vol_uMINVsecINV; CaM_slash_CaM_minus_Ca3_minus_bind_minus_Ca_kb = 1e-11 vol_secINV;
  // kf*CaM_slash_CaM*Ca-kb*CaM_slash_CaM_minus_Ca
  // Lets use the fast rate consts here. Since the rates are so different, I am not sure whether the order is relevant. These correspond to the TR2C fragment. We use the Martin et al rates here, plus the Drabicowski binding consts. All are scaled by 3X to cell temp. kf = 2e-10 kb = 72 Stemmer & Klee: K1=.9, K2=1.1. Assume 1.0uM for both. kb/kf=3.6e11. If kb=72, kf = 2e-10 (Exactly the same !) 19 May 2006. Splitting the old CaM-TR2-bind-Ca reaction into two steps, each binding 1 Ca. This improves numerical stability and is conceptually better too. Overall rates are the same, so each kf and kb is the square root of the earlier ones. So kf = 1.125e-4, kb = 8.4853
  CaM_slash_CaM_minus_bind_minus_Ca: CaM_slash_CaM + Ca -> CaM_slash_CaM_minus_Ca; CaM_slash_CaM_minus_bind_minus_Ca_kf*CaM_slash_CaM*Ca - CaM_slash_CaM_minus_bind_minus_Ca_kb*CaM_slash_CaM_minus_Ca;
    CaM_slash_CaM_minus_bind_minus_Ca_kf = 8.4846e-12 vol_uMINVsecINV; CaM_slash_CaM_minus_bind_minus_Ca_kb = 8.4853e-12 vol_secINV;
  // kf*CaM_slash_CaM_minus_Ca2*Ca-kb*CaM_slash_CaM_minus_Ca3
  // K3 = 21.5, K4 = 2.8. Assuming that the K4 step happens first, we get kb/kf = 2.8 uM = 1.68e6 so kf =6e-6 assuming kb = 10
  CaM_slash_CaM_minus_Ca2_minus_bind_minus_Ca: CaM_slash_CaM_minus_Ca2 + Ca -> CaM_slash_CaM_minus_Ca3; CaM_slash_CaM_minus_Ca2_minus_bind_minus_Ca_kf*CaM_slash_CaM_minus_Ca2*Ca - CaM_slash_CaM_minus_Ca2_minus_bind_minus_Ca_kb*CaM_slash_CaM_minus_Ca3;
    CaM_slash_CaM_minus_Ca2_minus_bind_minus_Ca_kf = 3.60006e-12 vol_uMINVsecINV; CaM_slash_CaM_minus_Ca2_minus_bind_minus_Ca_kb = 1e-11 vol_secINV;
  // kf*CaM_slash_CaM_minus_Ca*Ca-kb*CaM_slash_CaM_minus_Ca2
  // Lets use the fast rate consts here. Since the rates are so different, I am not sure whether the order is relevant. These correspond to the TR2C fragment. We use the Martin et al rates here, plus the Drabicowski binding consts. All are scaled by 3X to cell temp. kf = 2e-10 kb = 72 Stemmer & Klee: K1=.9, K2=1.1. Assume 1.0uM for both. kb/kf=3.6e11. If kb=72, kf = 2e-10 (Exactly the same !) 19 May 2006. Splitting the old CaM-TR2-bind-Ca reaction into two steps, each binding 1 Ca. This improves numerical stability and is conceptually better too. Overall rates are the same, so each kf and kb is the square root of the earlier ones. So kf = 1.125e-4, kb = 8.4853
  CaM_slash_CaM_minus_Ca_minus_bind_minus_Ca: CaM_slash_CaM_minus_Ca + Ca -> CaM_slash_CaM_minus_Ca2; CaM_slash_CaM_minus_Ca_minus_bind_minus_Ca_kf*CaM_slash_CaM_minus_Ca*Ca - CaM_slash_CaM_minus_Ca_minus_bind_minus_Ca_kb*CaM_slash_CaM_minus_Ca2;
    CaM_slash_CaM_minus_Ca_minus_bind_minus_Ca_kf = 8.4846e-12 vol_uMINVsecINV; CaM_slash_CaM_minus_Ca_minus_bind_minus_Ca_kb = 8.4853e-12 vol_secINV;
  // kf*CaMKIII_star-kb*CaMKIII
  dephosp_CaMKIII: CaMKIII_star -> CaMKIII; dephosp_CaMKIII_kf*CaMKIII_star - dephosp_CaMKIII_kb*CaMKIII;
    dephosp_CaMKIII_kf = 7e-14 vol_secINV; dephosp_CaMKIII_kb = 0 vol_secINV;
  // kf*eEF2*num_80S_ribos_clx-kb*Translation_clx
  elongation: eEF2 + num_80S_ribos_clx -> Translation_clx; elongation_kf*eEF2*num_80S_ribos_clx - elongation_kb*Translation_clx;
    elongation_kf = 4.00002e-11 vol_uMINVsecINV; elongation_kb = 1e-11 vol_secINV;
  // kf*num_60S_R*num_43Scomplex-kb*num_80S_ribos_clx
  activation: $num_60S_R + num_43Scomplex -> num_80S_ribos_clx; activation_kf*num_60S_R*num_43Scomplex - activation_kb*num_80S_ribos_clx;
    activation_kf = 1.00002e-12 vol_uMINVsecINV; activation_kb = 9e-13 vol_secINV;
  // kf*MAPK_slash_craf_minus_1_star*Ras_slash_GTP_minus_Ras-kb*MAPK_slash_Raf_star_minus_GTP_minus_Ras
  // Assume the binding is fast and limited only by the amount of Ras_star available. So kf=kb/[craf-1] If kb is 1/sec, then kf = 1/0.2 uM = 1/(0.2 * 6e5) = 8.3e-6 Later: Raise it by 10 X to 4e-5 From Hallberg et al JBC 269:6 3913-3916 1994, 3% of cellular Raf is complexed with Ras. So we raise kb 4x to 4 This step needed to memb-anchor and activate Raf: Leevers et al Nature 369 411-414 May 16, 2003 Changed Ras and Raf to synaptic levels, an increase of about 2x for each. To maintain the percentage of complexed Raf, reduced the kf by 2.4 fold to 10.
  Ras_minus_act_minus_craf: MAPK_slash_craf_minus_1_star + Ras_slash_GTP_minus_Ras -> MAPK_slash_Raf_star_minus_GTP_minus_Ras; Ras_minus_act_minus_craf_kf*MAPK_slash_craf_minus_1_star*Ras_slash_GTP_minus_Ras - Ras_minus_act_minus_craf_kb*MAPK_slash_Raf_star_minus_GTP_minus_Ras;
    Ras_minus_act_minus_craf_kf = 9.9996e-12 vol_uMINVsecINV; Ras_minus_act_minus_craf_kb = 5e-13 vol_secINV;
  // kf*Ras_slash_GEF_star-kb*Ras_slash_inact_minus_GEF
  Ras_slash_dephosph_minus_GEF: Ras_slash_GEF_star -> Ras_slash_inact_minus_GEF; Ras_slash_dephosph_minus_GEF_kf*Ras_slash_GEF_star - Ras_slash_dephosph_minus_GEF_kb*Ras_slash_inact_minus_GEF;
    Ras_slash_dephosph_minus_GEF_kf = 1e-12 vol_secINV; Ras_slash_dephosph_minus_GEF_kb = 0 vol_secINV;
  // kf*Ras_slash_GTP_minus_Ras-kb*Ras_slash_GDP_minus_Ras
  // This is extremely slow (1e-4), but it is significant as so little GAP actually gets complexed with it that the total GTP turnover rises only by 2-3 X (see Gibbs et al, JBC 265(33) 20437-20422) and Eccleston et al JBC 268(36) 27012-27019 kf = 1e-4
  Ras_slash_Ras_minus_intrinsic_minus_GTPase: Ras_slash_GTP_minus_Ras -> Ras_slash_GDP_minus_Ras; Ras_slash_Ras_minus_intrinsic_minus_GTPase_kf*Ras_slash_GTP_minus_Ras - Ras_slash_Ras_minus_intrinsic_minus_GTPase_kb*Ras_slash_GDP_minus_Ras;
    Ras_slash_Ras_minus_intrinsic_minus_GTPase_kf = 1e-16 vol_secINV; Ras_slash_Ras_minus_intrinsic_minus_GTPase_kb = 0 vol_secINV;
  // kf*Ras_slash_GAP_star-kb*Ras_slash_GAP
  // Assume a reasonably good rate for dephosphorylating it, 1/sec
  Ras_slash_dephosph_minus_GAP: Ras_slash_GAP_star -> Ras_slash_GAP; Ras_slash_dephosph_minus_GAP_kf*Ras_slash_GAP_star - Ras_slash_dephosph_minus_GAP_kb*Ras_slash_GAP;
    Ras_slash_dephosph_minus_GAP_kf = 1e-13 vol_secINV; Ras_slash_dephosph_minus_GAP_kb = 0 vol_secINV;
  // kf*Ras_slash_inact_minus_GEF*CaM_minus_Ca4-kb*Ras_slash_CaM_minus_GEF
  // We have no numbers for this. It is probably between the two extremes represented by the CaMKII phosph states, and I have used guesses based on this. kf=1e-4 kb=1 The reaction is based on Farnsworth et al Nature 376 524-527 1995
  Ras_slash_CaM_minus_bind_minus_GEF: Ras_slash_inact_minus_GEF + CaM_minus_Ca4 -> Ras_slash_CaM_minus_GEF; Ras_slash_CaM_minus_bind_minus_GEF_kf*Ras_slash_inact_minus_GEF*CaM_minus_Ca4 - Ras_slash_CaM_minus_bind_minus_GEF_kb*Ras_slash_CaM_minus_GEF;
    Ras_slash_CaM_minus_bind_minus_GEF_kf = 1.99998e-10 vol_uMINVsecINV; Ras_slash_CaM_minus_bind_minus_GEF_kb = 1e-12 vol_secINV;
  // kf*Sos_slash_Sos_dot_Grb2*Shc_star-kb*Shc_star_dot_Sos_dot_Grb2
  // Sasaoka et al JBC 269:51 pp 32621 1994, table on pg 32623 indicates that this pathway accounts for about 50% of the GEF activation. (88% - 39%). Error is large, about 20%. Fig 1 is most useful in constraining rates. Chook et al JBC 271:48 pp 30472, 1996 say that the Kd is 0.2 uM for Shc binding to EGFR. The Kd for Grb direct binding is 0.7, so we\'ll ignore it.
  Sos_slash_Shc_bind_Sos_dot_Grb2: Sos_slash_Sos_dot_Grb2 + Shc_star -> Shc_star_dot_Sos_dot_Grb2; Sos_slash_Shc_bind_Sos_dot_Grb2_kf*Sos_slash_Sos_dot_Grb2*Shc_star - Sos_slash_Shc_bind_Sos_dot_Grb2_kb*Shc_star_dot_Sos_dot_Grb2;
    Sos_slash_Shc_bind_Sos_dot_Grb2_kf = 4.99974e-13 vol_uMINVsecINV; Sos_slash_Shc_bind_Sos_dot_Grb2_kb = 1e-13 vol_secINV;
  // kf*Sos_slash_Sos_star*Grb2-kb*Sos_slash_Sos_star_dot_Grb2
  // Same rates as Grb2_bind_Sos: Porfiri and McCormick JBC 271:10 pp 5871 1996 show that the binding is not affected by the phosph.
  Sos_slash_Grb2_bind_Sos_star: Sos_slash_Sos_star + Grb2 -> Sos_slash_Sos_star_dot_Grb2; Sos_slash_Grb2_bind_Sos_star_kf*Sos_slash_Sos_star*Grb2 - Sos_slash_Grb2_bind_Sos_star_kb*Sos_slash_Sos_star_dot_Grb2;
    Sos_slash_Grb2_bind_Sos_star_kf = 2.50002e-14 vol_uMINVsecINV; Sos_slash_Grb2_bind_Sos_star_kb = 1.68e-14 vol_secINV;
  // kf*Sos_slash_Sos_star-kb*Sos_slash_Sos
  // The only clue I have to these rates is from the time courses of the EGF activation, which is around 1 to 5 min. The dephosph would be expected to be of the same order, perhaps a bit longer. Lets use 0.002 which is about 8 min. Sep 17: The transient activation curve matches better with kf = 0.001
  Sos_slash_dephosph_Sos: Sos_slash_Sos_star -> Sos_slash_Sos; Sos_slash_dephosph_Sos_kf*Sos_slash_Sos_star - Sos_slash_dephosph_Sos_kb*Sos_slash_Sos;
    Sos_slash_dephosph_Sos_kf = 1e-15 vol_secINV; Sos_slash_dephosph_Sos_kb = 0 vol_secINV;
  // kf*Grb2*Sos_slash_Sos-kb*Sos_slash_Sos_dot_Grb2
  // As there are 2 SH3 domains, this reaction could be 2nd order. I have a Kd of 22 uM from peptide binding (Lemmon et al JBC 269:50 pg 31653). However, Chook et al JBC 271:48 pg30472 say it is 0.4uM with purified proteins, so we believe them. They say it is 1:1 binding.
  Sos_slash_Grb2_bind_Sos: Grb2 + Sos_slash_Sos -> Sos_slash_Sos_dot_Grb2; Sos_slash_Grb2_bind_Sos_kf*Grb2*Sos_slash_Sos - Sos_slash_Grb2_bind_Sos_kb*Sos_slash_Sos_dot_Grb2;
    Sos_slash_Grb2_bind_Sos_kf = 2.50002e-14 vol_uMINVsecINV; Sos_slash_Grb2_bind_Sos_kb = 1.68e-14 vol_secINV;
  // kf*CaM_minus_Ca4*CaMKIII-kb*CaMKIII_CaM_minus_Ca4
  CaMKIII_bind_CaM_minus_Ca4: CaM_minus_Ca4 + CaMKIII -> CaMKIII_CaM_minus_Ca4; CaMKIII_bind_CaM_minus_Ca4_kf*CaM_minus_Ca4*CaMKIII - CaMKIII_bind_CaM_minus_Ca4_kb*CaMKIII_CaM_minus_Ca4;
    CaMKIII_bind_CaM_minus_Ca4_kf = 9.9e-11 vol_uMINVsecINV; CaMKIII_bind_CaM_minus_Ca4_kb = 9e-14 vol_secINV;
  // kf*peptide-kb*protein
  pep_elongation: peptide -> protein; pep_elongation_kf*peptide - pep_elongation_kb*protein;
    pep_elongation_kf = 1e-13 vol_secINV; pep_elongation_kb = 1e-15 vol_secINV;
  // kf*protein-kb*degraded_protein
  protein_deg: protein -> degraded_protein; protein_deg_kf*protein - protein_deg_kb*degraded_protein;
    protein_deg_kf = 1e-12 vol_secINV; protein_deg_kb = 0 vol_secINV;
  // kf*Rheb_minus_GDP-kb*Rheb_minus_GTP
  GDP_to_GTP: Rheb_minus_GDP -> Rheb_minus_GTP; GDP_to_GTP_kf*Rheb_minus_GDP - GDP_to_GTP_kb*Rheb_minus_GTP;
    GDP_to_GTP_kf = 2e-13 vol_secINV; GDP_to_GTP_kb = 0 vol_secINV;
  // kf*PKC_slash_PKC_minus_cytosolic*Ca-kb*PKC_slash_PKC_minus_Ca
  // Need est of rate of assoc of Ca and PKC. Assume it is fast The original parameter-searched kf of 439.4 has been scaled by 1/6e8 to account for change of units to n. Kf now 8.16e-7, kb=.6085 Raised kf to 1e-6 to match Ca curve, kb to .5
  PKC_slash_PKC_minus_act_minus_by_minus_Ca: PKC_slash_PKC_minus_cytosolic + Ca -> PKC_slash_PKC_minus_Ca; PKC_slash_PKC_minus_act_minus_by_minus_Ca_kf*PKC_slash_PKC_minus_cytosolic*Ca - PKC_slash_PKC_minus_act_minus_by_minus_Ca_kb*PKC_slash_PKC_minus_Ca;
    PKC_slash_PKC_minus_act_minus_by_minus_Ca_kf = 6e-13 vol_uMINVsecINV; PKC_slash_PKC_minus_act_minus_by_minus_Ca_kb = 5e-13 vol_secINV;
  // kf*DAG*PKC_slash_PKC_minus_Ca-kb*PKC_slash_PKC_minus_Ca_minus_DAG
  // Need est of rate. Assume it is fast Obtained from param search kf raised 10 X : see Shinomura et al PNAS 88 5149-5153 1991. kf changed from 3.865e-7 to 2.0e-7 in line with closer analysis of Shinomura data. 26 June 1996: Corrected DAG data: reduce kf 15x from 2e-7 to 1.333e-8
  PKC_slash_PKC_minus_act_minus_by_minus_DAG: $DAG + PKC_slash_PKC_minus_Ca -> PKC_slash_PKC_minus_Ca_minus_DAG; PKC_slash_PKC_minus_act_minus_by_minus_DAG_kf*DAG*PKC_slash_PKC_minus_Ca - PKC_slash_PKC_minus_act_minus_by_minus_DAG_kb*PKC_slash_PKC_minus_Ca_minus_DAG;
    PKC_slash_PKC_minus_act_minus_by_minus_DAG_kf = 7.9998e-15 vol_uMINVsecINV; PKC_slash_PKC_minus_act_minus_by_minus_DAG_kb = 8.6348e-12 vol_secINV;
  // kf*PKC_slash_PKC_minus_Ca-kb*PKC_slash_PKC_minus_Ca_minus_memb_star
  PKC_slash_PKC_minus_Ca_minus_to_minus_memb: PKC_slash_PKC_minus_Ca -> PKC_slash_PKC_minus_Ca_minus_memb_star; PKC_slash_PKC_minus_Ca_minus_to_minus_memb_kf*PKC_slash_PKC_minus_Ca - PKC_slash_PKC_minus_Ca_minus_to_minus_memb_kb*PKC_slash_PKC_minus_Ca_minus_memb_star;
    PKC_slash_PKC_minus_Ca_minus_to_minus_memb_kf = 1.2705e-12 vol_secINV; PKC_slash_PKC_minus_Ca_minus_to_minus_memb_kb = 3.5026e-12 vol_secINV;
  // kf*PKC_slash_PKC_minus_Ca_minus_DAG-kb*PKC_slash_PKC_minus_DAG_minus_memb_star
  // Raise kb from .087 to 0.1 to match data from Shinomura et al. Lower kf from 1.155 to 1.0 to match data from Shinomura et al.
  PKC_slash_PKC_minus_DAG_minus_to_minus_memb: PKC_slash_PKC_minus_Ca_minus_DAG -> PKC_slash_PKC_minus_DAG_minus_memb_star; PKC_slash_PKC_minus_DAG_minus_to_minus_memb_kf*PKC_slash_PKC_minus_Ca_minus_DAG - PKC_slash_PKC_minus_DAG_minus_to_minus_memb_kb*PKC_slash_PKC_minus_DAG_minus_memb_star;
    PKC_slash_PKC_minus_DAG_minus_to_minus_memb_kf = 1e-12 vol_secINV; PKC_slash_PKC_minus_DAG_minus_to_minus_memb_kb = 1e-13 vol_secINV;
  // kf*PKC_slash_PKC_minus_Ca*Arachidonic_Acid-kb*PKC_slash_PKC_minus_Ca_minus_AA_star
  // Schaechter and Benowitz We have to increase Kf for conc scaling Changed kf to 2e-9 on Sept 19, 94. This gives better match.
  PKC_slash_PKC_minus_act_minus_by_minus_Ca_minus_AA: PKC_slash_PKC_minus_Ca + $Arachidonic_Acid -> PKC_slash_PKC_minus_Ca_minus_AA_star; PKC_slash_PKC_minus_act_minus_by_minus_Ca_minus_AA_kf*PKC_slash_PKC_minus_Ca*Arachidonic_Acid - PKC_slash_PKC_minus_act_minus_by_minus_Ca_minus_AA_kb*PKC_slash_PKC_minus_Ca_minus_AA_star;
    PKC_slash_PKC_minus_act_minus_by_minus_Ca_minus_AA_kf = 1.2e-15 vol_uMINVsecINV; PKC_slash_PKC_minus_act_minus_by_minus_Ca_minus_AA_kb = 1e-13 vol_secINV;
  // kf*PKC_slash_PKC_minus_DAG_minus_AA-kb*PKC_slash_PKC_minus_DAG_minus_AA_star
  // Assume slowish too. Schaechter and Benowitz
  PKC_slash_PKC_minus_act_minus_by_minus_DAG_minus_AA: PKC_slash_PKC_minus_DAG_minus_AA -> PKC_slash_PKC_minus_DAG_minus_AA_star; PKC_slash_PKC_minus_act_minus_by_minus_DAG_minus_AA_kf*PKC_slash_PKC_minus_DAG_minus_AA - PKC_slash_PKC_minus_act_minus_by_minus_DAG_minus_AA_kb*PKC_slash_PKC_minus_DAG_minus_AA_star;
    PKC_slash_PKC_minus_act_minus_by_minus_DAG_minus_AA_kf = 2e-12 vol_secINV; PKC_slash_PKC_minus_act_minus_by_minus_DAG_minus_AA_kb = 2e-13 vol_secINV;
  // kf*PKC_slash_PKC_minus_cytosolic-kb*PKC_slash_PKC_minus_basal_star
  // Initial basal levels were set by kf = 1, kb = 20. In model, though, the basal levels of PKC activity are higher.
  PKC_slash_PKC_minus_basal_minus_act: PKC_slash_PKC_minus_cytosolic -> PKC_slash_PKC_minus_basal_star; PKC_slash_PKC_minus_basal_minus_act_kf*PKC_slash_PKC_minus_cytosolic - PKC_slash_PKC_minus_basal_minus_act_kb*PKC_slash_PKC_minus_basal_star;
    PKC_slash_PKC_minus_basal_minus_act_kf = 1e-12 vol_secINV; PKC_slash_PKC_minus_basal_minus_act_kb = 5e-11 vol_secINV;
  // kf*Arachidonic_Acid*PKC_slash_PKC_minus_cytosolic-kb*PKC_slash_PKC_minus_AA_star
  // Raise kf from 1.667e-10 to 2e-10 to get better match to data.
  PKC_slash_PKC_minus_act_minus_by_minus_AA: $Arachidonic_Acid + PKC_slash_PKC_minus_cytosolic -> PKC_slash_PKC_minus_AA_star; PKC_slash_PKC_minus_act_minus_by_minus_AA_kf*Arachidonic_Acid*PKC_slash_PKC_minus_cytosolic - PKC_slash_PKC_minus_act_minus_by_minus_AA_kb*PKC_slash_PKC_minus_AA_star;
    PKC_slash_PKC_minus_act_minus_by_minus_AA_kf = 1.2e-16 vol_uMINVsecINV; PKC_slash_PKC_minus_act_minus_by_minus_AA_kb = 1e-13 vol_secINV;
  // kf*PKC_slash_PKC_minus_cytosolic*DAG-kb*PKC_slash_PKC_minus_DAG
  // kf raised 10 X based on Shinomura et al PNAS 88 5149-5153 1991 closer analysis of Shinomura et al: kf now 1e-8 (was 1.66e-8). Further tweak. To get sufficient AA synergy, increase kf to 1.5e-8 26 June 1996: Corrected DAG levels: reduce kf by 15x from 1.5e-8 to 1e-9
  PKC_slash_PKC_minus_n_minus_DAG: PKC_slash_PKC_minus_cytosolic + $DAG -> PKC_slash_PKC_minus_DAG; PKC_slash_PKC_minus_n_minus_DAG_kf*PKC_slash_PKC_minus_cytosolic*DAG - PKC_slash_PKC_minus_n_minus_DAG_kb*PKC_slash_PKC_minus_DAG;
    PKC_slash_PKC_minus_n_minus_DAG_kf = 6e-16 vol_uMINVsecINV; PKC_slash_PKC_minus_n_minus_DAG_kb = 1e-13 vol_secINV;
  // kf*PKC_slash_PKC_minus_DAG*Arachidonic_Acid-kb*PKC_slash_PKC_minus_DAG_minus_AA
  // Reduced kf to 0.66X to match Shinomura et al data. Initial: kf = 3.3333e-9 New: 2e-9 Newer: 2e-8 kb was 0.2 now 2.
  PKC_slash_PKC_minus_n_minus_DAG_minus_AA: PKC_slash_PKC_minus_DAG + $Arachidonic_Acid -> PKC_slash_PKC_minus_DAG_minus_AA; PKC_slash_PKC_minus_n_minus_DAG_minus_AA_kf*PKC_slash_PKC_minus_DAG*Arachidonic_Acid - PKC_slash_PKC_minus_n_minus_DAG_minus_AA_kb*PKC_slash_PKC_minus_DAG_minus_AA;
    PKC_slash_PKC_minus_n_minus_DAG_minus_AA_kf = 1.8e-14 vol_uMINVsecINV; PKC_slash_PKC_minus_n_minus_DAG_minus_AA_kb = 2e-12 vol_secINV;
  // kf*num_4E_minus_BP_mod_slash_eIF4E_minus_BP_thr37_46-kb*num_4E_minus_BP_t37_46*eIF4E
  eIF4E_minus_BP_disso: num_4E_minus_BP_mod_slash_eIF4E_minus_BP_thr37_46 -> num_4E_minus_BP_t37_46 + eIF4E; eIF4E_minus_BP_disso_kf*num_4E_minus_BP_mod_slash_eIF4E_minus_BP_thr37_46 - eIF4E_minus_BP_disso_kb*num_4E_minus_BP_t37_46*eIF4E;
    eIF4E_minus_BP_disso_kf = 1e-12 vol_secINV; eIF4E_minus_BP_disso_kb = 1.000003e-13 vol_uMINVsecINV;
  // kf*S6Kinase_slash_S6K-kb*S6Kinase_slash_S6K_star
  basal_S6K: S6Kinase_slash_S6K -> S6Kinase_slash_S6K_star; basal_S6K_kf*S6Kinase_slash_S6K - basal_S6K_kb*S6Kinase_slash_S6K_star;
    basal_S6K_kf = 1e-14 vol_secINV; basal_S6K_kb = 0 vol_secINV;
  // kf*rad_peptide-kb*rad_protein
  rad_pep_elongation: rad_peptide -> rad_protein; rad_pep_elongation_kf*rad_peptide - rad_pep_elongation_kb*rad_protein;
    rad_pep_elongation_kf = 1e-13 vol_secINV; rad_pep_elongation_kb = 1e-15 vol_secINV;
  // kf*rad_protein-kb*rad_deg_pro
  rad_protein_deg: rad_protein -> rad_deg_pro; rad_protein_deg_kf*rad_protein - rad_protein_deg_kb*rad_deg_pro;
    rad_protein_deg_kf = 1e-12 vol_secINV; rad_protein_deg_kb = 0 vol_secINV;
  // kf*AA-kb*rad_AA
  labelling: $AA -> rad_AA; labelling_kf*AA - labelling_kb*rad_AA;
    labelling_kf = 0 vol_secINV; labelling_kb = 0 vol_secINV;
  // kf*Ras_slash_GTP_minus_Ras*PI3K_mod_slash_PI3K-kb*Ras_minus_GTP_PI3K
  PI3K_bind_Ras_minus_GTP: Ras_slash_GTP_minus_Ras + PI3K_mod_slash_PI3K -> Ras_minus_GTP_PI3K; PI3K_bind_Ras_minus_GTP_kf*Ras_slash_GTP_minus_Ras*PI3K_mod_slash_PI3K - PI3K_bind_Ras_minus_GTP_kb*Ras_minus_GTP_PI3K;
    PI3K_bind_Ras_minus_GTP_kf = 1.79994e-12 vol_uMINVsecINV; PI3K_bind_Ras_minus_GTP_kb = 5e-12 vol_secINV;
  // k1*S6Kinase_slash_S6K_thr_minus_412*PDK1-k2*PDK1_slash_S6K_phospho_slash_S6K_phospho_cplx
  PDK1_slash_S6K_phospho_1: S6Kinase_slash_S6K_thr_minus_412 + PDK1 -> PDK1_slash_S6K_phospho_slash_S6K_phospho_cplx; PDK1_slash_S6K_phospho_1_k1*S6Kinase_slash_S6K_thr_minus_412*PDK1 - PDK1_slash_S6K_phospho_1_k2*PDK1_slash_S6K_phospho_slash_S6K_phospho_cplx;
    PDK1_slash_S6K_phospho_1_k1 = 4.999813e-13 vol_uMINVsecINV; PDK1_slash_S6K_phospho_1_k2 = 4e-12 vol_secINV;
  // k3*PDK1_slash_S6K_phospho_slash_S6K_phospho_cplx
  PDK1_slash_S6K_phospho_2: PDK1_slash_S6K_phospho_slash_S6K_phospho_cplx => S6K_thr_minus_252 + PDK1; PDK1_slash_S6K_phospho_2_k3*PDK1_slash_S6K_phospho_slash_S6K_phospho_cplx;
    PDK1_slash_S6K_phospho_2_k3 = 1e-12 vol_secINV;
  // k1*S6Kinase_slash_S6K_star*PP2A-k2*PP2A_slash_dephos_clus_S6K_slash_dephos_clus_S6K_cplx
  PP2A_slash_dephos_clus_S6K_1: S6Kinase_slash_S6K_star + PP2A -> PP2A_slash_dephos_clus_S6K_slash_dephos_clus_S6K_cplx; PP2A_slash_dephos_clus_S6K_1_k1*S6Kinase_slash_S6K_star*PP2A - PP2A_slash_dephos_clus_S6K_1_k2*PP2A_slash_dephos_clus_S6K_slash_dephos_clus_S6K_cplx;
    PP2A_slash_dephos_clus_S6K_1_k1 = 5.681571e-13 vol_uMINVsecINV; PP2A_slash_dephos_clus_S6K_1_k2 = 4e-12 vol_secINV;
  // k3*PP2A_slash_dephos_clus_S6K_slash_dephos_clus_S6K_cplx
  PP2A_slash_dephos_clus_S6K_2: PP2A_slash_dephos_clus_S6K_slash_dephos_clus_S6K_cplx => S6Kinase_slash_S6K + PP2A; PP2A_slash_dephos_clus_S6K_2_k3*PP2A_slash_dephos_clus_S6K_slash_dephos_clus_S6K_cplx;
    PP2A_slash_dephos_clus_S6K_2_k3 = 1e-12 vol_secINV;
  // k1*S6Kinase_slash_S6K_thr_minus_412*PP2A-k2*PP2A_slash_dephos_S6K_slash_dephos_S6K_cplx
  PP2A_slash_dephos_S6K_1: S6Kinase_slash_S6K_thr_minus_412 + PP2A -> PP2A_slash_dephos_S6K_slash_dephos_S6K_cplx; PP2A_slash_dephos_S6K_1_k1*S6Kinase_slash_S6K_thr_minus_412*PP2A - PP2A_slash_dephos_S6K_1_k2*PP2A_slash_dephos_S6K_slash_dephos_S6K_cplx;
    PP2A_slash_dephos_S6K_1_k1 = 5.681571e-13 vol_uMINVsecINV; PP2A_slash_dephos_S6K_1_k2 = 4e-12 vol_secINV;
  // k3*PP2A_slash_dephos_S6K_slash_dephos_S6K_cplx
  PP2A_slash_dephos_S6K_2: PP2A_slash_dephos_S6K_slash_dephos_S6K_cplx => S6Kinase_slash_S6K_star + PP2A; PP2A_slash_dephos_S6K_2_k3*PP2A_slash_dephos_S6K_slash_dephos_S6K_cplx;
    PP2A_slash_dephos_S6K_2_k3 = 1e-12 vol_secINV;
  // k1*S6K_thr_minus_252*PP2A-k2*PP2A_slash_dephosp_S6K_slash_dephosp_S6K_cplx
  PP2A_slash_dephosp_S6K_1: S6K_thr_minus_252 + PP2A -> PP2A_slash_dephosp_S6K_slash_dephosp_S6K_cplx; PP2A_slash_dephosp_S6K_1_k1*S6K_thr_minus_252*PP2A - PP2A_slash_dephosp_S6K_1_k2*PP2A_slash_dephosp_S6K_slash_dephosp_S6K_cplx;
    PP2A_slash_dephosp_S6K_1_k1 = 5.68176e-13 vol_uMINVsecINV; PP2A_slash_dephosp_S6K_1_k2 = 4e-12 vol_secINV;
  // k3*PP2A_slash_dephosp_S6K_slash_dephosp_S6K_cplx
  PP2A_slash_dephosp_S6K_2: PP2A_slash_dephosp_S6K_slash_dephosp_S6K_cplx => S6Kinase_slash_S6K_thr_minus_412 + PP2A; PP2A_slash_dephosp_S6K_2_k3*PP2A_slash_dephosp_S6K_slash_dephosp_S6K_cplx;
    PP2A_slash_dephosp_S6K_2_k3 = 1e-12 vol_secINV;
  // k1*AKT_mod_slash_PIP3_AKT_minus_t308_s473*PP2A-k2*PP2A_slash_Dephos_AKTser473_slash_Dephos_AKTser473_cplx
  PP2A_slash_Dephos_AKTser473_1: AKT_mod_slash_PIP3_AKT_minus_t308_s473 + PP2A -> PP2A_slash_Dephos_AKTser473_slash_Dephos_AKTser473_cplx; PP2A_slash_Dephos_AKTser473_1_k1*AKT_mod_slash_PIP3_AKT_minus_t308_s473*PP2A - PP2A_slash_Dephos_AKTser473_1_k2*PP2A_slash_Dephos_AKTser473_slash_Dephos_AKTser473_cplx;
    PP2A_slash_Dephos_AKTser473_1_k1 = 1.875e-12 vol_uMINVsecINV; PP2A_slash_Dephos_AKTser473_1_k2 = 7.2e-12 vol_secINV;
  // k3*PP2A_slash_Dephos_AKTser473_slash_Dephos_AKTser473_cplx
  PP2A_slash_Dephos_AKTser473_2: PP2A_slash_Dephos_AKTser473_slash_Dephos_AKTser473_cplx => AKT_mod_slash_PIP3_AKT_thr308 + PP2A; PP2A_slash_Dephos_AKTser473_2_k3*PP2A_slash_Dephos_AKTser473_slash_Dephos_AKTser473_cplx;
    PP2A_slash_Dephos_AKTser473_2_k3 = 1.8e-12 vol_secINV;
  // k1*AKT_mod_slash_PIP3_AKT_thr308*PP2A-k2*PP2A_slash_Dephosph_AKTthr308_slash_Dephosph_AKTthr308_cplx
  PP2A_slash_Dephosph_AKTthr308_1: AKT_mod_slash_PIP3_AKT_thr308 + PP2A -> PP2A_slash_Dephosph_AKTthr308_slash_Dephosph_AKTthr308_cplx; PP2A_slash_Dephosph_AKTthr308_1_k1*AKT_mod_slash_PIP3_AKT_thr308*PP2A - PP2A_slash_Dephosph_AKTthr308_1_k2*PP2A_slash_Dephosph_AKTthr308_slash_Dephosph_AKTthr308_cplx;
    PP2A_slash_Dephosph_AKTthr308_1_k1 = 1.874878e-12 vol_uMINVsecINV; PP2A_slash_Dephosph_AKTthr308_1_k2 = 7.2e-12 vol_secINV;
  // k3*PP2A_slash_Dephosph_AKTthr308_slash_Dephosph_AKTthr308_cplx
  PP2A_slash_Dephosph_AKTthr308_2: PP2A_slash_Dephosph_AKTthr308_slash_Dephosph_AKTthr308_cplx => AKT_mod_slash_PIP3_AKT + PP2A; PP2A_slash_Dephosph_AKTthr308_2_k3*PP2A_slash_Dephosph_AKTthr308_slash_Dephosph_AKTthr308_cplx;
    PP2A_slash_Dephosph_AKTthr308_2_k3 = 1.8e-12 vol_secINV;
  // k1*eEFthr_minus_56*PP2A-k2*PP2A_slash_eEF2thr_minus_56_dephospho_slash_eEF2thr_minus_56_dephospho_cplx
  PP2A_slash_eEF2thr_minus_56_dephospho_1: eEFthr_minus_56 + PP2A -> PP2A_slash_eEF2thr_minus_56_dephospho_slash_eEF2thr_minus_56_dephospho_cplx; PP2A_slash_eEF2thr_minus_56_dephospho_1_k1*eEFthr_minus_56*PP2A - PP2A_slash_eEF2thr_minus_56_dephospho_1_k2*PP2A_slash_eEF2thr_minus_56_dephospho_slash_eEF2thr_minus_56_dephospho_cplx;
    PP2A_slash_eEF2thr_minus_56_dephospho_1_k1 = 2.67036e-13 vol_uMINVsecINV; PP2A_slash_eEF2thr_minus_56_dephospho_1_k2 = 1.88e-12 vol_secINV;
  // k3*PP2A_slash_eEF2thr_minus_56_dephospho_slash_eEF2thr_minus_56_dephospho_cplx
  PP2A_slash_eEF2thr_minus_56_dephospho_2: PP2A_slash_eEF2thr_minus_56_dephospho_slash_eEF2thr_minus_56_dephospho_cplx => eEF2 + PP2A; PP2A_slash_eEF2thr_minus_56_dephospho_2_k3*PP2A_slash_eEF2thr_minus_56_dephospho_slash_eEF2thr_minus_56_dephospho_cplx;
    PP2A_slash_eEF2thr_minus_56_dephospho_2_k3 = 4.7e-13 vol_secINV;
  // k1*num_4E_minus_BP_mod_slash_4E_minus_BP_thr37_46_s65*PP2A-k2*PP2A_slash_PP2A_4E_minus_BP_star_star_slash_PP2A_4E_minus_BP_star_star_cplx
  PP2A_slash_PP2A_4E_minus_BP_star_star_1: num_4E_minus_BP_mod_slash_4E_minus_BP_thr37_46_s65 + PP2A -> PP2A_slash_PP2A_4E_minus_BP_star_star_slash_PP2A_4E_minus_BP_star_star_cplx; PP2A_slash_PP2A_4E_minus_BP_star_star_1_k1*num_4E_minus_BP_mod_slash_4E_minus_BP_thr37_46_s65*PP2A - PP2A_slash_PP2A_4E_minus_BP_star_star_1_k2*PP2A_slash_PP2A_4E_minus_BP_star_star_slash_PP2A_4E_minus_BP_star_star_cplx;
    PP2A_slash_PP2A_4E_minus_BP_star_star_1_k1 = 5.68182e-13 vol_uMINVsecINV; PP2A_slash_PP2A_4E_minus_BP_star_star_1_k2 = 4e-12 vol_secINV;
  // k3*PP2A_slash_PP2A_4E_minus_BP_star_star_slash_PP2A_4E_minus_BP_star_star_cplx
  PP2A_slash_PP2A_4E_minus_BP_star_star_2: PP2A_slash_PP2A_4E_minus_BP_star_star_slash_PP2A_4E_minus_BP_star_star_cplx => num_4E_minus_BP_t37_46 + PP2A; PP2A_slash_PP2A_4E_minus_BP_star_star_2_k3*PP2A_slash_PP2A_4E_minus_BP_star_star_slash_PP2A_4E_minus_BP_star_star_cplx;
    PP2A_slash_PP2A_4E_minus_BP_star_star_2_k3 = 1e-12 vol_secINV;
  // k1*num_4E_minus_BP_t37_46*PP2A-k2*PP2A_slash_PP2A_4E_minus_BP_star_slash_PP2A_4E_minus_BP_star_cplx
  PP2A_slash_PP2A_4E_minus_BP_star_1: num_4E_minus_BP_t37_46 + PP2A -> PP2A_slash_PP2A_4E_minus_BP_star_slash_PP2A_4E_minus_BP_star_cplx; PP2A_slash_PP2A_4E_minus_BP_star_1_k1*num_4E_minus_BP_t37_46*PP2A - PP2A_slash_PP2A_4E_minus_BP_star_1_k2*PP2A_slash_PP2A_4E_minus_BP_star_slash_PP2A_4E_minus_BP_star_cplx;
    PP2A_slash_PP2A_4E_minus_BP_star_1_k1 = 5.68182e-13 vol_uMINVsecINV; PP2A_slash_PP2A_4E_minus_BP_star_1_k2 = 4e-12 vol_secINV;
  // k3*PP2A_slash_PP2A_4E_minus_BP_star_slash_PP2A_4E_minus_BP_star_cplx
  PP2A_slash_PP2A_4E_minus_BP_star_2: PP2A_slash_PP2A_4E_minus_BP_star_slash_PP2A_4E_minus_BP_star_cplx => num_4E_minus_BP_mod_slash_4E_minus_BP + PP2A; PP2A_slash_PP2A_4E_minus_BP_star_2_k3*PP2A_slash_PP2A_4E_minus_BP_star_slash_PP2A_4E_minus_BP_star_cplx;
    PP2A_slash_PP2A_4E_minus_BP_star_2_k3 = 1e-12 vol_secINV;
  // k1*num_4E_minus_BP_mod_slash_eIF4E_4E_minus_BP_t37_46_s65*PP2A-k2*PP2A_slash_PP2A_4E_minus_BP_slash_PP2A_4E_minus_BP_cplx
  PP2A_slash_PP2A_4E_minus_BP_1: num_4E_minus_BP_mod_slash_eIF4E_4E_minus_BP_t37_46_s65 + PP2A -> PP2A_slash_PP2A_4E_minus_BP_slash_PP2A_4E_minus_BP_cplx; PP2A_slash_PP2A_4E_minus_BP_1_k1*num_4E_minus_BP_mod_slash_eIF4E_4E_minus_BP_t37_46_s65*PP2A - PP2A_slash_PP2A_4E_minus_BP_1_k2*PP2A_slash_PP2A_4E_minus_BP_slash_PP2A_4E_minus_BP_cplx;
    PP2A_slash_PP2A_4E_minus_BP_1_k1 = 5.68164e-13 vol_uMINVsecINV; PP2A_slash_PP2A_4E_minus_BP_1_k2 = 4e-12 vol_secINV;
  // k3*PP2A_slash_PP2A_4E_minus_BP_slash_PP2A_4E_minus_BP_cplx
  PP2A_slash_PP2A_4E_minus_BP_2: PP2A_slash_PP2A_4E_minus_BP_slash_PP2A_4E_minus_BP_cplx => num_4E_minus_BP_mod_slash_eIF4E_minus_BP_thr37_46 + PP2A; PP2A_slash_PP2A_4E_minus_BP_2_k3*PP2A_slash_PP2A_4E_minus_BP_slash_PP2A_4E_minus_BP_cplx;
    PP2A_slash_PP2A_4E_minus_BP_2_k3 = 1e-12 vol_secINV;
  // k1*num_4E_minus_BP_mod_slash_eIF4E_minus_BP_thr37_46*PP2A-k2*PP2A_slash_PP2A_4EBP_slash_PP2A_4EBP_cplx
  PP2A_slash_PP2A_4EBP_1: num_4E_minus_BP_mod_slash_eIF4E_minus_BP_thr37_46 + PP2A -> PP2A_slash_PP2A_4EBP_slash_PP2A_4EBP_cplx; PP2A_slash_PP2A_4EBP_1_k1*num_4E_minus_BP_mod_slash_eIF4E_minus_BP_thr37_46*PP2A - PP2A_slash_PP2A_4EBP_1_k2*PP2A_slash_PP2A_4EBP_slash_PP2A_4EBP_cplx;
    PP2A_slash_PP2A_4EBP_1_k1 = 5.68164e-13 vol_uMINVsecINV; PP2A_slash_PP2A_4EBP_1_k2 = 4e-12 vol_secINV;
  // k3*PP2A_slash_PP2A_4EBP_slash_PP2A_4EBP_cplx
  PP2A_slash_PP2A_4EBP_2: PP2A_slash_PP2A_4EBP_slash_PP2A_4EBP_cplx => num_4E_minus_BP_mod_slash_eIF4E_minus_BP + PP2A; PP2A_slash_PP2A_4EBP_2_k3*PP2A_slash_PP2A_4EBP_slash_PP2A_4EBP_cplx;
    PP2A_slash_PP2A_4EBP_2_k3 = 1e-12 vol_secINV;
  // k1*AKT_mod_slash_PIP3_AKT*AKT_mod_slash_PIP3_PDK1-k2*AKT_mod_slash_PIP3_PDK1_slash_phospho_thr308_slash_phospho_thr308_cplx
  AKT_mod_slash_PIP3_PDK1_slash_phospho_thr308_1: AKT_mod_slash_PIP3_AKT + AKT_mod_slash_PIP3_PDK1 -> AKT_mod_slash_PIP3_PDK1_slash_phospho_thr308_slash_phospho_thr308_cplx; AKT_mod_slash_PIP3_PDK1_slash_phospho_thr308_1_k1*AKT_mod_slash_PIP3_AKT*AKT_mod_slash_PIP3_PDK1 - AKT_mod_slash_PIP3_PDK1_slash_phospho_thr308_1_k2*AKT_mod_slash_PIP3_PDK1_slash_phospho_thr308_slash_phospho_thr308_cplx;
    AKT_mod_slash_PIP3_PDK1_slash_phospho_thr308_1_k1 = 1.249998e-10 vol_uMINVsecINV; AKT_mod_slash_PIP3_PDK1_slash_phospho_thr308_1_k2 = 4e-11 vol_secINV;
  // k3*AKT_mod_slash_PIP3_PDK1_slash_phospho_thr308_slash_phospho_thr308_cplx
  AKT_mod_slash_PIP3_PDK1_slash_phospho_thr308_2: AKT_mod_slash_PIP3_PDK1_slash_phospho_thr308_slash_phospho_thr308_cplx => AKT_mod_slash_PIP3_AKT_thr308 + AKT_mod_slash_PIP3_PDK1; AKT_mod_slash_PIP3_PDK1_slash_phospho_thr308_2_k3*AKT_mod_slash_PIP3_PDK1_slash_phospho_thr308_slash_phospho_thr308_cplx;
    AKT_mod_slash_PIP3_PDK1_slash_phospho_thr308_2_k3 = 1e-11 vol_secINV;
  // k1*AKT_mod_slash_PIP3_AKT_thr308*AKT_mod_slash_PIP3_PDK2-k2*AKT_mod_slash_PIP3_PDK2_slash_phosp_AKTser473_slash_phosp_AKTser473_cplx
  AKT_mod_slash_PIP3_PDK2_slash_phosp_AKTser473_1: AKT_mod_slash_PIP3_AKT_thr308 + AKT_mod_slash_PIP3_PDK2 -> AKT_mod_slash_PIP3_PDK2_slash_phosp_AKTser473_slash_phosp_AKTser473_cplx; AKT_mod_slash_PIP3_PDK2_slash_phosp_AKTser473_1_k1*AKT_mod_slash_PIP3_AKT_thr308*AKT_mod_slash_PIP3_PDK2 - AKT_mod_slash_PIP3_PDK2_slash_phosp_AKTser473_1_k2*AKT_mod_slash_PIP3_PDK2_slash_phosp_AKTser473_slash_phosp_AKTser473_cplx;
    AKT_mod_slash_PIP3_PDK2_slash_phosp_AKTser473_1_k1 = 1.249938e-10 vol_uMINVsecINV; AKT_mod_slash_PIP3_PDK2_slash_phosp_AKTser473_1_k2 = 8e-11 vol_secINV;
  // k3*AKT_mod_slash_PIP3_PDK2_slash_phosp_AKTser473_slash_phosp_AKTser473_cplx
  AKT_mod_slash_PIP3_PDK2_slash_phosp_AKTser473_2: AKT_mod_slash_PIP3_PDK2_slash_phosp_AKTser473_slash_phosp_AKTser473_cplx => AKT_mod_slash_PIP3_AKT_minus_t308_s473 + AKT_mod_slash_PIP3_PDK2; AKT_mod_slash_PIP3_PDK2_slash_phosp_AKTser473_2_k3*AKT_mod_slash_PIP3_PDK2_slash_phosp_AKTser473_slash_phosp_AKTser473_cplx;
    AKT_mod_slash_PIP3_PDK2_slash_phosp_AKTser473_2_k3 = 2e-11 vol_secINV;
  // k1*TSC1_minus_TSC2*AKT_mod_slash_PIP3_AKT_minus_t308_s473-k2*AKT_mod_slash_PIP3_AKT_minus_t308_s473_slash_TSC2_phospho_slash_TSC2_phospho_cplx
  AKT_mod_slash_PIP3_AKT_minus_t308_s473_slash_TSC2_phospho_1: TSC1_minus_TSC2 + AKT_mod_slash_PIP3_AKT_minus_t308_s473 -> AKT_mod_slash_PIP3_AKT_minus_t308_s473_slash_TSC2_phospho_slash_TSC2_phospho_cplx; AKT_mod_slash_PIP3_AKT_minus_t308_s473_slash_TSC2_phospho_1_k1*TSC1_minus_TSC2*AKT_mod_slash_PIP3_AKT_minus_t308_s473 - AKT_mod_slash_PIP3_AKT_minus_t308_s473_slash_TSC2_phospho_1_k2*AKT_mod_slash_PIP3_AKT_minus_t308_s473_slash_TSC2_phospho_slash_TSC2_phospho_cplx;
    AKT_mod_slash_PIP3_AKT_minus_t308_s473_slash_TSC2_phospho_1_k1 = 2.91264e-12 vol_uMINVsecINV; AKT_mod_slash_PIP3_AKT_minus_t308_s473_slash_TSC2_phospho_1_k2 = 2.4e-11 vol_secINV;
  // k3*AKT_mod_slash_PIP3_AKT_minus_t308_s473_slash_TSC2_phospho_slash_TSC2_phospho_cplx
  AKT_mod_slash_PIP3_AKT_minus_t308_s473_slash_TSC2_phospho_2: AKT_mod_slash_PIP3_AKT_minus_t308_s473_slash_TSC2_phospho_slash_TSC2_phospho_cplx => AKT_mod_slash_TSC1_minus_TSC2_star + AKT_mod_slash_PIP3_AKT_minus_t308_s473; AKT_mod_slash_PIP3_AKT_minus_t308_s473_slash_TSC2_phospho_2_k3*AKT_mod_slash_PIP3_AKT_minus_t308_s473_slash_TSC2_phospho_slash_TSC2_phospho_cplx;
    AKT_mod_slash_PIP3_AKT_minus_t308_s473_slash_TSC2_phospho_2_k3 = 6e-12 vol_secINV;
  // k1*PLC_g*TrKB_mod_slash_BDNF_TrkB2_star_clx-k2*TrKB_mod_slash_BDNF_TrkB2_star_clx_slash_PLC_g_phospho_slash_PLC_g_phospho_cplx
  TrKB_mod_slash_BDNF_TrkB2_star_clx_slash_PLC_g_phospho_1: PLC_g + TrKB_mod_slash_BDNF_TrkB2_star_clx -> TrKB_mod_slash_BDNF_TrkB2_star_clx_slash_PLC_g_phospho_slash_PLC_g_phospho_cplx; TrKB_mod_slash_BDNF_TrkB2_star_clx_slash_PLC_g_phospho_1_k1*PLC_g*TrKB_mod_slash_BDNF_TrkB2_star_clx - TrKB_mod_slash_BDNF_TrkB2_star_clx_slash_PLC_g_phospho_1_k2*TrKB_mod_slash_BDNF_TrkB2_star_clx_slash_PLC_g_phospho_slash_PLC_g_phospho_cplx;
    TrKB_mod_slash_BDNF_TrkB2_star_clx_slash_PLC_g_phospho_1_k1 = 8.33312222e-12 vol_uMINVsecINV; TrKB_mod_slash_BDNF_TrkB2_star_clx_slash_PLC_g_phospho_1_k2 = 1.999933e-12 vol_secINV;
  // k3*TrKB_mod_slash_BDNF_TrkB2_star_clx_slash_PLC_g_phospho_slash_PLC_g_phospho_cplx
  TrKB_mod_slash_BDNF_TrkB2_star_clx_slash_PLC_g_phospho_2: TrKB_mod_slash_BDNF_TrkB2_star_clx_slash_PLC_g_phospho_slash_PLC_g_phospho_cplx => PLC_g_star + TrKB_mod_slash_BDNF_TrkB2_star_clx; TrKB_mod_slash_BDNF_TrkB2_star_clx_slash_PLC_g_phospho_2_k3*TrKB_mod_slash_BDNF_TrkB2_star_clx_slash_PLC_g_phospho_slash_PLC_g_phospho_cplx;
    TrKB_mod_slash_BDNF_TrkB2_star_clx_slash_PLC_g_phospho_2_k3 = 4.999833e-13 vol_secINV;
  // k1*PI3K_mod_slash_Shc*TrKB_mod_slash_BDNF_TrkB2_star_clx-k2*TrKB_mod_slash_BDNF_TrkB2_star_clx_slash_Shc_phospho_slash_Shc_phospho_cplx
  TrKB_mod_slash_BDNF_TrkB2_star_clx_slash_Shc_phospho_1: PI3K_mod_slash_Shc + TrKB_mod_slash_BDNF_TrkB2_star_clx -> TrKB_mod_slash_BDNF_TrkB2_star_clx_slash_Shc_phospho_slash_Shc_phospho_cplx; TrKB_mod_slash_BDNF_TrkB2_star_clx_slash_Shc_phospho_1_k1*PI3K_mod_slash_Shc*TrKB_mod_slash_BDNF_TrkB2_star_clx - TrKB_mod_slash_BDNF_TrkB2_star_clx_slash_Shc_phospho_1_k2*TrKB_mod_slash_BDNF_TrkB2_star_clx_slash_Shc_phospho_slash_Shc_phospho_cplx;
    TrKB_mod_slash_BDNF_TrkB2_star_clx_slash_Shc_phospho_1_k1 = 1.80006e-12 vol_uMINVsecINV; TrKB_mod_slash_BDNF_TrkB2_star_clx_slash_Shc_phospho_1_k2 = 1.19996e-12 vol_secINV;
  // k3*TrKB_mod_slash_BDNF_TrkB2_star_clx_slash_Shc_phospho_slash_Shc_phospho_cplx
  TrKB_mod_slash_BDNF_TrkB2_star_clx_slash_Shc_phospho_2: TrKB_mod_slash_BDNF_TrkB2_star_clx_slash_Shc_phospho_slash_Shc_phospho_cplx => Shc_star + TrKB_mod_slash_BDNF_TrkB2_star_clx; TrKB_mod_slash_BDNF_TrkB2_star_clx_slash_Shc_phospho_2_k3*TrKB_mod_slash_BDNF_TrkB2_star_clx_slash_Shc_phospho_slash_Shc_phospho_cplx;
    TrKB_mod_slash_BDNF_TrkB2_star_clx_slash_Shc_phospho_2_k3 = 2.9999e-13 vol_secINV;
  // k1*PI3K_mod_slash_PIP2*TrKB_mod_slash_Shc_star_Grb2_minus_Gab1_PI3K_clx-k2*TrKB_mod_slash_Shc_star_Grb2_minus_Gab1_PI3K_clx_slash_Phospho_slash_Phospho_cplx
  TrKB_mod_slash_Shc_star_Grb2_minus_Gab1_PI3K_clx_slash_Phospho_1: $PI3K_mod_slash_PIP2 + TrKB_mod_slash_Shc_star_Grb2_minus_Gab1_PI3K_clx -> TrKB_mod_slash_Shc_star_Grb2_minus_Gab1_PI3K_clx_slash_Phospho_slash_Phospho_cplx; TrKB_mod_slash_Shc_star_Grb2_minus_Gab1_PI3K_clx_slash_Phospho_1_k1*PI3K_mod_slash_PIP2*TrKB_mod_slash_Shc_star_Grb2_minus_Gab1_PI3K_clx - TrKB_mod_slash_Shc_star_Grb2_minus_Gab1_PI3K_clx_slash_Phospho_1_k2*TrKB_mod_slash_Shc_star_Grb2_minus_Gab1_PI3K_clx_slash_Phospho_slash_Phospho_cplx;
    TrKB_mod_slash_Shc_star_Grb2_minus_Gab1_PI3K_clx_slash_Phospho_1_k1 = 4.999993e-12 vol_uMINVsecINV; TrKB_mod_slash_Shc_star_Grb2_minus_Gab1_PI3K_clx_slash_Phospho_1_k2 = 1.599947e-11 vol_secINV;
  // k3*TrKB_mod_slash_Shc_star_Grb2_minus_Gab1_PI3K_clx_slash_Phospho_slash_Phospho_cplx
  TrKB_mod_slash_Shc_star_Grb2_minus_Gab1_PI3K_clx_slash_Phospho_2: TrKB_mod_slash_Shc_star_Grb2_minus_Gab1_PI3K_clx_slash_Phospho_slash_Phospho_cplx => PIP3 + TrKB_mod_slash_Shc_star_Grb2_minus_Gab1_PI3K_clx; TrKB_mod_slash_Shc_star_Grb2_minus_Gab1_PI3K_clx_slash_Phospho_2_k3*TrKB_mod_slash_Shc_star_Grb2_minus_Gab1_PI3K_clx_slash_Phospho_slash_Phospho_cplx;
    TrKB_mod_slash_Shc_star_Grb2_minus_Gab1_PI3K_clx_slash_Phospho_2_k3 = 3.999867e-12 vol_secINV;
  // k1*PI3K_mod_slash_PIP2*PI3K_mod_slash_PI3K_basal-k2*PI3K_mod_slash_PI3K_basal_slash_basal_phosp_slash_basal_phosp_cplx
  PI3K_mod_slash_PI3K_basal_slash_basal_phosp_1: $PI3K_mod_slash_PIP2 + PI3K_mod_slash_PI3K_basal -> PI3K_mod_slash_PI3K_basal_slash_basal_phosp_slash_basal_phosp_cplx; PI3K_mod_slash_PI3K_basal_slash_basal_phosp_1_k1*PI3K_mod_slash_PIP2*PI3K_mod_slash_PI3K_basal - PI3K_mod_slash_PI3K_basal_slash_basal_phosp_1_k2*PI3K_mod_slash_PI3K_basal_slash_basal_phosp_slash_basal_phosp_cplx;
    PI3K_mod_slash_PI3K_basal_slash_basal_phosp_1_k1 = 4.99998e-12 vol_uMINVsecINV; PI3K_mod_slash_PI3K_basal_slash_basal_phosp_1_k2 = 1.6e-11 vol_secINV;
  // k3*PI3K_mod_slash_PI3K_basal_slash_basal_phosp_slash_basal_phosp_cplx
  PI3K_mod_slash_PI3K_basal_slash_basal_phosp_2: PI3K_mod_slash_PI3K_basal_slash_basal_phosp_slash_basal_phosp_cplx => PIP3 + PI3K_mod_slash_PI3K_basal; PI3K_mod_slash_PI3K_basal_slash_basal_phosp_2_k3*PI3K_mod_slash_PI3K_basal_slash_basal_phosp_slash_basal_phosp_cplx;
    PI3K_mod_slash_PI3K_basal_slash_basal_phosp_2_k3 = 4e-12 vol_secINV;
  // k1*PLC_g*PLCg_basal-k2*PLCg_basal_slash_PLC_g_phospho_slash_PLC_g_phospho_cplx
  PLCg_basal_slash_PLC_g_phospho_1: PLC_g + PLCg_basal -> PLCg_basal_slash_PLC_g_phospho_slash_PLC_g_phospho_cplx; PLCg_basal_slash_PLC_g_phospho_1_k1*PLC_g*PLCg_basal - PLCg_basal_slash_PLC_g_phospho_1_k2*PLCg_basal_slash_PLC_g_phospho_slash_PLC_g_phospho_cplx;
    PLCg_basal_slash_PLC_g_phospho_1_k1 = 8.3334e-12 vol_uMINVsecINV; PLCg_basal_slash_PLC_g_phospho_1_k2 = 2e-12 vol_secINV;
  // k3*PLCg_basal_slash_PLC_g_phospho_slash_PLC_g_phospho_cplx
  PLCg_basal_slash_PLC_g_phospho_2: PLCg_basal_slash_PLC_g_phospho_slash_PLC_g_phospho_cplx => PLC_g_star + PLCg_basal; PLCg_basal_slash_PLC_g_phospho_2_k3*PLCg_basal_slash_PLC_g_phospho_slash_PLC_g_phospho_cplx;
    PLCg_basal_slash_PLC_g_phospho_2_k3 = 5e-13 vol_secINV;
  // k1*Rheb_minus_GTP*TSC1_minus_TSC2-k2*TSC1_minus_TSC2_slash_TSC2phospho_slash_TSC2phospho_cplx
  TSC1_minus_TSC2_slash_TSC2phospho_1: Rheb_minus_GTP + TSC1_minus_TSC2 -> TSC1_minus_TSC2_slash_TSC2phospho_slash_TSC2phospho_cplx; TSC1_minus_TSC2_slash_TSC2phospho_1_k1*Rheb_minus_GTP*TSC1_minus_TSC2 - TSC1_minus_TSC2_slash_TSC2phospho_1_k2*TSC1_minus_TSC2_slash_TSC2phospho_slash_TSC2phospho_cplx;
    TSC1_minus_TSC2_slash_TSC2phospho_1_k1 = 3.33336e-10 vol_uMINVsecINV; TSC1_minus_TSC2_slash_TSC2phospho_1_k2 = 8e-11 vol_secINV;
  // k3*TSC1_minus_TSC2_slash_TSC2phospho_slash_TSC2phospho_cplx
  TSC1_minus_TSC2_slash_TSC2phospho_2: TSC1_minus_TSC2_slash_TSC2phospho_slash_TSC2phospho_cplx => Rheb_minus_GDP + TSC1_minus_TSC2; TSC1_minus_TSC2_slash_TSC2phospho_2_k3*TSC1_minus_TSC2_slash_TSC2phospho_slash_TSC2phospho_cplx;
    TSC1_minus_TSC2_slash_TSC2phospho_2_k3 = 2e-11 vol_secINV;
  // k1*S6Kinase_slash_S6K_star*TOR_Rheb_minus_GTP_clx-k2*TOR_Rheb_minus_GTP_clx_slash_S6K_phospho_slash_S6K_phospho_cplx
  TOR_Rheb_minus_GTP_clx_slash_S6K_phospho_1: S6Kinase_slash_S6K_star + TOR_Rheb_minus_GTP_clx -> TOR_Rheb_minus_GTP_clx_slash_S6K_phospho_slash_S6K_phospho_cplx; TOR_Rheb_minus_GTP_clx_slash_S6K_phospho_1_k1*S6Kinase_slash_S6K_star*TOR_Rheb_minus_GTP_clx - TOR_Rheb_minus_GTP_clx_slash_S6K_phospho_1_k2*TOR_Rheb_minus_GTP_clx_slash_S6K_phospho_slash_S6K_phospho_cplx;
    TOR_Rheb_minus_GTP_clx_slash_S6K_phospho_1_k1 = 3.749995e-13 vol_uMINVsecINV; TOR_Rheb_minus_GTP_clx_slash_S6K_phospho_1_k2 = 2.4e-13 vol_secINV;
  // k3*TOR_Rheb_minus_GTP_clx_slash_S6K_phospho_slash_S6K_phospho_cplx
  TOR_Rheb_minus_GTP_clx_slash_S6K_phospho_2: TOR_Rheb_minus_GTP_clx_slash_S6K_phospho_slash_S6K_phospho_cplx => S6Kinase_slash_S6K_thr_minus_412 + TOR_Rheb_minus_GTP_clx; TOR_Rheb_minus_GTP_clx_slash_S6K_phospho_2_k3*TOR_Rheb_minus_GTP_clx_slash_S6K_phospho_slash_S6K_phospho_cplx;
    TOR_Rheb_minus_GTP_clx_slash_S6K_phospho_2_k3 = 6e-14 vol_secINV;
  // k1*num_4E_minus_BP_mod_slash_eIF4E_minus_BP*TOR_Rheb_minus_GTP_clx-k2*TOR_Rheb_minus_GTP_clx_slash_TOR_4E_minus_BP_phospho_slash_TOR_4E_minus_BP_phospho_cplx
  TOR_Rheb_minus_GTP_clx_slash_TOR_4E_minus_BP_phospho_1: num_4E_minus_BP_mod_slash_eIF4E_minus_BP + TOR_Rheb_minus_GTP_clx -> TOR_Rheb_minus_GTP_clx_slash_TOR_4E_minus_BP_phospho_slash_TOR_4E_minus_BP_phospho_cplx; TOR_Rheb_minus_GTP_clx_slash_TOR_4E_minus_BP_phospho_1_k1*num_4E_minus_BP_mod_slash_eIF4E_minus_BP*TOR_Rheb_minus_GTP_clx - TOR_Rheb_minus_GTP_clx_slash_TOR_4E_minus_BP_phospho_1_k2*TOR_Rheb_minus_GTP_clx_slash_TOR_4E_minus_BP_phospho_slash_TOR_4E_minus_BP_phospho_cplx;
    TOR_Rheb_minus_GTP_clx_slash_TOR_4E_minus_BP_phospho_1_k1 = 2.77776e-12 vol_uMINVsecINV; TOR_Rheb_minus_GTP_clx_slash_TOR_4E_minus_BP_phospho_1_k2 = 4e-12 vol_secINV;
  // k3*TOR_Rheb_minus_GTP_clx_slash_TOR_4E_minus_BP_phospho_slash_TOR_4E_minus_BP_phospho_cplx
  TOR_Rheb_minus_GTP_clx_slash_TOR_4E_minus_BP_phospho_2: TOR_Rheb_minus_GTP_clx_slash_TOR_4E_minus_BP_phospho_slash_TOR_4E_minus_BP_phospho_cplx => num_4E_minus_BP_mod_slash_eIF4E_minus_BP_thr37_46 + TOR_Rheb_minus_GTP_clx; TOR_Rheb_minus_GTP_clx_slash_TOR_4E_minus_BP_phospho_2_k3*TOR_Rheb_minus_GTP_clx_slash_TOR_4E_minus_BP_phospho_slash_TOR_4E_minus_BP_phospho_cplx;
    TOR_Rheb_minus_GTP_clx_slash_TOR_4E_minus_BP_phospho_2_k3 = 1e-12 vol_secINV;
  // k1*num_4E_minus_BP_mod_slash_4E_minus_BP*TOR_Rheb_minus_GTP_clx-k2*TOR_Rheb_minus_GTP_clx_slash_TOR_4E_minus_BP_star_slash_TOR_4E_minus_BP_star_cplx
  TOR_Rheb_minus_GTP_clx_slash_TOR_4E_minus_BP_star_1: num_4E_minus_BP_mod_slash_4E_minus_BP + TOR_Rheb_minus_GTP_clx -> TOR_Rheb_minus_GTP_clx_slash_TOR_4E_minus_BP_star_slash_TOR_4E_minus_BP_star_cplx; TOR_Rheb_minus_GTP_clx_slash_TOR_4E_minus_BP_star_1_k1*num_4E_minus_BP_mod_slash_4E_minus_BP*TOR_Rheb_minus_GTP_clx - TOR_Rheb_minus_GTP_clx_slash_TOR_4E_minus_BP_star_1_k2*TOR_Rheb_minus_GTP_clx_slash_TOR_4E_minus_BP_star_slash_TOR_4E_minus_BP_star_cplx;
    TOR_Rheb_minus_GTP_clx_slash_TOR_4E_minus_BP_star_1_k1 = 2.77776e-12 vol_uMINVsecINV; TOR_Rheb_minus_GTP_clx_slash_TOR_4E_minus_BP_star_1_k2 = 4e-12 vol_secINV;
  // k3*TOR_Rheb_minus_GTP_clx_slash_TOR_4E_minus_BP_star_slash_TOR_4E_minus_BP_star_cplx
  TOR_Rheb_minus_GTP_clx_slash_TOR_4E_minus_BP_star_2: TOR_Rheb_minus_GTP_clx_slash_TOR_4E_minus_BP_star_slash_TOR_4E_minus_BP_star_cplx => num_4E_minus_BP_t37_46 + TOR_Rheb_minus_GTP_clx; TOR_Rheb_minus_GTP_clx_slash_TOR_4E_minus_BP_star_2_k3*TOR_Rheb_minus_GTP_clx_slash_TOR_4E_minus_BP_star_slash_TOR_4E_minus_BP_star_cplx;
    TOR_Rheb_minus_GTP_clx_slash_TOR_4E_minus_BP_star_2_k3 = 1e-12 vol_secINV;
  // k1*S6Kinase_slash_40S_inact*S6Kinase_slash_S6K_thr_minus_412-k2*S6Kinase_slash_S6K_thr_minus_412_slash_S6_phos_slash_S6_phos_cplx
  S6Kinase_slash_S6K_thr_minus_412_slash_S6_phos_1: $S6Kinase_slash_40S_inact + S6Kinase_slash_S6K_thr_minus_412 -> S6Kinase_slash_S6K_thr_minus_412_slash_S6_phos_slash_S6_phos_cplx; S6Kinase_slash_S6K_thr_minus_412_slash_S6_phos_1_k1*S6Kinase_slash_40S_inact*S6Kinase_slash_S6K_thr_minus_412 - S6Kinase_slash_S6K_thr_minus_412_slash_S6_phos_1_k2*S6Kinase_slash_S6K_thr_minus_412_slash_S6_phos_slash_S6_phos_cplx;
    S6Kinase_slash_S6K_thr_minus_412_slash_S6_phos_1_k1 = 1.999973e-13 vol_uMINVsecINV; S6Kinase_slash_S6K_thr_minus_412_slash_S6_phos_1_k2 = 3.999867e-14 vol_secINV;
  // k3*S6Kinase_slash_S6K_thr_minus_412_slash_S6_phos_slash_S6_phos_cplx
  S6Kinase_slash_S6K_thr_minus_412_slash_S6_phos_2: S6Kinase_slash_S6K_thr_minus_412_slash_S6_phos_slash_S6_phos_cplx => num_40S + S6Kinase_slash_S6K_thr_minus_412; S6Kinase_slash_S6K_thr_minus_412_slash_S6_phos_2_k3*S6Kinase_slash_S6K_thr_minus_412_slash_S6_phos_slash_S6_phos_cplx;
    S6Kinase_slash_S6K_thr_minus_412_slash_S6_phos_2_k3 = 9.999667e-15 vol_secINV;
  // k1*CaMKIII*S6K_thr_minus_252-k2*S6K_thr_minus_252_slash_camkIII_phospho_slash_camkIII_phospho_cplx
  S6K_thr_minus_252_slash_camkIII_phospho_1: CaMKIII + S6K_thr_minus_252 -> S6K_thr_minus_252_slash_camkIII_phospho_slash_camkIII_phospho_cplx; S6K_thr_minus_252_slash_camkIII_phospho_1_k1*CaMKIII*S6K_thr_minus_252 - S6K_thr_minus_252_slash_camkIII_phospho_1_k2*S6K_thr_minus_252_slash_camkIII_phospho_slash_camkIII_phospho_cplx;
    S6K_thr_minus_252_slash_camkIII_phospho_1_k1 = 4.99998e-12 vol_uMINVsecINV; S6K_thr_minus_252_slash_camkIII_phospho_1_k2 = 4e-12 vol_secINV;
  // k3*S6K_thr_minus_252_slash_camkIII_phospho_slash_camkIII_phospho_cplx
  S6K_thr_minus_252_slash_camkIII_phospho_2: S6K_thr_minus_252_slash_camkIII_phospho_slash_camkIII_phospho_cplx => CaMKIII_star + S6K_thr_minus_252; S6K_thr_minus_252_slash_camkIII_phospho_2_k3*S6K_thr_minus_252_slash_camkIII_phospho_slash_camkIII_phospho_cplx;
    S6K_thr_minus_252_slash_camkIII_phospho_2_k3 = 1e-12 vol_secINV;
  // k1*S6Kinase_slash_40S_inact*S6K_thr_minus_252-k2*S6K_thr_minus_252_slash_S6_phospho_slash_S6_phospho_cplx
  S6K_thr_minus_252_slash_S6_phospho_1: $S6Kinase_slash_40S_inact + S6K_thr_minus_252 -> S6K_thr_minus_252_slash_S6_phospho_slash_S6_phospho_cplx; S6K_thr_minus_252_slash_S6_phospho_1_k1*S6Kinase_slash_40S_inact*S6K_thr_minus_252 - S6K_thr_minus_252_slash_S6_phospho_1_k2*S6K_thr_minus_252_slash_S6_phospho_slash_S6_phospho_cplx;
    S6K_thr_minus_252_slash_S6_phospho_1_k1 = 1.99998e-12 vol_uMINVsecINV; S6K_thr_minus_252_slash_S6_phospho_1_k2 = 4e-13 vol_secINV;
  // k3*S6K_thr_minus_252_slash_S6_phospho_slash_S6_phospho_cplx
  S6K_thr_minus_252_slash_S6_phospho_2: S6K_thr_minus_252_slash_S6_phospho_slash_S6_phospho_cplx => num_40S + S6K_thr_minus_252; S6K_thr_minus_252_slash_S6_phospho_2_k3*S6K_thr_minus_252_slash_S6_phospho_slash_S6_phospho_cplx;
    S6K_thr_minus_252_slash_S6_phospho_2_k3 = 1e-13 vol_secINV;
  // k1*eEF2*CaMKIII_CaM_minus_Ca4-k2*CaMKIII_CaM_minus_Ca4_slash_phospho_slash_phospho_cplx
  CaMKIII_CaM_minus_Ca4_slash_phospho_1: eEF2 + CaMKIII_CaM_minus_Ca4 -> CaMKIII_CaM_minus_Ca4_slash_phospho_slash_phospho_cplx; CaMKIII_CaM_minus_Ca4_slash_phospho_1_k1*eEF2*CaMKIII_CaM_minus_Ca4 - CaMKIII_CaM_minus_Ca4_slash_phospho_1_k2*CaMKIII_CaM_minus_Ca4_slash_phospho_slash_phospho_cplx;
    CaMKIII_CaM_minus_Ca4_slash_phospho_1_k1 = 2.50002e-11 vol_uMINVsecINV; CaMKIII_CaM_minus_Ca4_slash_phospho_1_k2 = 4e-11 vol_secINV;
  // k3*CaMKIII_CaM_minus_Ca4_slash_phospho_slash_phospho_cplx
  CaMKIII_CaM_minus_Ca4_slash_phospho_2: CaMKIII_CaM_minus_Ca4_slash_phospho_slash_phospho_cplx => eEFthr_minus_56 + CaMKIII_CaM_minus_Ca4; CaMKIII_CaM_minus_Ca4_slash_phospho_2_k3*CaMKIII_CaM_minus_Ca4_slash_phospho_slash_phospho_cplx;
    CaMKIII_CaM_minus_Ca4_slash_phospho_2_k3 = 1e-11 vol_secINV;
  // k1*eEF2*CaMKIII_basal-k2*CaMKIII_basal_slash_eEF2thr56_basal_slash_eEF2thr56_basal_cplx
  CaMKIII_basal_slash_eEF2thr56_basal_1: eEF2 + CaMKIII_basal -> CaMKIII_basal_slash_eEF2thr56_basal_slash_eEF2thr56_basal_cplx; CaMKIII_basal_slash_eEF2thr56_basal_1_k1*eEF2*CaMKIII_basal - CaMKIII_basal_slash_eEF2thr56_basal_1_k2*CaMKIII_basal_slash_eEF2thr56_basal_slash_eEF2thr56_basal_cplx;
    CaMKIII_basal_slash_eEF2thr56_basal_1_k1 = 2.50002e-11 vol_uMINVsecINV; CaMKIII_basal_slash_eEF2thr56_basal_1_k2 = 4e-11 vol_secINV;
  // k3*CaMKIII_basal_slash_eEF2thr56_basal_slash_eEF2thr56_basal_cplx
  CaMKIII_basal_slash_eEF2thr56_basal_2: CaMKIII_basal_slash_eEF2thr56_basal_slash_eEF2thr56_basal_cplx => eEFthr_minus_56 + CaMKIII_basal; CaMKIII_basal_slash_eEF2thr56_basal_2_k3*CaMKIII_basal_slash_eEF2thr56_basal_slash_eEF2thr56_basal_cplx;
    CaMKIII_basal_slash_eEF2thr56_basal_2_k3 = 1e-11 vol_secINV;
  // k1*CaMKIII*S6K_basal-k2*S6K_basal_slash_CaMKIII_basal_slash_CaMKIII_basal_cplx
  S6K_basal_slash_CaMKIII_basal_1: CaMKIII + S6K_basal -> S6K_basal_slash_CaMKIII_basal_slash_CaMKIII_basal_cplx; S6K_basal_slash_CaMKIII_basal_1_k1*CaMKIII*S6K_basal - S6K_basal_slash_CaMKIII_basal_1_k2*S6K_basal_slash_CaMKIII_basal_slash_CaMKIII_basal_cplx;
    S6K_basal_slash_CaMKIII_basal_1_k1 = 5.00052e-11 vol_uMINVsecINV; S6K_basal_slash_CaMKIII_basal_1_k2 = 4e-11 vol_secINV;
  // k3*S6K_basal_slash_CaMKIII_basal_slash_CaMKIII_basal_cplx
  S6K_basal_slash_CaMKIII_basal_2: S6K_basal_slash_CaMKIII_basal_slash_CaMKIII_basal_cplx => CaMKIII_star + S6K_basal; S6K_basal_slash_CaMKIII_basal_2_k3*S6K_basal_slash_CaMKIII_basal_slash_CaMKIII_basal_cplx;
    S6K_basal_slash_CaMKIII_basal_2_k3 = 1e-11 vol_secINV;
  // k1*AA*Translation_clx-k2*Translation_clx_slash_pro_syn_slash_pro_syn_cplx
  Translation_clx_slash_pro_syn_1: $AA + Translation_clx -> Translation_clx_slash_pro_syn_slash_pro_syn_cplx; Translation_clx_slash_pro_syn_1_k1*AA*Translation_clx - Translation_clx_slash_pro_syn_1_k2*Translation_clx_slash_pro_syn_slash_pro_syn_cplx;
    Translation_clx_slash_pro_syn_1_k1 = 1.81824e-12 vol_uMINVsecINV; Translation_clx_slash_pro_syn_1_k2 = 8e-14 vol_secINV;
  // k3*Translation_clx_slash_pro_syn_slash_pro_syn_cplx
  Translation_clx_slash_pro_syn_2: Translation_clx_slash_pro_syn_slash_pro_syn_cplx => peptide + Translation_clx; Translation_clx_slash_pro_syn_2_k3*Translation_clx_slash_pro_syn_slash_pro_syn_cplx;
    Translation_clx_slash_pro_syn_2_k3 = 2e-14 vol_secINV;
  // k1*rad_AA*Translation_clx-k2*Translation_clx_slash_rad_pro_syn_slash_rad_pro_syn_cplx
  Translation_clx_slash_rad_pro_syn_1: rad_AA + Translation_clx -> Translation_clx_slash_rad_pro_syn_slash_rad_pro_syn_cplx; Translation_clx_slash_rad_pro_syn_1_k1*rad_AA*Translation_clx - Translation_clx_slash_rad_pro_syn_1_k2*Translation_clx_slash_rad_pro_syn_slash_rad_pro_syn_cplx;
    Translation_clx_slash_rad_pro_syn_1_k1 = 1.66668e-12 vol_uMINVsecINV; Translation_clx_slash_rad_pro_syn_1_k2 = 8e-14 vol_secINV;
  // k3*Translation_clx_slash_rad_pro_syn_slash_rad_pro_syn_cplx
  Translation_clx_slash_rad_pro_syn_2: Translation_clx_slash_rad_pro_syn_slash_rad_pro_syn_cplx => rad_peptide + Translation_clx; Translation_clx_slash_rad_pro_syn_2_k3*Translation_clx_slash_rad_pro_syn_slash_rad_pro_syn_cplx;
    Translation_clx_slash_rad_pro_syn_2_k3 = 2e-14 vol_secINV;
  // k1*S6Kinase_slash_S6K*MAPK_star-k2*MAPK_star_slash_cluster_phospho_S6K_slash_cluster_phospho_S6K_cplx
  MAPK_star_slash_cluster_phospho_S6K_1: S6Kinase_slash_S6K + MAPK_star -> MAPK_star_slash_cluster_phospho_S6K_slash_cluster_phospho_S6K_cplx; MAPK_star_slash_cluster_phospho_S6K_1_k1*S6Kinase_slash_S6K*MAPK_star - MAPK_star_slash_cluster_phospho_S6K_1_k2*MAPK_star_slash_cluster_phospho_S6K_slash_cluster_phospho_S6K_cplx;
    MAPK_star_slash_cluster_phospho_S6K_1_k1 = 2.8902e-13 vol_uMINVsecINV; MAPK_star_slash_cluster_phospho_S6K_1_k2 = 4e-12 vol_secINV;
  // k3*MAPK_star_slash_cluster_phospho_S6K_slash_cluster_phospho_S6K_cplx
  MAPK_star_slash_cluster_phospho_S6K_2: MAPK_star_slash_cluster_phospho_S6K_slash_cluster_phospho_S6K_cplx => S6Kinase_slash_S6K_star + MAPK_star; MAPK_star_slash_cluster_phospho_S6K_2_k3*MAPK_star_slash_cluster_phospho_S6K_slash_cluster_phospho_S6K_cplx;
    MAPK_star_slash_cluster_phospho_S6K_2_k3 = 1e-12 vol_secINV;
  // k1*MAPK_slash_craf_minus_1_star*MAPK_star-k2*MAPK_star_slash_MAPK_star_minus_feedback_slash_MAPK_star_minus_feedback_cplx
  // Ueki et al JBC 269(22):15756-15761 show the presence of this step, but not the rate consts, which are derived from Sanghera et al JBC 265(1):52-57, 1990, see the deriv in the MAPK_star notes.
  MAPK_star_slash_MAPK_star_minus_feedback_1: MAPK_slash_craf_minus_1_star + MAPK_star -> MAPK_star_slash_MAPK_star_minus_feedback_slash_MAPK_star_minus_feedback_cplx; MAPK_star_slash_MAPK_star_minus_feedback_1_k1*MAPK_slash_craf_minus_1_star*MAPK_star - MAPK_star_slash_MAPK_star_minus_feedback_1_k2*MAPK_star_slash_MAPK_star_minus_feedback_slash_MAPK_star_minus_feedback_cplx;
    MAPK_star_slash_MAPK_star_minus_feedback_1_k1 = 1.95e-12 vol_uMINVsecINV; MAPK_star_slash_MAPK_star_minus_feedback_1_k2 = 4e-11 vol_secINV;
  // k3*MAPK_star_slash_MAPK_star_minus_feedback_slash_MAPK_star_minus_feedback_cplx
  MAPK_star_slash_MAPK_star_minus_feedback_2: MAPK_star_slash_MAPK_star_minus_feedback_slash_MAPK_star_minus_feedback_cplx => MAPK_slash_craf_minus_1_star_star + MAPK_star; MAPK_star_slash_MAPK_star_minus_feedback_2_k3*MAPK_star_slash_MAPK_star_minus_feedback_slash_MAPK_star_minus_feedback_cplx;
    MAPK_star_slash_MAPK_star_minus_feedback_2_k3 = 1e-11 vol_secINV;
  // k1*Sos_slash_Sos*MAPK_star-k2*MAPK_star_slash_phosph_Sos_slash_phosph_Sos_cplx
  // See Porfiri and McCormick JBC 271:10 pp5871 1996 for the existence of this step. We\'ll take the rates from the ones used for the phosph of Raf by MAPK. Sep 17 1997: The transient activation curve matches better with k1 up by 10 x.
  MAPK_star_slash_phosph_Sos_1: Sos_slash_Sos + MAPK_star -> MAPK_star_slash_phosph_Sos_slash_phosph_Sos_cplx; MAPK_star_slash_phosph_Sos_1_k1*Sos_slash_Sos*MAPK_star - MAPK_star_slash_phosph_Sos_1_k2*MAPK_star_slash_phosph_Sos_slash_phosph_Sos_cplx;
    MAPK_star_slash_phosph_Sos_1_k1 = 1.95e-11 vol_uMINVsecINV; MAPK_star_slash_phosph_Sos_1_k2 = 4e-11 vol_secINV;
  // k3*MAPK_star_slash_phosph_Sos_slash_phosph_Sos_cplx
  MAPK_star_slash_phosph_Sos_2: MAPK_star_slash_phosph_Sos_slash_phosph_Sos_cplx => Sos_slash_Sos_star + MAPK_star; MAPK_star_slash_phosph_Sos_2_k3*MAPK_star_slash_phosph_Sos_slash_phosph_Sos_cplx;
    MAPK_star_slash_phosph_Sos_2_k3 = 1e-11 vol_secINV;
  // k1*num_4E_minus_BP_t37_46*MAPK_star-k2*MAPK_star_slash_MAPK_4E_minus_BP_star_star_slash_MAPK_4E_minus_BP_star_star_cplx
  MAPK_star_slash_MAPK_4E_minus_BP_star_star_1: num_4E_minus_BP_t37_46 + MAPK_star -> MAPK_star_slash_MAPK_4E_minus_BP_star_star_slash_MAPK_4E_minus_BP_star_star_cplx; MAPK_star_slash_MAPK_4E_minus_BP_star_star_1_k1*num_4E_minus_BP_t37_46*MAPK_star - MAPK_star_slash_MAPK_4E_minus_BP_star_star_1_k2*MAPK_star_slash_MAPK_4E_minus_BP_star_star_slash_MAPK_4E_minus_BP_star_star_cplx;
    MAPK_star_slash_MAPK_4E_minus_BP_star_star_1_k1 = 4.46928e-14 vol_uMINVsecINV; MAPK_star_slash_MAPK_4E_minus_BP_star_star_1_k2 = 6.4e-13 vol_secINV;
  // k3*MAPK_star_slash_MAPK_4E_minus_BP_star_star_slash_MAPK_4E_minus_BP_star_star_cplx
  MAPK_star_slash_MAPK_4E_minus_BP_star_star_2: MAPK_star_slash_MAPK_4E_minus_BP_star_star_slash_MAPK_4E_minus_BP_star_star_cplx => num_4E_minus_BP_mod_slash_4E_minus_BP_thr37_46_s65 + MAPK_star; MAPK_star_slash_MAPK_4E_minus_BP_star_star_2_k3*MAPK_star_slash_MAPK_4E_minus_BP_star_star_slash_MAPK_4E_minus_BP_star_star_cplx;
    MAPK_star_slash_MAPK_4E_minus_BP_star_star_2_k3 = 1.6e-13 vol_secINV;
  // k1*num_4E_minus_BP_mod_slash_eIF4E_minus_BP_thr37_46*MAPK_star-k2*MAPK_star_slash_MAPK_4E_minus_BP_phospho_slash_MAPK_4E_minus_BP_phospho_cplx
  MAPK_star_slash_MAPK_4E_minus_BP_phospho_1: num_4E_minus_BP_mod_slash_eIF4E_minus_BP_thr37_46 + MAPK_star -> MAPK_star_slash_MAPK_4E_minus_BP_phospho_slash_MAPK_4E_minus_BP_phospho_cplx; MAPK_star_slash_MAPK_4E_minus_BP_phospho_1_k1*num_4E_minus_BP_mod_slash_eIF4E_minus_BP_thr37_46*MAPK_star - MAPK_star_slash_MAPK_4E_minus_BP_phospho_1_k2*MAPK_star_slash_MAPK_4E_minus_BP_phospho_slash_MAPK_4E_minus_BP_phospho_cplx;
    MAPK_star_slash_MAPK_4E_minus_BP_phospho_1_k1 = 4.46928e-14 vol_uMINVsecINV; MAPK_star_slash_MAPK_4E_minus_BP_phospho_1_k2 = 6.4e-13 vol_secINV;
  // k3*MAPK_star_slash_MAPK_4E_minus_BP_phospho_slash_MAPK_4E_minus_BP_phospho_cplx
  MAPK_star_slash_MAPK_4E_minus_BP_phospho_2: MAPK_star_slash_MAPK_4E_minus_BP_phospho_slash_MAPK_4E_minus_BP_phospho_cplx => num_4E_minus_BP_mod_slash_eIF4E_4E_minus_BP_t37_46_s65 + MAPK_star; MAPK_star_slash_MAPK_4E_minus_BP_phospho_2_k3*MAPK_star_slash_MAPK_4E_minus_BP_phospho_slash_MAPK_4E_minus_BP_phospho_cplx;
    MAPK_star_slash_MAPK_4E_minus_BP_phospho_2_k3 = 1.6e-13 vol_secINV;
  // k1*MAPK_slash_craf_minus_1*PKC_minus_active-k2*PKC_minus_active_slash_PKC_minus_act_minus_raf_slash_PKC_minus_act_minus_raf_cplx
  // Rate consts from Chen et al Biochem 32, 1032 (1993) k3 = k2 = 4 k1 = 9e-5 recalculated gives 1.666e-5, which is not very different. Looks like k3 is rate-limiting in this case: there is a huge amount of craf locked up in the enz complex. Let us assume a 10x higher Km, ie, lower affinity. k1 drops by 10x. Also changed k2 to 4x k3. Lowerd k1 to 1e-6 to balance 10X DAG sensitivity of PKC
  PKC_minus_active_slash_PKC_minus_act_minus_raf_1: MAPK_slash_craf_minus_1 + PKC_minus_active -> PKC_minus_active_slash_PKC_minus_act_minus_raf_slash_PKC_minus_act_minus_raf_cplx; PKC_minus_active_slash_PKC_minus_act_minus_raf_1_k1*MAPK_slash_craf_minus_1*PKC_minus_active - PKC_minus_active_slash_PKC_minus_act_minus_raf_1_k2*PKC_minus_active_slash_PKC_minus_act_minus_raf_slash_PKC_minus_act_minus_raf_cplx;
    PKC_minus_active_slash_PKC_minus_act_minus_raf_1_k1 = 9.9996e-13 vol_uMINVsecINV; PKC_minus_active_slash_PKC_minus_act_minus_raf_1_k2 = 1.6e-11 vol_secINV;
  // k3*PKC_minus_active_slash_PKC_minus_act_minus_raf_slash_PKC_minus_act_minus_raf_cplx
  PKC_minus_active_slash_PKC_minus_act_minus_raf_2: PKC_minus_active_slash_PKC_minus_act_minus_raf_slash_PKC_minus_act_minus_raf_cplx => MAPK_slash_craf_minus_1_star + PKC_minus_active; PKC_minus_active_slash_PKC_minus_act_minus_raf_2_k3*PKC_minus_active_slash_PKC_minus_act_minus_raf_slash_PKC_minus_act_minus_raf_cplx;
    PKC_minus_active_slash_PKC_minus_act_minus_raf_2_k3 = 4e-12 vol_secINV;
  // k1*Ras_slash_GAP*PKC_minus_active-k2*PKC_minus_active_slash_PKC_minus_inact_minus_GAP_slash_PKC_minus_inact_minus_GAP_cplx
  // Rate consts copied from PCK-act-raf This reaction inactivates GAP. The idea is from the Boguski and McCormick review.
  PKC_minus_active_slash_PKC_minus_inact_minus_GAP_1: Ras_slash_GAP + PKC_minus_active -> PKC_minus_active_slash_PKC_minus_inact_minus_GAP_slash_PKC_minus_inact_minus_GAP_cplx; PKC_minus_active_slash_PKC_minus_inact_minus_GAP_1_k1*Ras_slash_GAP*PKC_minus_active - PKC_minus_active_slash_PKC_minus_inact_minus_GAP_1_k2*PKC_minus_active_slash_PKC_minus_inact_minus_GAP_slash_PKC_minus_inact_minus_GAP_cplx;
    PKC_minus_active_slash_PKC_minus_inact_minus_GAP_1_k1 = 6e-12 vol_uMINVsecINV; PKC_minus_active_slash_PKC_minus_inact_minus_GAP_1_k2 = 1.6e-11 vol_secINV;
  // k3*PKC_minus_active_slash_PKC_minus_inact_minus_GAP_slash_PKC_minus_inact_minus_GAP_cplx
  PKC_minus_active_slash_PKC_minus_inact_minus_GAP_2: PKC_minus_active_slash_PKC_minus_inact_minus_GAP_slash_PKC_minus_inact_minus_GAP_cplx => Ras_slash_GAP_star + PKC_minus_active; PKC_minus_active_slash_PKC_minus_inact_minus_GAP_2_k3*PKC_minus_active_slash_PKC_minus_inact_minus_GAP_slash_PKC_minus_inact_minus_GAP_cplx;
    PKC_minus_active_slash_PKC_minus_inact_minus_GAP_2_k3 = 4e-12 vol_secINV;
  // k1*Ras_slash_inact_minus_GEF*PKC_minus_active-k2*PKC_minus_active_slash_PKC_minus_act_minus_GEF_slash_PKC_minus_act_minus_GEF_cplx
  // Rate consts from PKC-act-raf. This reaction activates GEF. It can lead to at least 2X stim of ras, and a 2X stim of MAPK over and above that obtained via direct phosph of c-raf. Note that it is a push-pull reaction, and there is also a contribution through the phosphorylation and inactivation of GAPs. The original PKC-act-raf rate consts are too fast. We lower K1 by 10 X
  PKC_minus_active_slash_PKC_minus_act_minus_GEF_1: Ras_slash_inact_minus_GEF + PKC_minus_active -> PKC_minus_active_slash_PKC_minus_act_minus_GEF_slash_PKC_minus_act_minus_GEF_cplx; PKC_minus_active_slash_PKC_minus_act_minus_GEF_1_k1*Ras_slash_inact_minus_GEF*PKC_minus_active - PKC_minus_active_slash_PKC_minus_act_minus_GEF_1_k2*PKC_minus_active_slash_PKC_minus_act_minus_GEF_slash_PKC_minus_act_minus_GEF_cplx;
    PKC_minus_active_slash_PKC_minus_act_minus_GEF_1_k1 = 6e-12 vol_uMINVsecINV; PKC_minus_active_slash_PKC_minus_act_minus_GEF_1_k2 = 1.6e-11 vol_secINV;
  // k3*PKC_minus_active_slash_PKC_minus_act_minus_GEF_slash_PKC_minus_act_minus_GEF_cplx
  PKC_minus_active_slash_PKC_minus_act_minus_GEF_2: PKC_minus_active_slash_PKC_minus_act_minus_GEF_slash_PKC_minus_act_minus_GEF_cplx => Ras_slash_GEF_star + PKC_minus_active; PKC_minus_active_slash_PKC_minus_act_minus_GEF_2_k3*PKC_minus_active_slash_PKC_minus_act_minus_GEF_slash_PKC_minus_act_minus_GEF_cplx;
    PKC_minus_active_slash_PKC_minus_act_minus_GEF_2_k3 = 4e-12 vol_secINV;
  // k1*MAPK_slash_MAPK*MAPK_slash_MAPKK_star-k2*MAPK_slash_MAPKK_star_slash_MAPKKtyr_slash_MAPKKtyr_cplx
  // The actual MAPKK is 2 forms from Seger et al JBC 267:20 14373(1992) Vmax = 150nmol/min/mg From Haystead et al FEBS 306(1):17-22 we get Km=46.6nM for at least one of the phosphs. Putting these together: k3=0.15/sec, scale to get k2=0.6. k1=0.75/46.6nM=2.7e-5
  MAPK_slash_MAPKK_star_slash_MAPKKtyr_1: MAPK_slash_MAPK + MAPK_slash_MAPKK_star -> MAPK_slash_MAPKK_star_slash_MAPKKtyr_slash_MAPKKtyr_cplx; MAPK_slash_MAPKK_star_slash_MAPKKtyr_1_k1*MAPK_slash_MAPK*MAPK_slash_MAPKK_star - MAPK_slash_MAPKK_star_slash_MAPKKtyr_1_k2*MAPK_slash_MAPKK_star_slash_MAPKKtyr_slash_MAPKKtyr_cplx;
    MAPK_slash_MAPKK_star_slash_MAPKKtyr_1_k1 = 3.24e-11 vol_uMINVsecINV; MAPK_slash_MAPKK_star_slash_MAPKKtyr_1_k2 = 1.2e-12 vol_secINV;
  // k3*MAPK_slash_MAPKK_star_slash_MAPKKtyr_slash_MAPKKtyr_cplx
  MAPK_slash_MAPKK_star_slash_MAPKKtyr_2: MAPK_slash_MAPKK_star_slash_MAPKKtyr_slash_MAPKKtyr_cplx => MAPK_slash_MAPK_minus_tyr + MAPK_slash_MAPKK_star; MAPK_slash_MAPKK_star_slash_MAPKKtyr_2_k3*MAPK_slash_MAPKK_star_slash_MAPKKtyr_slash_MAPKKtyr_cplx;
    MAPK_slash_MAPKK_star_slash_MAPKKtyr_2_k3 = 3e-13 vol_secINV;
  // k1*MAPK_slash_MAPK_minus_tyr*MAPK_slash_MAPKK_star-k2*MAPK_slash_MAPKK_star_slash_MAPKKthr_slash_MAPKKthr_cplx
  // Rate consts same as for MAPKKtyr.
  MAPK_slash_MAPKK_star_slash_MAPKKthr_1: MAPK_slash_MAPK_minus_tyr + MAPK_slash_MAPKK_star -> MAPK_slash_MAPKK_star_slash_MAPKKthr_slash_MAPKKthr_cplx; MAPK_slash_MAPKK_star_slash_MAPKKthr_1_k1*MAPK_slash_MAPK_minus_tyr*MAPK_slash_MAPKK_star - MAPK_slash_MAPKK_star_slash_MAPKKthr_1_k2*MAPK_slash_MAPKK_star_slash_MAPKKthr_slash_MAPKKthr_cplx;
    MAPK_slash_MAPKK_star_slash_MAPKKthr_1_k1 = 3.24e-11 vol_uMINVsecINV; MAPK_slash_MAPKK_star_slash_MAPKKthr_1_k2 = 1.2e-12 vol_secINV;
  // k3*MAPK_slash_MAPKK_star_slash_MAPKKthr_slash_MAPKKthr_cplx
  MAPK_slash_MAPKK_star_slash_MAPKKthr_2: MAPK_slash_MAPKK_star_slash_MAPKKthr_slash_MAPKKthr_cplx => MAPK_star + MAPK_slash_MAPKK_star; MAPK_slash_MAPKK_star_slash_MAPKKthr_2_k3*MAPK_slash_MAPKK_star_slash_MAPKKthr_slash_MAPKKthr_cplx;
    MAPK_slash_MAPKK_star_slash_MAPKKthr_2_k3 = 3e-13 vol_secINV;
  // k1*MAPK_slash_MAPKK*MAPK_slash_Raf_star_minus_GTP_minus_Ras-k2*MAPK_slash_Raf_star_minus_GTP_minus_Ras_slash_Raf_star_minus_GTP_minus_Ras_dot_1_slash_Raf_star_minus_GTP_minus_Ras_dot_1_cplx
  // Kinetics are the same as for the craf-1_star activity, ie., k1=1.1e-6, k2=.42, k3 =0.105 These are based on Force et al PNAS USA 91 1270-1274 1994. These parms cannot reach the observed 4X stim of MAPK. So lets increase the affinity, ie, raise k1 10X to 1.1e-5 Lets take it back down to where it was. Back up to 5X: 5.5e-6
  MAPK_slash_Raf_star_minus_GTP_minus_Ras_slash_Raf_star_minus_GTP_minus_Ras_dot_1_1: MAPK_slash_MAPKK + MAPK_slash_Raf_star_minus_GTP_minus_Ras -> MAPK_slash_Raf_star_minus_GTP_minus_Ras_slash_Raf_star_minus_GTP_minus_Ras_dot_1_slash_Raf_star_minus_GTP_minus_Ras_dot_1_cplx; MAPK_slash_Raf_star_minus_GTP_minus_Ras_slash_Raf_star_minus_GTP_minus_Ras_dot_1_1_k1*MAPK_slash_MAPKK*MAPK_slash_Raf_star_minus_GTP_minus_Ras - MAPK_slash_Raf_star_minus_GTP_minus_Ras_slash_Raf_star_minus_GTP_minus_Ras_dot_1_1_k2*MAPK_slash_Raf_star_minus_GTP_minus_Ras_slash_Raf_star_minus_GTP_minus_Ras_dot_1_slash_Raf_star_minus_GTP_minus_Ras_dot_1_cplx;
    MAPK_slash_Raf_star_minus_GTP_minus_Ras_slash_Raf_star_minus_GTP_minus_Ras_dot_1_1_k1 = 9.4284e-12 vol_uMINVsecINV; MAPK_slash_Raf_star_minus_GTP_minus_Ras_slash_Raf_star_minus_GTP_minus_Ras_dot_1_1_k2 = 1.2e-12 vol_secINV;
  // k3*MAPK_slash_Raf_star_minus_GTP_minus_Ras_slash_Raf_star_minus_GTP_minus_Ras_dot_1_slash_Raf_star_minus_GTP_minus_Ras_dot_1_cplx
  MAPK_slash_Raf_star_minus_GTP_minus_Ras_slash_Raf_star_minus_GTP_minus_Ras_dot_1_2: MAPK_slash_Raf_star_minus_GTP_minus_Ras_slash_Raf_star_minus_GTP_minus_Ras_dot_1_slash_Raf_star_minus_GTP_minus_Ras_dot_1_cplx => MAPK_slash_MAPKK_minus_ser + MAPK_slash_Raf_star_minus_GTP_minus_Ras; MAPK_slash_Raf_star_minus_GTP_minus_Ras_slash_Raf_star_minus_GTP_minus_Ras_dot_1_2_k3*MAPK_slash_Raf_star_minus_GTP_minus_Ras_slash_Raf_star_minus_GTP_minus_Ras_dot_1_slash_Raf_star_minus_GTP_minus_Ras_dot_1_cplx;
    MAPK_slash_Raf_star_minus_GTP_minus_Ras_slash_Raf_star_minus_GTP_minus_Ras_dot_1_2_k3 = 3e-13 vol_secINV;
  // k1*MAPK_slash_MAPKK_minus_ser*MAPK_slash_Raf_star_minus_GTP_minus_Ras-k2*MAPK_slash_Raf_star_minus_GTP_minus_Ras_slash_Raf_star_minus_GTP_minus_Ras_dot_2_slash_Raf_star_minus_GTP_minus_Ras_dot_2_cplx
  // Same kinetics as other c-raf activated forms. See Force et al PNAS 91 1270-1274 1994. k1 = 1.1e-6, k2 = .42, k3 = 1.05 raise k1 to 5.5e-6
  MAPK_slash_Raf_star_minus_GTP_minus_Ras_slash_Raf_star_minus_GTP_minus_Ras_dot_2_1: MAPK_slash_MAPKK_minus_ser + MAPK_slash_Raf_star_minus_GTP_minus_Ras -> MAPK_slash_Raf_star_minus_GTP_minus_Ras_slash_Raf_star_minus_GTP_minus_Ras_dot_2_slash_Raf_star_minus_GTP_minus_Ras_dot_2_cplx; MAPK_slash_Raf_star_minus_GTP_minus_Ras_slash_Raf_star_minus_GTP_minus_Ras_dot_2_1_k1*MAPK_slash_MAPKK_minus_ser*MAPK_slash_Raf_star_minus_GTP_minus_Ras - MAPK_slash_Raf_star_minus_GTP_minus_Ras_slash_Raf_star_minus_GTP_minus_Ras_dot_2_1_k2*MAPK_slash_Raf_star_minus_GTP_minus_Ras_slash_Raf_star_minus_GTP_minus_Ras_dot_2_slash_Raf_star_minus_GTP_minus_Ras_dot_2_cplx;
    MAPK_slash_Raf_star_minus_GTP_minus_Ras_slash_Raf_star_minus_GTP_minus_Ras_dot_2_1_k1 = 9.4284e-12 vol_uMINVsecINV; MAPK_slash_Raf_star_minus_GTP_minus_Ras_slash_Raf_star_minus_GTP_minus_Ras_dot_2_1_k2 = 1.2e-12 vol_secINV;
  // k3*MAPK_slash_Raf_star_minus_GTP_minus_Ras_slash_Raf_star_minus_GTP_minus_Ras_dot_2_slash_Raf_star_minus_GTP_minus_Ras_dot_2_cplx
  MAPK_slash_Raf_star_minus_GTP_minus_Ras_slash_Raf_star_minus_GTP_minus_Ras_dot_2_2: MAPK_slash_Raf_star_minus_GTP_minus_Ras_slash_Raf_star_minus_GTP_minus_Ras_dot_2_slash_Raf_star_minus_GTP_minus_Ras_dot_2_cplx => MAPK_slash_MAPKK_star + MAPK_slash_Raf_star_minus_GTP_minus_Ras; MAPK_slash_Raf_star_minus_GTP_minus_Ras_slash_Raf_star_minus_GTP_minus_Ras_dot_2_2_k3*MAPK_slash_Raf_star_minus_GTP_minus_Ras_slash_Raf_star_minus_GTP_minus_Ras_dot_2_slash_Raf_star_minus_GTP_minus_Ras_dot_2_cplx;
    MAPK_slash_Raf_star_minus_GTP_minus_Ras_slash_Raf_star_minus_GTP_minus_Ras_dot_2_2_k3 = 3e-13 vol_secINV;
  // k1*MAPK_slash_MAPK_minus_tyr*MKP_minus_1-k2*MKP_minus_1_slash_MKP1_minus_tyr_minus_deph_slash_MKP1_minus_tyr_minus_deph_cplx
  // The original kinetics have been modified to obey the k2 = 4 * k3 rule, while keeping kcat and Km fixed. As noted in the NOTES, the only constraining data point is the time course of MAPK dephosphorylation, which this model satisfies. It would be nice to have more accurate estimates of rate consts and MKP-1 levels from the literature. Effective Km : 67 nM kcat = 1.43 umol/min/mg
  MKP_minus_1_slash_MKP1_minus_tyr_minus_deph_1: MAPK_slash_MAPK_minus_tyr + MKP_minus_1 -> MKP_minus_1_slash_MKP1_minus_tyr_minus_deph_slash_MKP1_minus_tyr_minus_deph_cplx; MKP_minus_1_slash_MKP1_minus_tyr_minus_deph_1_k1*MAPK_slash_MAPK_minus_tyr*MKP_minus_1 - MKP_minus_1_slash_MKP1_minus_tyr_minus_deph_1_k2*MKP_minus_1_slash_MKP1_minus_tyr_minus_deph_slash_MKP1_minus_tyr_minus_deph_cplx;
    MKP_minus_1_slash_MKP1_minus_tyr_minus_deph_1_k1 = 2.85714e-12 vol_uMINVsecINV; MKP_minus_1_slash_MKP1_minus_tyr_minus_deph_1_k2 = 1.6e-11 vol_secINV;
  // k3*MKP_minus_1_slash_MKP1_minus_tyr_minus_deph_slash_MKP1_minus_tyr_minus_deph_cplx
  MKP_minus_1_slash_MKP1_minus_tyr_minus_deph_2: MKP_minus_1_slash_MKP1_minus_tyr_minus_deph_slash_MKP1_minus_tyr_minus_deph_cplx => MAPK_slash_MAPK + MKP_minus_1; MKP_minus_1_slash_MKP1_minus_tyr_minus_deph_2_k3*MKP_minus_1_slash_MKP1_minus_tyr_minus_deph_slash_MKP1_minus_tyr_minus_deph_cplx;
    MKP_minus_1_slash_MKP1_minus_tyr_minus_deph_2_k3 = 4e-12 vol_secINV;
  // k1*MAPK_star*MKP_minus_1-k2*MKP_minus_1_slash_MKP1_minus_thr_minus_deph_slash_MKP1_minus_thr_minus_deph_cplx
  // See MKP1-tyr-deph
  MKP_minus_1_slash_MKP1_minus_thr_minus_deph_1: MAPK_star + MKP_minus_1 -> MKP_minus_1_slash_MKP1_minus_thr_minus_deph_slash_MKP1_minus_thr_minus_deph_cplx; MKP_minus_1_slash_MKP1_minus_thr_minus_deph_1_k1*MAPK_star*MKP_minus_1 - MKP_minus_1_slash_MKP1_minus_thr_minus_deph_1_k2*MKP_minus_1_slash_MKP1_minus_thr_minus_deph_slash_MKP1_minus_thr_minus_deph_cplx;
    MKP_minus_1_slash_MKP1_minus_thr_minus_deph_1_k1 = 2.85714e-12 vol_uMINVsecINV; MKP_minus_1_slash_MKP1_minus_thr_minus_deph_1_k2 = 1.6e-11 vol_secINV;
  // k3*MKP_minus_1_slash_MKP1_minus_thr_minus_deph_slash_MKP1_minus_thr_minus_deph_cplx
  MKP_minus_1_slash_MKP1_minus_thr_minus_deph_2: MKP_minus_1_slash_MKP1_minus_thr_minus_deph_slash_MKP1_minus_thr_minus_deph_cplx => MAPK_slash_MAPK_minus_tyr + MKP_minus_1; MKP_minus_1_slash_MKP1_minus_thr_minus_deph_2_k3*MKP_minus_1_slash_MKP1_minus_thr_minus_deph_slash_MKP1_minus_thr_minus_deph_cplx;
    MKP_minus_1_slash_MKP1_minus_thr_minus_deph_2_k3 = 4e-12 vol_secINV;
  // k1*MAPK_slash_craf_minus_1_star*PPhosphatase2A-k2*PPhosphatase2A_slash_craf_minus_deph_slash_craf_minus_deph_cplx
  // See parent PPhosphatase2A for parms
  PPhosphatase2A_slash_craf_minus_deph_1: MAPK_slash_craf_minus_1_star + PPhosphatase2A -> PPhosphatase2A_slash_craf_minus_deph_slash_craf_minus_deph_cplx; PPhosphatase2A_slash_craf_minus_deph_1_k1*MAPK_slash_craf_minus_1_star*PPhosphatase2A - PPhosphatase2A_slash_craf_minus_deph_1_k2*PPhosphatase2A_slash_craf_minus_deph_slash_craf_minus_deph_cplx;
    PPhosphatase2A_slash_craf_minus_deph_1_k1 = 1.9161e-12 vol_uMINVsecINV; PPhosphatase2A_slash_craf_minus_deph_1_k2 = 2.4e-11 vol_secINV;
  // k3*PPhosphatase2A_slash_craf_minus_deph_slash_craf_minus_deph_cplx
  PPhosphatase2A_slash_craf_minus_deph_2: PPhosphatase2A_slash_craf_minus_deph_slash_craf_minus_deph_cplx => MAPK_slash_craf_minus_1 + PPhosphatase2A; PPhosphatase2A_slash_craf_minus_deph_2_k3*PPhosphatase2A_slash_craf_minus_deph_slash_craf_minus_deph_cplx;
    PPhosphatase2A_slash_craf_minus_deph_2_k3 = 6e-12 vol_secINV;
  // k1*MAPK_slash_MAPKK_star*PPhosphatase2A-k2*PPhosphatase2A_slash_MAPKK_minus_deph_slash_MAPKK_minus_deph_cplx
  // See: Kyriakis et al Nature 358 pp 417-421 1992 Ahn et al Curr Op Cell Biol 4:992-999 1992 for this pathway. See parent PPhosphatase2A for parms.
  PPhosphatase2A_slash_MAPKK_minus_deph_1: MAPK_slash_MAPKK_star + PPhosphatase2A -> PPhosphatase2A_slash_MAPKK_minus_deph_slash_MAPKK_minus_deph_cplx; PPhosphatase2A_slash_MAPKK_minus_deph_1_k1*MAPK_slash_MAPKK_star*PPhosphatase2A - PPhosphatase2A_slash_MAPKK_minus_deph_1_k2*PPhosphatase2A_slash_MAPKK_minus_deph_slash_MAPKK_minus_deph_cplx;
    PPhosphatase2A_slash_MAPKK_minus_deph_1_k1 = 1.9161e-12 vol_uMINVsecINV; PPhosphatase2A_slash_MAPKK_minus_deph_1_k2 = 2.4e-11 vol_secINV;
  // k3*PPhosphatase2A_slash_MAPKK_minus_deph_slash_MAPKK_minus_deph_cplx
  PPhosphatase2A_slash_MAPKK_minus_deph_2: PPhosphatase2A_slash_MAPKK_minus_deph_slash_MAPKK_minus_deph_cplx => MAPK_slash_MAPKK_minus_ser + PPhosphatase2A; PPhosphatase2A_slash_MAPKK_minus_deph_2_k3*PPhosphatase2A_slash_MAPKK_minus_deph_slash_MAPKK_minus_deph_cplx;
    PPhosphatase2A_slash_MAPKK_minus_deph_2_k3 = 6e-12 vol_secINV;
  // k1*MAPK_slash_MAPKK_minus_ser*PPhosphatase2A-k2*PPhosphatase2A_slash_MAPKK_minus_deph_minus_ser_slash_MAPKK_minus_deph_minus_ser_cplx
  PPhosphatase2A_slash_MAPKK_minus_deph_minus_ser_1: MAPK_slash_MAPKK_minus_ser + PPhosphatase2A -> PPhosphatase2A_slash_MAPKK_minus_deph_minus_ser_slash_MAPKK_minus_deph_minus_ser_cplx; PPhosphatase2A_slash_MAPKK_minus_deph_minus_ser_1_k1*MAPK_slash_MAPKK_minus_ser*PPhosphatase2A - PPhosphatase2A_slash_MAPKK_minus_deph_minus_ser_1_k2*PPhosphatase2A_slash_MAPKK_minus_deph_minus_ser_slash_MAPKK_minus_deph_minus_ser_cplx;
    PPhosphatase2A_slash_MAPKK_minus_deph_minus_ser_1_k1 = 1.9161e-12 vol_uMINVsecINV; PPhosphatase2A_slash_MAPKK_minus_deph_minus_ser_1_k2 = 2.4e-11 vol_secINV;
  // k3*PPhosphatase2A_slash_MAPKK_minus_deph_minus_ser_slash_MAPKK_minus_deph_minus_ser_cplx
  PPhosphatase2A_slash_MAPKK_minus_deph_minus_ser_2: PPhosphatase2A_slash_MAPKK_minus_deph_minus_ser_slash_MAPKK_minus_deph_minus_ser_cplx => MAPK_slash_MAPKK + PPhosphatase2A; PPhosphatase2A_slash_MAPKK_minus_deph_minus_ser_2_k3*PPhosphatase2A_slash_MAPKK_minus_deph_minus_ser_slash_MAPKK_minus_deph_minus_ser_cplx;
    PPhosphatase2A_slash_MAPKK_minus_deph_minus_ser_2_k3 = 6e-12 vol_secINV;
  // k1*MAPK_slash_craf_minus_1_star_star*PPhosphatase2A-k2*PPhosphatase2A_slash_craf_star_star_minus_deph_slash_craf_star_star_minus_deph_cplx
  // Ueki et al JBC 269(22) pp 15756-15761 1994 show hyperphosphorylation of craf, so this is there to dephosphorylate it. Identity of phosphatase is not known to me, but it may be PP2A like the rest, so I have made it so.
  PPhosphatase2A_slash_craf_star_star_minus_deph_1: MAPK_slash_craf_minus_1_star_star + PPhosphatase2A -> PPhosphatase2A_slash_craf_star_star_minus_deph_slash_craf_star_star_minus_deph_cplx; PPhosphatase2A_slash_craf_star_star_minus_deph_1_k1*MAPK_slash_craf_minus_1_star_star*PPhosphatase2A - PPhosphatase2A_slash_craf_star_star_minus_deph_1_k2*PPhosphatase2A_slash_craf_star_star_minus_deph_slash_craf_star_star_minus_deph_cplx;
    PPhosphatase2A_slash_craf_star_star_minus_deph_1_k1 = 1.9161e-12 vol_uMINVsecINV; PPhosphatase2A_slash_craf_star_star_minus_deph_1_k2 = 2.4e-11 vol_secINV;
  // k3*PPhosphatase2A_slash_craf_star_star_minus_deph_slash_craf_star_star_minus_deph_cplx
  PPhosphatase2A_slash_craf_star_star_minus_deph_2: PPhosphatase2A_slash_craf_star_star_minus_deph_slash_craf_star_star_minus_deph_cplx => MAPK_slash_craf_minus_1_star + PPhosphatase2A; PPhosphatase2A_slash_craf_star_star_minus_deph_2_k3*PPhosphatase2A_slash_craf_star_star_minus_deph_slash_craf_star_star_minus_deph_cplx;
    PPhosphatase2A_slash_craf_star_star_minus_deph_2_k3 = 6e-12 vol_secINV;
  // k1*Ras_slash_GDP_minus_Ras*Ras_slash_inact_minus_GEF-k2*Ras_slash_inact_minus_GEF_slash_basal_GEF_activity_slash_basal_GEF_activity_cplx
  Ras_slash_inact_minus_GEF_slash_basal_GEF_activity_1: Ras_slash_GDP_minus_Ras + Ras_slash_inact_minus_GEF -> Ras_slash_inact_minus_GEF_slash_basal_GEF_activity_slash_basal_GEF_activity_cplx; Ras_slash_inact_minus_GEF_slash_basal_GEF_activity_1_k1*Ras_slash_GDP_minus_Ras*Ras_slash_inact_minus_GEF - Ras_slash_inact_minus_GEF_slash_basal_GEF_activity_1_k2*Ras_slash_inact_minus_GEF_slash_basal_GEF_activity_slash_basal_GEF_activity_cplx;
    Ras_slash_inact_minus_GEF_slash_basal_GEF_activity_1_k1 = 9.9e-15 vol_uMINVsecINV; Ras_slash_inact_minus_GEF_slash_basal_GEF_activity_1_k2 = 8e-14 vol_secINV;
  // k3*Ras_slash_inact_minus_GEF_slash_basal_GEF_activity_slash_basal_GEF_activity_cplx
  Ras_slash_inact_minus_GEF_slash_basal_GEF_activity_2: Ras_slash_inact_minus_GEF_slash_basal_GEF_activity_slash_basal_GEF_activity_cplx => Ras_slash_GTP_minus_Ras + Ras_slash_inact_minus_GEF; Ras_slash_inact_minus_GEF_slash_basal_GEF_activity_2_k3*Ras_slash_inact_minus_GEF_slash_basal_GEF_activity_slash_basal_GEF_activity_cplx;
    Ras_slash_inact_minus_GEF_slash_basal_GEF_activity_2_k3 = 2e-14 vol_secINV;
  // k1*Ras_slash_GDP_minus_Ras*Ras_slash_GEF_star-k2*Ras_slash_GEF_star_slash_GEF_star_minus_act_minus_ras_slash_GEF_star_minus_act_minus_ras_cplx
  // Kinetics same as GEF-bg-act-ras
  Ras_slash_GEF_star_slash_GEF_star_minus_act_minus_ras_1: Ras_slash_GDP_minus_Ras + Ras_slash_GEF_star -> Ras_slash_GEF_star_slash_GEF_star_minus_act_minus_ras_slash_GEF_star_minus_act_minus_ras_cplx; Ras_slash_GEF_star_slash_GEF_star_minus_act_minus_ras_1_k1*Ras_slash_GDP_minus_Ras*Ras_slash_GEF_star - Ras_slash_GEF_star_slash_GEF_star_minus_act_minus_ras_1_k2*Ras_slash_GEF_star_slash_GEF_star_minus_act_minus_ras_slash_GEF_star_minus_act_minus_ras_cplx;
    Ras_slash_GEF_star_slash_GEF_star_minus_act_minus_ras_1_k1 = 1.98e-13 vol_uMINVsecINV; Ras_slash_GEF_star_slash_GEF_star_minus_act_minus_ras_1_k2 = 8e-14 vol_secINV;
  // k3*Ras_slash_GEF_star_slash_GEF_star_minus_act_minus_ras_slash_GEF_star_minus_act_minus_ras_cplx
  Ras_slash_GEF_star_slash_GEF_star_minus_act_minus_ras_2: Ras_slash_GEF_star_slash_GEF_star_minus_act_minus_ras_slash_GEF_star_minus_act_minus_ras_cplx => Ras_slash_GTP_minus_Ras + Ras_slash_GEF_star; Ras_slash_GEF_star_slash_GEF_star_minus_act_minus_ras_2_k3*Ras_slash_GEF_star_slash_GEF_star_minus_act_minus_ras_slash_GEF_star_minus_act_minus_ras_cplx;
    Ras_slash_GEF_star_slash_GEF_star_minus_act_minus_ras_2_k3 = 2e-14 vol_secINV;
  // k1*Ras_slash_GTP_minus_Ras*Ras_slash_GAP-k2*Ras_slash_GAP_slash_GAP_minus_inact_minus_ras_slash_GAP_minus_inact_minus_ras_cplx
  // From Eccleston et al JBC 268(36)pp27012-19 get Kd < 2uM, kcat - 10/sec From Martin et al Cell 63 843-849 1990 get Kd ~ 250 nM, kcat = 20/min I will go with the Eccleston figures as there are good error bars (10%). In general the values are reasonably close. k1 = 1.666e-3/sec, k2 = 1000/sec, k3 = 10/sec (note k3 is rate-limiting) 5 Nov 2002: Changed ratio term to 4 from 100. Now we have k1=8.25e-5; k2=40, k3=10. k3 is still rate-limiting.
  Ras_slash_GAP_slash_GAP_minus_inact_minus_ras_1: Ras_slash_GTP_minus_Ras + Ras_slash_GAP -> Ras_slash_GAP_slash_GAP_minus_inact_minus_ras_slash_GAP_minus_inact_minus_ras_cplx; Ras_slash_GAP_slash_GAP_minus_inact_minus_ras_1_k1*Ras_slash_GTP_minus_Ras*Ras_slash_GAP - Ras_slash_GAP_slash_GAP_minus_inact_minus_ras_1_k2*Ras_slash_GAP_slash_GAP_minus_inact_minus_ras_slash_GAP_minus_inact_minus_ras_cplx;
    Ras_slash_GAP_slash_GAP_minus_inact_minus_ras_1_k1 = 4.94856e-11 vol_uMINVsecINV; Ras_slash_GAP_slash_GAP_minus_inact_minus_ras_1_k2 = 4e-11 vol_secINV;
  // k3*Ras_slash_GAP_slash_GAP_minus_inact_minus_ras_slash_GAP_minus_inact_minus_ras_cplx
  Ras_slash_GAP_slash_GAP_minus_inact_minus_ras_2: Ras_slash_GAP_slash_GAP_minus_inact_minus_ras_slash_GAP_minus_inact_minus_ras_cplx => Ras_slash_GDP_minus_Ras + Ras_slash_GAP; Ras_slash_GAP_slash_GAP_minus_inact_minus_ras_2_k3*Ras_slash_GAP_slash_GAP_minus_inact_minus_ras_slash_GAP_minus_inact_minus_ras_cplx;
    Ras_slash_GAP_slash_GAP_minus_inact_minus_ras_2_k3 = 1e-11 vol_secINV;
  // k1*Ras_slash_GDP_minus_Ras*Ras_slash_CaM_minus_GEF-k2*Ras_slash_CaM_minus_GEF_slash_CaM_minus_GEF_minus_act_minus_ras_slash_CaM_minus_GEF_minus_act_minus_ras_cplx
  // Kinetics same as GEF-bg_act-ras
  Ras_slash_CaM_minus_GEF_slash_CaM_minus_GEF_minus_act_minus_ras_1: Ras_slash_GDP_minus_Ras + Ras_slash_CaM_minus_GEF -> Ras_slash_CaM_minus_GEF_slash_CaM_minus_GEF_minus_act_minus_ras_slash_CaM_minus_GEF_minus_act_minus_ras_cplx; Ras_slash_CaM_minus_GEF_slash_CaM_minus_GEF_minus_act_minus_ras_1_k1*Ras_slash_GDP_minus_Ras*Ras_slash_CaM_minus_GEF - Ras_slash_CaM_minus_GEF_slash_CaM_minus_GEF_minus_act_minus_ras_1_k2*Ras_slash_CaM_minus_GEF_slash_CaM_minus_GEF_minus_act_minus_ras_slash_CaM_minus_GEF_minus_act_minus_ras_cplx;
    Ras_slash_CaM_minus_GEF_slash_CaM_minus_GEF_minus_act_minus_ras_1_k1 = 1.98e-12 vol_uMINVsecINV; Ras_slash_CaM_minus_GEF_slash_CaM_minus_GEF_minus_act_minus_ras_1_k2 = 8e-13 vol_secINV;
  // k3*Ras_slash_CaM_minus_GEF_slash_CaM_minus_GEF_minus_act_minus_ras_slash_CaM_minus_GEF_minus_act_minus_ras_cplx
  Ras_slash_CaM_minus_GEF_slash_CaM_minus_GEF_minus_act_minus_ras_2: Ras_slash_CaM_minus_GEF_slash_CaM_minus_GEF_minus_act_minus_ras_slash_CaM_minus_GEF_minus_act_minus_ras_cplx => Ras_slash_GTP_minus_Ras + Ras_slash_CaM_minus_GEF; Ras_slash_CaM_minus_GEF_slash_CaM_minus_GEF_minus_act_minus_ras_2_k3*Ras_slash_CaM_minus_GEF_slash_CaM_minus_GEF_minus_act_minus_ras_slash_CaM_minus_GEF_minus_act_minus_ras_cplx;
    Ras_slash_CaM_minus_GEF_slash_CaM_minus_GEF_minus_act_minus_ras_2_k3 = 2e-13 vol_secINV;
  // k1*Ras_slash_GDP_minus_Ras*Shc_star_dot_Sos_dot_Grb2-k2*Shc_star_dot_Sos_dot_Grb2_slash_Sos_dot_Ras_GEF_slash_Sos_dot_Ras_GEF_cplx
  Shc_star_dot_Sos_dot_Grb2_slash_Sos_dot_Ras_GEF_1: Ras_slash_GDP_minus_Ras + Shc_star_dot_Sos_dot_Grb2 -> Shc_star_dot_Sos_dot_Grb2_slash_Sos_dot_Ras_GEF_slash_Sos_dot_Ras_GEF_cplx; Shc_star_dot_Sos_dot_Grb2_slash_Sos_dot_Ras_GEF_1_k1*Ras_slash_GDP_minus_Ras*Shc_star_dot_Sos_dot_Grb2 - Shc_star_dot_Sos_dot_Grb2_slash_Sos_dot_Ras_GEF_1_k2*Shc_star_dot_Sos_dot_Grb2_slash_Sos_dot_Ras_GEF_slash_Sos_dot_Ras_GEF_cplx;
    Shc_star_dot_Sos_dot_Grb2_slash_Sos_dot_Ras_GEF_1_k1 = 1.98e-12 vol_uMINVsecINV; Shc_star_dot_Sos_dot_Grb2_slash_Sos_dot_Ras_GEF_1_k2 = 8e-13 vol_secINV;
  // k3*Shc_star_dot_Sos_dot_Grb2_slash_Sos_dot_Ras_GEF_slash_Sos_dot_Ras_GEF_cplx
  Shc_star_dot_Sos_dot_Grb2_slash_Sos_dot_Ras_GEF_2: Shc_star_dot_Sos_dot_Grb2_slash_Sos_dot_Ras_GEF_slash_Sos_dot_Ras_GEF_cplx => Ras_slash_GTP_minus_Ras + Shc_star_dot_Sos_dot_Grb2; Shc_star_dot_Sos_dot_Grb2_slash_Sos_dot_Ras_GEF_2_k3*Shc_star_dot_Sos_dot_Grb2_slash_Sos_dot_Ras_GEF_slash_Sos_dot_Ras_GEF_cplx;
    Shc_star_dot_Sos_dot_Grb2_slash_Sos_dot_Ras_GEF_2_k3 = 2e-13 vol_secINV;
  // k1*AA*Basal_Translation-k2*Basal_Translation_slash_basal_syn_slash_basal_syn_cplx
  Basal_Translation_slash_basal_syn_1: $AA + Basal_Translation -> Basal_Translation_slash_basal_syn_slash_basal_syn_cplx; Basal_Translation_slash_basal_syn_1_k1*AA*Basal_Translation - Basal_Translation_slash_basal_syn_1_k2*Basal_Translation_slash_basal_syn_slash_basal_syn_cplx;
    Basal_Translation_slash_basal_syn_1_k1 = 1.81818e-12 vol_uMINVsecINV; Basal_Translation_slash_basal_syn_1_k2 = 8e-14 vol_secINV;
  // k3*Basal_Translation_slash_basal_syn_slash_basal_syn_cplx
  Basal_Translation_slash_basal_syn_2: Basal_Translation_slash_basal_syn_slash_basal_syn_cplx => peptide + Basal_Translation; Basal_Translation_slash_basal_syn_2_k3*Basal_Translation_slash_basal_syn_slash_basal_syn_cplx;
    Basal_Translation_slash_basal_syn_2_k3 = 2e-14 vol_secINV;
  // k1*rad_AA*Basal_Translation-k2*Basal_Translation_slash_rad_basal_syn_slash_rad_basal_syn_cplx
  Basal_Translation_slash_rad_basal_syn_1: rad_AA + Basal_Translation -> Basal_Translation_slash_rad_basal_syn_slash_rad_basal_syn_cplx; Basal_Translation_slash_rad_basal_syn_1_k1*rad_AA*Basal_Translation - Basal_Translation_slash_rad_basal_syn_1_k2*Basal_Translation_slash_rad_basal_syn_slash_rad_basal_syn_cplx;
    Basal_Translation_slash_rad_basal_syn_1_k1 = 1.81818e-12 vol_uMINVsecINV; Basal_Translation_slash_rad_basal_syn_1_k2 = 8e-14 vol_secINV;
  // k3*Basal_Translation_slash_rad_basal_syn_slash_rad_basal_syn_cplx
  Basal_Translation_slash_rad_basal_syn_2: Basal_Translation_slash_rad_basal_syn_slash_rad_basal_syn_cplx => peptide + Basal_Translation; Basal_Translation_slash_rad_basal_syn_2_k3*Basal_Translation_slash_rad_basal_syn_slash_rad_basal_syn_cplx;
    Basal_Translation_slash_rad_basal_syn_2_k3 = 2e-14 vol_secINV;
  // k1*S6Kinase_slash_40S_inact*num_40S_basal-k2*num_40S_basal_slash_basal_slash_basal_cplx
  num_40S_basal_slash_basal_1: $S6Kinase_slash_40S_inact + num_40S_basal -> num_40S_basal_slash_basal_slash_basal_cplx; num_40S_basal_slash_basal_1_k1*S6Kinase_slash_40S_inact*num_40S_basal - num_40S_basal_slash_basal_1_k2*num_40S_basal_slash_basal_slash_basal_cplx;
    num_40S_basal_slash_basal_1_k1 = 1.99998e-12 vol_uMINVsecINV; num_40S_basal_slash_basal_1_k2 = 4e-13 vol_secINV;
  // k3*num_40S_basal_slash_basal_slash_basal_cplx
  num_40S_basal_slash_basal_2: num_40S_basal_slash_basal_slash_basal_cplx => num_40S + num_40S_basal; num_40S_basal_slash_basal_2_k3*num_40S_basal_slash_basal_slash_basal_cplx;
    num_40S_basal_slash_basal_2_k3 = 1e-13 vol_secINV;
  // k1*PIP3*PTEN-k2*PTEN_slash_PIP3_dephosp_slash_PIP3_dephosp_cplx
  PTEN_slash_PIP3_dephosp_1: PIP3 + PTEN -> PTEN_slash_PIP3_dephosp_slash_PIP3_dephosp_cplx; PTEN_slash_PIP3_dephosp_1_k1*PIP3*PTEN - PTEN_slash_PIP3_dephosp_1_k2*PTEN_slash_PIP3_dephosp_slash_PIP3_dephosp_cplx;
    PTEN_slash_PIP3_dephosp_1_k1 = 3.437405e-10 vol_uMINVsecINV; PTEN_slash_PIP3_dephosp_1_k2 = 2.2e-11 vol_secINV;
  // k3*PTEN_slash_PIP3_dephosp_slash_PIP3_dephosp_cplx
  PTEN_slash_PIP3_dephosp_2: PTEN_slash_PIP3_dephosp_slash_PIP3_dephosp_cplx => PTEN; PTEN_slash_PIP3_dephosp_2_k3*PTEN_slash_PIP3_dephosp_slash_PIP3_dephosp_cplx;
    PTEN_slash_PIP3_dephosp_2_k3 = 5.5e-12 vol_secINV;
  // k1*PI3K_mod_slash_PIP2*Ras_minus_GTP_PI3K-k2*Ras_minus_GTP_PI3K_slash_PIP2_phospho_Ras_minus_GTP_slash_PIP2_phospho_Ras_minus_GTP_cplx
  Ras_minus_GTP_PI3K_slash_PIP2_phospho_Ras_minus_GTP_1: $PI3K_mod_slash_PIP2 + Ras_minus_GTP_PI3K -> Ras_minus_GTP_PI3K_slash_PIP2_phospho_Ras_minus_GTP_slash_PIP2_phospho_Ras_minus_GTP_cplx; Ras_minus_GTP_PI3K_slash_PIP2_phospho_Ras_minus_GTP_1_k1*PI3K_mod_slash_PIP2*Ras_minus_GTP_PI3K - Ras_minus_GTP_PI3K_slash_PIP2_phospho_Ras_minus_GTP_1_k2*Ras_minus_GTP_PI3K_slash_PIP2_phospho_Ras_minus_GTP_slash_PIP2_phospho_Ras_minus_GTP_cplx;
    Ras_minus_GTP_PI3K_slash_PIP2_phospho_Ras_minus_GTP_1_k1 = 4.99998e-12 vol_uMINVsecINV; Ras_minus_GTP_PI3K_slash_PIP2_phospho_Ras_minus_GTP_1_k2 = 1.6e-11 vol_secINV;
  // k3*Ras_minus_GTP_PI3K_slash_PIP2_phospho_Ras_minus_GTP_slash_PIP2_phospho_Ras_minus_GTP_cplx
  Ras_minus_GTP_PI3K_slash_PIP2_phospho_Ras_minus_GTP_2: Ras_minus_GTP_PI3K_slash_PIP2_phospho_Ras_minus_GTP_slash_PIP2_phospho_Ras_minus_GTP_cplx => PIP3 + Ras_minus_GTP_PI3K; Ras_minus_GTP_PI3K_slash_PIP2_phospho_Ras_minus_GTP_2_k3*Ras_minus_GTP_PI3K_slash_PIP2_phospho_Ras_minus_GTP_slash_PIP2_phospho_Ras_minus_GTP_cplx;
    Ras_minus_GTP_PI3K_slash_PIP2_phospho_Ras_minus_GTP_2_k3 = 4e-12 vol_secINV;

  // Unit definitions:
  unit uM1 = 1e-6 mole / litre;
  unit uM2 = (1e-6 mole)^2 / litre^2;
  unit uM3 = (1e-6 mole)^3 / litre^3;
  unit uM4 = (1e-6 mole)^4 / litre^4;
  unit uM5 = (1e-6 mole)^5 / litre^5;
  unit uM6 = (1e-6 mole)^6 / litre^6;
  unit uM7 = (1e-6 mole)^7 / litre^7;
  unit uM8 = (1e-6 mole)^8 / litre^8;
  unit uM9 = (1e-6 mole)^9 / litre^9;
  unit vol_secINV = litre / second;
  unit vol_uMINVsecINV = litre^2 / (1e-6 mole * second);
  unit vol_uMINV2secINV = litre^3 / ((1e-6 mole)^2 * second);
  unit vol_uMINV3secINV = litre^4 / ((1e-6 mole)^3 * second);
  unit vol_uMINV4secINV = litre^5 / ((1e-6 mole)^4 * second);
  unit vol_uMINV5secINV = litre^6 / ((1e-6 mole)^5 * second);
  unit vol_uMINV6secINV = litre^7 / ((1e-6 mole)^6 * second);
  unit vol_uMINV7secINV = litre^8 / ((1e-6 mole)^7 * second);
  unit vol_uMINV8secINV = litre^9 / ((1e-6 mole)^8 * second);
  unit substance = 1e-6 mole;
end
