// SBML level 3 version 1

model ERKAktWnt()

  // Compartments:
  compartment default = 1;

  // Species:
  species APC in default = 96.602;
  species APCAxin in default = 0.0015;
  species APCAxinGSK3B in default = 0.0076;
  species APCBCatenin in default = 3.4392;
  species Akt in default = 200;
  species Axin in default = 0.0008;
  species BCatenin in default = 42.722;
  species BRaf in default = 200;
  species C3G in default = 500;
  species Dsha in default = 0;
  species Dshi in default = 100;
  species EGF in default = 600;
  species ERK in default = 260;
  species GSK3B in default = 49.137;
  species MEK in default = 680;
  species P90Rsk in default = 60;
  species PI3K in default = 100;
  species PIP2 in default = 700;
  species PIP3 in default = 0;
  species PKCD in default = 0;
  species PP2A in default = 240;
  species PTEN in default = 270;
  species RKIP in default = 20.909;
  species Raf1 in default = 100;
  species RafPPtase in default = 60;
  species Rap1 in default = 200;
  species Rap1Gap in default = 12;
  species Ras in default = 100;
  species RasGap in default = 100;
  species SOS in default = 100;
  species TCF in default = 6.1879;
  species TCFBCatenin in default = 8.8121;
  species X in default = 10.263;
  species bEGFR in default = 0;
  species dEGFR in default = 0;
  species fEGFR in default = 300;
  species $null in default = 0;
  species pAPCpAxinGSK3B in default = 0.0153;
  species pAPCpAxinGSK3BBCatenin in default = 0.002;
  species pAPCpAxinGSK3BpBCatenin in default = 0.002;
  species pAkt in default = 0;
  species pBCatenin in default = 0.9881;
  species pBRaf in default = 0;
  species pC3G in default = 0;
  species $pEGFR in default = 0.05;
  species pERK in default = 0;
  species pGSK3B in default = 0.85544;
  species pMEK in default = 0;
  species pP90Rsk in default = 0;
  species pPI3K in default = 0;
  species pRKIP in default = 0.8619;
  species pRaf1 in default = 0;
  species pRap1 in default = 0;
  species pRas in default = 0;
  species pSOS in default = 0;

  // Parameters:
  Kcat10a = 0.12633;
  Kcat10b = 15.1212;
  Kcat11a = 185.76;
  Kcat12 = 2.8324;
  Kcat13 = 9.8537;
  Kcat14 = 8.8912;
  Kcat16a = 0.8841;
  Kcat16b = 0.8841;
  Kcat17a = 0.12633;
  Kcat17b = 15.1212;
  Kcat18b = 0.02137;
  Kcat19a = 10.6737;
  Kcat19b = 0.07711;
  Kcat20 = 4;
  Kcat21 = 5.5;
  Kcat22a = 0.33;
  Kcat22b = 48.667;
  Kcat23a = 694.73;
  Kcat24 = 32.344;
  Kcat25 = 1509.4;
  Kcat27a = 0.002;
  Kcat27b = 0.04596;
  Kcat27d = 0.01541;
  Kcat6b = 1611.97;
  Kcat7 = 32.644;
  Kcat8b = 1509.36;
  Kcat9a = 0.884096;
  Km10a = 1061.7;
  Km10b = 119355;
  Km11a = 4768400;
  Km12 = 518750;
  Km13 = 1007300;
  Km14 = 3496500;
  Km16a = 62645;
  Km16b = 62464.6;
  Km17a = 1061.71;
  Km17b = 119355;
  Km18b = 763523;
  Km19a = 184912;
  Km19b = 272056;
  Km20 = 4;
  Km21 = 0.08;
  Km22a = 100;
  Km22b = 100;
  Km23a = 6086100;
  Km24 = 35954.3;
  Km25 = 1432400;
  Km39 = 15;
  Km6b = 896896;
  Km7 = 35954.3;
  Km8b = 1432410;
  Km9a = 62464.6;
  Km9b = 15;
  V1 = 100;
  V15b = 4;
  V26a = 0.00154;
  V37b = 0.00705;
  V8a = 0.0717;
  W = 0;
  defaultcompartment = 1;
  k11b1 = 1.1167e-5;
  k11b2 = 120;
  k15a = 1.3;
  k15c = 0.00193;
  k18a = 0.005;
  k19c = 0.005;
  k21 = 2.18503e-5;
  k22 = 0.121008;
  k23b = 2.5;
  k26a = 20;
  k26b = 0.000385;
  k27c = 0.00015;
  k28 = 0.003;
  k29 = 0.003;
  k3 = 0.00125;
  k30 = 0.000833;
  k311 = 0.001515;
  k312 = 0.01515;
  k32a = 0.00445;
  k32b = 0.002217;
  k33a1 = 0.01667;
  k33a2 = 0.8333;
  k33b = 0.002783;
  k33c1 = 1.37e-6;
  k33c2 = 1.667e-8;
  k341 = 0.01667;
  k342 = 2;
  k35 = 3.433;
  k36 = 3.433;
  k37a1 = 0.01667;
  k37a2 = 20;
  k37c = 4.283e-6;
  k381 = 0.01667;
  k382 = 0.5;
  k39 = 0.01;
  k4 = 0.2;
  k40 = 0.00025;
  k41 = 0.00695;
  k51 = 0.003465;
  k52 = 3.85e-5;
  k53 = 0.00028833;
  k54 = 1.5;
  k6a = 2.5;
  k9b = 0.025;

  // Reactions:
  v1: $pEGFR -> fEGFR; V1;
  v10a: RafPPtase + pRaf1 -> RafPPtase + Raf1; Kcat10a*RafPPtase*pRaf1/(pRaf1 + Km10a);
  v10b: pAkt + pRaf1 -> pAkt + Raf1; Kcat10b*pAkt*pRaf1/(pRaf1 + Km10b);
  v11a: pBRaf + MEK -> pBRaf + pMEK; Kcat11a*pBRaf*MEK/(MEK + Km11a);
  v11b: pRKIP + pRaf1 + MEK -> pRKIP + pRaf1 + pMEK; k11b1*pRaf1*MEK/(1 + ((RKIP - pRKIP)/k11b2)^2);  // modifiers: RKIP
  v12: pMEK + PP2A -> MEK + PP2A; Kcat12*PP2A*pMEK/(pMEK + Km12);
  v13: pMEK + ERK -> pMEK + pERK; Kcat13*pMEK*ERK/(ERK + Km13);
  v14: pERK + PP2A -> ERK + PP2A; Kcat14*PP2A*pERK/(pERK + Km14);
  v15a: pERK + RKIP -> pERK + pRKIP; k15a*pERK*(RKIP - pRKIP);
  v15b: pRKIP -> RKIP; V15b*pRKIP;
  v15c: RKIP -> $null; k15c*RKIP;
  v16a: pRas + BRaf -> pRas + pBRaf; Kcat16a*pRas*BRaf/(BRaf + Km16a);
  v16b: pRap1 + BRaf -> pRap1 + pBRaf; Kcat16b*pRap1*BRaf/(BRaf + Km16b);
  v17a: RafPPtase + pBRaf -> RafPPtase + BRaf; Kcat17a*RafPPtase*pBRaf/(pBRaf + Km17a);
  v17b: pAkt + pBRaf -> pAkt + BRaf; Kcat17b*pAkt*pBRaf/(pBRaf + Km17b);
  v18a: pP90Rsk -> P90Rsk; k18a*pP90Rsk;
  v18b: pERK + P90Rsk -> pERK + pP90Rsk; Kcat18b*pERK*P90Rsk/(P90Rsk + Km18b);
  v19a: bEGFR + PI3K -> bEGFR + pPI3K; Kcat19a*bEGFR*PI3K/(PI3K + Km19a);
  v19b: PI3K -> pPI3K; Kcat19b*pRas*PI3K/(PI3K + Km19b);  // modifiers: pRas
  v19c: pPI3K -> PI3K; k19c*pPI3K;
  v2: fEGFR + EGF -> bEGFR; k21*EGF*fEGFR - k22*bEGFR;
  v20: pPI3K + PIP2 -> pPI3K + PIP3; Kcat20*pPI3K*PIP2/(PIP2 + Km20);
  v21: PTEN + PIP3 -> PTEN + PIP2; Kcat21*PTEN*PIP3/(PIP3 + Km21);
  v22a: PIP3 + Akt -> PIP3 + pAkt; Kcat22a*PIP3*Akt/(Akt + Km22a);
  v22b: pAkt -> Akt; Kcat22b*pAkt/(Km22b + pAkt);
  v23a: bEGFR + C3G -> bEGFR + pC3G; Kcat23a*bEGFR*C3G/(C3G + Km23a);
  v23b: pC3G -> C3G; k23b*pC3G;
  v24: pC3G + Rap1 -> pC3G + pRap1; Kcat24*pC3G*Rap1/(Rap1 + Km24);
  v25: Rap1Gap + pRap1 -> Rap1Gap + Rap1; Kcat25*Rap1Gap*pRap1/(pRap1 + Km25);
  v26a: GSK3B -> GSK3B + PKCD; V26a/(1 + (GSK3B/k26a)^2.5);
  v26b: PKCD -> $null; k26b*PKCD;
  v27a: pERK + GSK3B -> pERK + pGSK3B; Kcat27a*GSK3B*pERK;
  v27b: pAkt + GSK3B -> pAkt + pGSK3B; Kcat27b*GSK3B*pAkt;
  v27c: RKIP -> RKIP + GSK3B; k27c*RKIP;
  v27d: pGSK3B -> GSK3B; Kcat27d*pGSK3B;
  v28: Dshi -> Dsha; k28*Dshi*W;
  v29: Dsha -> Dshi; k29*Dsha;
  v3: fEGFR -> dEGFR; k3*fEGFR;
  v30: Dsha + APCAxinGSK3B -> GSK3B + APCAxin + Dsha; k30*Dsha*APCAxinGSK3B;
  v31: APCAxin + GSK3B -> APCAxinGSK3B; k311*GSK3B*APCAxin - k312*APCAxinGSK3B;
  v32a: APCAxinGSK3B -> pAPCpAxinGSK3B; k32a*APCAxinGSK3B;
  v32b: pAPCpAxinGSK3B -> APCAxinGSK3B; k32b*pAPCpAxinGSK3B;
  v33a: APC + Axin -> APCAxin; k33a1*Axin*APC - k33a2*APCAxin;
  v33b: Axin -> $null; k33b*Axin;
  v33c: BCatenin + TCFBCatenin -> BCatenin + TCFBCatenin + Axin; k33c1 + k33c2*(TCFBCatenin + BCatenin);
  v34: BCatenin + pAPCpAxinGSK3B -> pAPCpAxinGSK3BBCatenin; k341*pAPCpAxinGSK3B*BCatenin - k342*pAPCpAxinGSK3BBCatenin;
  v35: pAPCpAxinGSK3BBCatenin -> pAPCpAxinGSK3BpBCatenin; k35*pAPCpAxinGSK3BBCatenin;
  v36: pAPCpAxinGSK3BpBCatenin -> pBCatenin + pAPCpAxinGSK3B; k36*pAPCpAxinGSK3BpBCatenin;
  v37a: BCatenin + APC -> APCBCatenin; k37a1*APC*BCatenin - k37a2*APCBCatenin;
  v37b: $null -> BCatenin; V37b;
  v37c: BCatenin -> $null; k37c*BCatenin;
  v38: TCF + BCatenin -> TCFBCatenin; k381*BCatenin*TCF - k382*TCFBCatenin;
  v39: TCFBCatenin -> X + TCFBCatenin; k39*TCFBCatenin^2/(Km39^2 + TCFBCatenin^2);
  v4: bEGFR -> dEGFR; k4*bEGFR;
  v40: X -> $null; k40*X;
  v41: pBCatenin -> $null; k41*pBCatenin;
  v5: PKCD + pERK + bEGFR + SOS -> PKCD + pERK + bEGFR + pSOS; (k51*bEGFR + k52 + k53*PKCD)/(1 + pERK/k54);
  v6a: pSOS -> SOS; k6a*pSOS;
  v6b: pP90Rsk + pSOS -> pP90Rsk + SOS; Kcat6b*pP90Rsk*pSOS/(pSOS + Km6b);
  v7: pSOS + Ras -> pSOS + pRas; Kcat7*pSOS*Ras/(Ras + Km7);
  v8a: $null -> Ras; V8a;
  v8b: RasGap + pRas -> RasGap + Ras; Kcat8b*RasGap*pRas/(pRas + Km8b);
  v9a: pRas + Raf1 -> pRas + pRaf1; Kcat9a*pRas*Raf1/(Raf1 + Km9a);
  v9b: X + Raf1 -> X + pRaf1; k9b*W*X*Raf1/(Km9b + Raf1);
end
