// SBML level 2 version 4

model New_Model()

  // Compartments:
  compartment Primary_Cilium = 1e-6;
  compartment Soma = 1e-6;
  compartment Nucleus = 1e-6;

  // Species:
  species Ptch1 in Primary_Cilium = 1;
  species Ptch1_Smo_I in Soma = 0; Ptch1_Smo_I is "Ptch1-Smo(I)";
  species Smo in Soma = 1;
  species GPR161 in Soma = 1;
  species IFTA in Primary_Cilium = 1;
  species PIP2 in Primary_Cilium = 1;
  species Tulp3 in Soma = 1;
  species Tulp3_GPR161 in Primary_Cilium = 0; Tulp3_GPR161 is "Tulp3-GPR161";
  species Shh in Soma = 0;
  species AC in Primary_Cilium = 1;
  species ATP in Primary_Cilium = 1;
  species cAMP in Primary_Cilium = 0;
  species PKA in Primary_Cilium = 0;
  species PKA_I in Primary_Cilium = 1; PKA_I is "PKA(I)";
  species AMP in Soma = 0;
  species PDE4D in Soma = 1;
  species GSK3 in Primary_Cilium = 1; GSK3 is "GSK3β";
  species PKA_S in Primary_Cilium = 1; PKA_S is "PKA(S)";
  species SuFu in Soma = 1;
  species SuFu_P in Primary_Cilium = 0; SuFu_P is "SuFu(P)";
  species Gli2_3 in Primary_Cilium = 1; Gli2_3 is "Gli2/3";
  species SuFu_P__Gli2_3 in Primary_Cilium = 0; SuFu_P__Gli2_3 is "SuFu(P)-Gli2/3";
  species CK1 in Primary_Cilium = 1;
  species Gli2_3_P in Primary_Cilium = 0; Gli2_3_P is "Gli2/3(P)";
  species Cul1 in Primary_Cilium = 1;
  species Gli3_R in Primary_Cilium = 0; Gli3_R is "Gli3(R)";
  species __TRCP in Primary_Cilium = 1; __TRCP is "β-TRCP";
  species Cul3 in Soma = 1;
  species Spop in Soma = 1;
  species EvC_EvC2 in Primary_Cilium = 1; EvC_EvC2 is "EvC-EvC2";
  species Smo_A__EvC_EvC2 in Primary_Cilium = 0; Smo_A__EvC_EvC2 is "Smo(A)-EvC-EvC2";
  species Shh_Ptch1 in Soma = 0; Shh_Ptch1 is "Shh-Ptch1";
  species Smurf1_2 in Soma = 1; Smurf1_2 is "Smurf1/2";
  species GRK2 in Primary_Cilium = 1;
  species Smo_P in Primary_Cilium = 0; Smo_P is "Smo(P)";
  species $HSD11_2 in Soma; HSD11_2 is "HSD11β2";
  species Smo_A in Primary_Cilium = 0; Smo_A is "Smo(A)";
  species _arr2 in Primary_Cilium = 1; _arr2 is "βarr2";
  species Kif7_P in Primary_Cilium = 1; Kif7_P is "Kif7(P)";
  species SuFu_P__Gli2_3_Kif7_P in Primary_Cilium = 0; SuFu_P__Gli2_3_Kif7_P is "SuFu(P)-Gli2/3-Kif7(P)";
  species PP2A in Primary_Cilium = 1;
  species PPFIA1 in Primary_Cilium = 1;
  species SuFu_P__Gli2_3_Kif7 in Primary_Cilium = 0; SuFu_P__Gli2_3_Kif7 is "SuFu(P)-Gli2/3-Kif7";
  species Gli2_3_A in Primary_Cilium = 0; Gli2_3_A is "Gli2/3(A)";
  species Gli1 in Primary_Cilium = 0;
  species Hhip in Soma = 0;
  species $_Gli1 in Nucleus = 1; _Gli1 is "[Gli1]";
  species $_Hhip in Nucleus = 1; _Hhip is "[Hhip]";
  species $_Ptch1 in Nucleus = 1; _Ptch1 is "[Ptch1]";

  // Parameters:
  var GPR161_Localisation;
  var AC_Activation;
  var Gli2_3_Phosphorylation; Gli2_3_Phosphorylation is "Gli2/3 Phosphorylation";
  var Smo_A__Recycling; Smo_A__Recycling is "Smo(A) Recycling";
  var Smoothened_Inhibition__backwards; Smoothened_Inhibition__backwards is "Smoothened Inhibition (backwards)";
  var Smoothened_Phosphorylation;
  var GPR161_Removal;
  var SuFu_P__Gli2_3___Kif7_P__Binding; SuFu_P__Gli2_3___Kif7_P__Binding is "SuFu(P)-Gli2/3 & Kif7(P) Binding";
  var Shh_Sequestration;
  var Gene_Expression;
  Shh_Sequestration_2_k1 = 0.1;

  // Assignment rules:
  HSD11_2 := piecewise(1, Shh_Ptch1 > 0, 0);
  Shh_Sequestration := piecewise(1, Shh_Sequestration_2_k1 > 0.1, 0);
  Gene_Expression := piecewise(0, Gli3_R > 0, 1);
  SuFu_P__Gli2_3___Kif7_P__Binding := piecewise(1, Smo_A__EvC_EvC2 > 0, 0);
  GPR161_Removal := piecewise(1, Shh > 0.1, 0);
  Smoothened_Inhibition__backwards := piecewise(1, Shh_Ptch1 > 0, 0);
  Smoothened_Phosphorylation := piecewise(1, Shh_Ptch1 > 0, 0);
  GPR161_Localisation := piecewise(0, Shh > 0.1, 1);
  AC_Activation := piecewise(1, Tulp3_GPR161 > 0, 0);
  Gli2_3_Phosphorylation := piecewise(1, Ptch1_Smo_I > 0.2, 0);
  Smo_A__Recycling := piecewise(0, Shh_Ptch1 > 0, 1);

  // Reactions:
  Smoothened_Inhibition: Ptch1 + Smo => Ptch1_Smo_I; Smoothened_Inhibition_k1*Ptch1*Smo;
    Smoothened_Inhibition_k1 = 1;
  GPR161_Localisation_0: PIP2 + Tulp3 + IFTA + GPR161 => Tulp3_GPR161 + IFTA; GPR161_Localisation*PIP2*Tulp3*IFTA*GPR161;
  AC_Activation_0: ATP + AC => cAMP + AC; Primary_Cilium*AC_Activation*ATP*AC;
  PKA_Activation: PKA_I + cAMP => PKA; Primary_Cilium*PKA_Activation_k1*PKA_I*cAMP;
    PKA_Activation_k1 = 1;
  PDE_Activity: PDE4D + cAMP => PDE4D + AMP; PDE_Activity_k1*PDE4D*cAMP;
    PDE_Activity_k1 = 1;
  SuFu_Localisation: SuFu + GSK3 + PKA_S => SuFu_P + GSK3 + PKA_S; SuFu_Localisation_k1*SuFu*GSK3*PKA_S;
    SuFu_Localisation_k1 = 1;
  SuFu_Gli2_3_Binding: SuFu_P + Gli2_3 => SuFu_P__Gli2_3; Primary_Cilium*SuFu_Gli2_3_Binding_k1*SuFu_P*Gli2_3; SuFu_Gli2_3_Binding is "SuFu-Gli2/3 Binding";
    SuFu_Gli2_3_Binding_k1 = 1;
  Gli2_3_Phosphorylation_0: SuFu_P__Gli2_3 + PKA + CK1 + GSK3 => SuFu_P + Gli2_3_P + PKA + CK1 + GSK3; Primary_Cilium*Gli2_3_Phosphorylation*SuFu_P__Gli2_3*PKA*CK1*GSK3; Gli2_3_Phosphorylation_0 is "Gli2/3 Phosphorylation";
  Unphosphorylated_SuFu_Loss: SuFu => ; Soma*Unphosphorylated_SuFu_Loss_k1*SuFu;
    Unphosphorylated_SuFu_Loss_k1 = 1;
  Gli3_R__Production: Gli2_3_P + __TRCP + Cul1 => Gli3_R + __TRCP + Cul1; Primary_Cilium*Gli3_R__Production_k1*Gli2_3_P*__TRCP*Cul1; Gli3_R__Production is "Gli3(R) Production";
    Gli3_R__Production_k1 = 1;
  Gli3_R__Degradation: Gli3_R + Spop + Cul3 => Spop + Cul3; Gli3_R__Degradation_k1*Gli3_R*Spop*Cul3; Gli3_R__Degradation is "Gli3(R) Degradation";
    Gli3_R__Degradation_k1 = 1;
  Smo_A__Recycling_0: Smo_A__EvC_EvC2 => Smo + EvC_EvC2; Smo_A__Recycling_0_k1*Smo_A__EvC_EvC2; Smo_A__Recycling_0 is "Smo(A) Recycling";
    Smo_A__Recycling_0_k1 = 1;
  Shh_Binding: Shh + 2 Ptch1 => Shh_Ptch1; Shh_Binding_k1*Shh*Ptch1^2;
    Shh_Binding_k1 = 1;
  Ptch1_Degradation: Shh_Ptch1 + Smurf1_2 => Shh + Smurf1_2; Soma*Ptch1_Degradation_k1*Shh_Ptch1*Smurf1_2;
    Ptch1_Degradation_k1 = 1;
  Smoothened_Inhibition__backwards_0: Ptch1_Smo_I => Ptch1 + Smo; Smoothened_Inhibition__backwards*Ptch1_Smo_I; Smoothened_Inhibition__backwards_0 is "Smoothened Inhibition (backwards)";
  Smoothened_Phosphorylation_0: Smo + CK1 + GRK2 => Smo_P + CK1 + GRK2; Smoothened_Phosphorylation*Smo*CK1*GRK2;
  Smoothened_Activation: Smo_P + $HSD11_2 => Smo_A + $HSD11_2; Smoothened_Activation_k1*Smo_P*HSD11_2;
    Smoothened_Activation_k1 = 1;
  Smoothened_Localisation: Smo_A + EvC_EvC2 => Smo_A__EvC_EvC2; Primary_Cilium*Smoothened_Localisation_k1*Smo_A*EvC_EvC2;
    Smoothened_Localisation_k1 = 1;
  GPR161_Removal_0: Tulp3_GPR161 + GRK2 + _arr2 => PIP2 + Tulp3 + GPR161 + GRK2 + _arr2; GPR161_Removal*Tulp3_GPR161*GRK2*_arr2;
  SuFu_P__Gli2_3___Kif7_P__Binding_0: SuFu_P__Gli2_3 + Kif7_P => SuFu_P__Gli2_3_Kif7_P; Primary_Cilium*SuFu_P__Gli2_3___Kif7_P__Binding*SuFu_P__Gli2_3*Kif7_P; SuFu_P__Gli2_3___Kif7_P__Binding_0 is "SuFu(P)-Gli2/3 & Kif7(P) Binding";
  SuFu_Gli2_3_Kif7_P__Translocation: SuFu_P__Gli2_3_Kif7_P + PP2A + PPFIA1 => SuFu_P__Gli2_3_Kif7 + PP2A + PPFIA1; Primary_Cilium*SuFu_Gli2_3_Kif7_P__Translocation_k1*SuFu_P__Gli2_3_Kif7_P*PP2A*PPFIA1; SuFu_Gli2_3_Kif7_P__Translocation is "SuFu-Gli2/3-Kif7(P) Translocation";
    SuFu_Gli2_3_Kif7_P__Translocation_k1 = 1;
  Gli2_3_Activation: SuFu_P__Gli2_3_Kif7 => SuFu + Gli2_3_A + Kif7_P; Gli2_3_Activation_k1*SuFu_P__Gli2_3_Kif7; Gli2_3_Activation is "Gli2/3 Activation";
    Gli2_3_Activation_k1 = 1;
  Gli2_3_A__Degradation: Gli2_3_A + Spop + Cul3 => Spop + Cul3; Gli2_3_A__Degradation_k1*Gli2_3_A*Spop*Cul3; Gli2_3_A__Degradation is "Gli2/3(A) Degradation";
    Gli2_3_A__Degradation_k1 = 1;
  Gene_Expression_0: Gli2_3_A + $_Ptch1 + $_Hhip + $_Gli1 => Gli2_3_A + 2 Ptch1 + 2 Hhip + 2 Gli1; Gene_Expression_0_k1*Gli2_3_A*_Ptch1*_Hhip*_Gli1;
    Gene_Expression_0_k1 = 1;
  Shh_Sequestration_1: Shh => ; Soma*Shh_Sequestration*Shh;
  Shh_Sequestration_2: Hhip => ; Soma*Shh_Sequestration_2_k1*Hhip;

  // Unit definitions:
  unit substance = 1e-9 mole;
end
