// SBML level 2 version 4

function MM_Enzyme(kcat, E, S, Km)
  kcat*E*S/(Km + S);
end

model First_Model()
  // This is a basic model of FMRP biochemical interactivity in the brain.
  // The purpose of the model is to investigate suitable targets of Fragile X Syndrome treatment and to further determine the cause of the disease.
  // The model was created by Lewis Strachan at the University of Edinburgh for the Nuffield Research Foundation as part of a summer research placement.
  // Contact email: lewis_jay_strachan@hotmail.com

  // Compartments:
  // Volume obtained from Richard Fitzpatrick's model.
  compartment compartment = 9e-17;

  // Species:
  // Fragile X Mental Retardation Protein
  // The central protein in this model. FXS is when a trinucleotide repeat expansion of the CGG triplet occurs greater than 200 times causing methylation and the silencing of the gene. This causes a lack of FMRP.
  // FMRP is phosphorylated quickly after being synthesised.
  // Take this variant of FMRP as the normal variant and it is this variant that is used in most reactions.
  // IC is an estimate.
  species P_FMRP in compartment = 0.4; P_FMRP is "P-FMRP";
  // Fragile X Related Protein 1
  // IC is an estimate.
  species FXRP1 in compartment = 0.4;
  // Fragile X Related Protein 2
  // IC is an estimate.
  species FXRP2 in compartment = 0.4;
  // Cytoplasmic FMRP Interacting Protein 1
  // IC is an estimate.
  species CYFIP1 in compartment = 0.6;
  species FMRP_FXRP1 in compartment = 0; FMRP_FXRP1 is "FMRP-FXRP1";
  species FMRP_FXRP2 in compartment = 0; FMRP_FXRP2 is "FMRP-FXRP2";
  // Eukaryotic Translation Initiation Factor 4E
  // IC obtained from:
  // Rau, M., Ohlmann, T., Morley, S. and Pain, V. (1996). A Reevaluation of the Cap-binding Protein, eIF4E, as a Rate-limiting Factor for Initiation of Translation in Reticulocyte Lysate. Journal of Biological Chemistry, 271(15), pp.8983-8990.
  species eIF4E in compartment = 0.4;
  // CYFIP1-eIF4E-FMR1 Complex. Mediates translational repression.
  species CEF in compartment = 0;
  species CYFIP1_FMRP in compartment = 0; CYFIP1_FMRP is "CYFIP1-FMRP";
  species CYFIP1_eIF4E in compartment = 0; CYFIP1_eIF4E is "CYFIP1-eIF4E";
  // Metabotropic Glutamate Receptor
  // IC obtained from DOQCS.
  species mGluR in compartment = 0.3;
  // Tropomyosin receptor kinase B
  // IC obtained from DOQCS.
  species TrkB in compartment = 0.25;
  // Glutamate
  species $Glu in compartment;
  species FMRP_eIF4E in compartment = 0; FMRP_eIF4E is "FMRP-eIF4E";
  // Brain-Derived Neurotrophic Factor
  species $BDNF in compartment;
  species TrkB_BDNF in compartment = 0; TrkB_BDNF is "TrkB-BDNF";
  // The dephosphorylated variant of FMRP.
  species DP_FMRP in compartment = 0; DP_FMRP is "DP-FMRP";
  // The ubiquitin tagged variant of FMRP.
  species U_FMRP in compartment = 0; U_FMRP is "U-FMRP";
  // Protein Phosphatase 2
  // Dephosphorylates FMRP.
  // IC obtained from DOQCS.
  species PP2A in compartment = 1.11;
  // S6 Kinase
  // Phosphorylates FMRP.
  // IC obtained from DOQCS.
  species $S6K in compartment;
  // Ubiquitinising enzymes.
  // IC is an estimate.
  species UE in compartment = 0.12;
  species mGluR_Glu in compartment = 0; mGluR_Glu is "mGluR-Glu";
  species $null in compartment = 1;

  // Parameters:
  TIme has unit_0;
  PP2Arate has unit_1;
  S6KRate has unit_1;

  // Assignment rules:
  S6KRate := piecewise(0.02, TrkB_BDNF > 0.1, 0.01);
  PP2Arate := piecewise(12, mGluR_Glu > 0.1, 6);
  TIme := time;
  S6K := piecewise(2.5, TrkB_BDNF >= 0.1, 1.25);
  BDNF := piecewise(0.1, TIme > 300, piecewise(3.7, TIme > 200, 0.1));
  Glu := piecewise(0, TIme >= 100, piecewise(1, TIme >= 50, 0));

  // Reactions:
  // PP2A acts as an enzyme.
  // kf obtained from a similar reaction in Richard Fitzpatrick's model.
  P_FMRP_Dephosphorylation: P_FMRP + PP2A => DP_FMRP + PP2A; compartment*PP2Arate*P_FMRP*PP2A; P_FMRP_Dephosphorylation is "P-FMRP Dephosphorylation";
  // UE = Ubiquitinising enzymes
  // kf is an estimate.
  FMRP_Ubiquitination: DP_FMRP + UE => U_FMRP + UE; compartment*FMRP_Ubiquitination_k1*DP_FMRP*UE;
    FMRP_Ubiquitination_k1 = 0.5;
  // Occurs in the proteasome.
  // kf is an estimate.
  U_FMRP_Degradation: U_FMRP => $null; compartment*U_FMRP_Degradation_k1*U_FMRP; U_FMRP_Degradation is "U-FMRP Degradation";
    U_FMRP_Degradation_k1 = 1;
  // kf obtained from a similar reaction in Richard Fitzpatrick's model.
  TrkB_BDNF_CYFIP1_eIF4E_Dissociation: CYFIP1_eIF4E => CYFIP1 + eIF4E; compartment*MM_Enzyme(TrkB_BDNF_CYFIP1_eIF4E_Dissociation_kcat, TrkB_BDNF, CYFIP1_eIF4E, TrkB_BDNF_CYFIP1_eIF4E_Dissociation_Km); TrkB_BDNF_CYFIP1_eIF4E_Dissociation is "TrkB-BDNF CYFIP1-eIF4E Dissociation";  // modifiers: TrkB_BDNF
    TrkB_BDNF_CYFIP1_eIF4E_Dissociation_kcat = 0.15; TrkB_BDNF_CYFIP1_eIF4E_Dissociation_Km = 40;
  // kf obtained from a similar reaction in Richard Fitzpatrick's model.
  mGluR_Glu_CYFIP1_eIF4E_Dissociation: CYFIP1_eIF4E => CYFIP1 + eIF4E; compartment*MM_Enzyme(mGluR_Glu_CYFIP1_eIF4E_Dissociation_kcat, mGluR_Glu, CYFIP1_eIF4E, mGluR_Glu_CYFIP1_eIF4E_Dissociation_Km); mGluR_Glu_CYFIP1_eIF4E_Dissociation is "mGluR-Glu CYFIP1-eIF4E Dissociation";  // modifiers: mGluR_Glu
    mGluR_Glu_CYFIP1_eIF4E_Dissociation_kcat = 0.15; mGluR_Glu_CYFIP1_eIF4E_Dissociation_Km = 40;
  // kf obtained from a similar reaction in Richard Fitzpatrick's model.
  DP_FMRP_Phosphorylation: DP_FMRP + $S6K => P_FMRP + $S6K; compartment*S6KRate*DP_FMRP*S6K; DP_FMRP_Phosphorylation is "DP-FMRP Phosphorylation";
  // kf is an estimate.
  FMRP_Synthesis: $null => DP_FMRP; compartment*FMRP_Synthesis_k1*null;
    FMRP_Synthesis_k1 = 0.001;
  TrkB_BDNF_0: TrkB + $BDNF -> TrkB_BDNF; compartment*(TrkB_BDNF_0_k1*TrkB*BDNF - TrkB_BDNF_0_k2*TrkB_BDNF); TrkB_BDNF_0 is "TrkB-BDNF";
    TrkB_BDNF_0_k1 = 0.99998; TrkB_BDNF_0_k2 = 0.0499967;
  mGluR_Glu_0: mGluR + $Glu -> mGluR_Glu; compartment*(mGluR_Glu_0_k1*mGluR*Glu - mGluR_Glu_0_k2*mGluR_Glu); mGluR_Glu_0 is "mGluR-Glu";
    mGluR_Glu_0_k1 = 16.8; mGluR_Glu_0_k2 = 10;
  FMRP_FXRP1_0: P_FMRP + FXRP1 -> FMRP_FXRP1; compartment*(FMRP_FXRP1_0_k1*P_FMRP*FXRP1 - FMRP_FXRP1_0_k2*FMRP_FXRP1); FMRP_FXRP1_0 is "FMRP-FXRP1";
    FMRP_FXRP1_0_k1 = 49.999; FMRP_FXRP1_0_k2 = 0.15;
  FMRP_FXRP2_0: P_FMRP + FXRP2 -> FMRP_FXRP2; compartment*(FMRP_FXRP2_0_k1*P_FMRP*FXRP2 - FMRP_FXRP2_0_k2*FMRP_FXRP2); FMRP_FXRP2_0 is "FMRP-FXRP2";
    FMRP_FXRP2_0_k1 = 49.999; FMRP_FXRP2_0_k2 = 0.15;
  CYFIP1_FMRP_0: P_FMRP + CYFIP1 -> CYFIP1_FMRP; compartment*(CYFIP1_FMRP_0_k1*P_FMRP*CYFIP1 - CYFIP1_FMRP_0_k2*CYFIP1_FMRP); CYFIP1_FMRP_0 is "CYFIP1-FMRP";
    CYFIP1_FMRP_0_k1 = 49.999; CYFIP1_FMRP_0_k2 = 0.15;
  CEF1: CYFIP1_eIF4E + P_FMRP -> CEF; compartment*(CEF1_k1*CYFIP1_eIF4E*P_FMRP - CEF1_k2*CEF);
    CEF1_k1 = 49.999; CEF1_k2 = 0.15;
  CEF2: CYFIP1_FMRP + eIF4E -> CEF; compartment*(CEF2_k1*CYFIP1_FMRP*eIF4E - CEF2_k2*CEF);
    CEF2_k1 = 49.999; CEF2_k2 = 0.15;
  CYFIP1_eIF4E_0: CYFIP1 + eIF4E -> CYFIP1_eIF4E; compartment*(CYFIP1_eIF4E_0_k1*CYFIP1*eIF4E - CYFIP1_eIF4E_0_k2*CYFIP1_eIF4E); CYFIP1_eIF4E_0 is "CYFIP1-eIF4E";
    CYFIP1_eIF4E_0_k1 = 49.999; CYFIP1_eIF4E_0_k2 = 0.15;
  FMRP_eIF4E_0: P_FMRP + eIF4E -> FMRP_eIF4E; compartment*(FMRP_eIF4E_0_k1*P_FMRP*eIF4E - FMRP_eIF4E_0_k2*FMRP_eIF4E); FMRP_eIF4E_0 is "FMRP-eIF4E";
    FMRP_eIF4E_0_k1 = 49.999; FMRP_eIF4E_0_k2 = 0.15;
  CEF3: FMRP_eIF4E + CYFIP1 -> CEF; compartment*(CEF3_k1*FMRP_eIF4E*CYFIP1 - CEF3_k2*CEF);
    CEF3_k1 = 49.999; CEF3_k2 = 0.15;

  // Unit definitions:
  unit substance = 1e-6 mole;
  unit unit_0 = second; unit_0 is "s";
  unit unit_1 = (1e-6 dimensionless)^0 * litre / (item * avogadro * second); unit_1 is "l/(umol*s)";
end
