// SBML level 2 version 4

function Constant_flux__irreversible(v)
  v;
end
Constant_flux__irreversible is "Constant flux (irreversible)";

model New_Model()

  // Compartments:
  compartment Cytoplasm_1 = 1;
  compartment Cytoplasm_2 = 0.05; Cytoplasm_2 is "Micro-Tubule";

  // Species:
  // Sonic Hedgehog protein
  species SHh in Cytoplasm_1 = 0;
  // Patched protein in it's active form
  species Ptc1 in Cytoplasm_1 = 0.75;
  // Smoothened in it's active form
  // Smo is a interactive surface protein.
  species Smo in Cytoplasm_1 = 0;
  // Smoothened protein in it's inhibited form. (Ptc1 inhibits)
  // Smo(I) is contained within a vesicle and is not as surface protein.
  species Smo_I in Cytoplasm_1 = 0.35; Smo_I is "Smo(I)";
  // Inhibited form of Ptc1, (SHh inhibits)
  species Ptc1_I in Cytoplasm_1 = 0; Ptc1_I is "Ptc1(I)";
  species SuFu in Cytoplasm_2 = 0.8;
  species SuFu_A in Cytoplasm_1 = 0; SuFu_A is "SuFu(A)";
  // cyclic adenosine monophosphate
  species cAMP in Cytoplasm_1 = 0;
  // The concentration for this molecule spikes due o it's placement in the microtubule. The decreased volume of the microtubule creates a greater concentraction and allows for a greater rate of reaction.
  species Gpr161 in Cytoplasm_2 = 0.2; Gpr161 is "PIP3";
  species Gpr161_I in Cytoplasm_2 = 0; Gpr161_I is "PIP3(I)";
  // PKA is the unactive form of PKA, it is not inhibited, only it requires cAMP to form GliR with SuFu(3)
  species PKA_U in Cytoplasm_1 = 1; PKA_U is "PKA(U)";
  // The concentration for this molecule spikes due o it's placement in the microtubule. The decreased volume of the microtubule creates a greater concentraction and allows for a greater rate of reaction.
  species __arrestin in Cytoplasm_2 = 0; __arrestin is "β-arrestin";
  // PKA(I) is the inhibited form of PKA
  species PKA_I in Cytoplasm_1 = 0; PKA_I is "PKA(I)";
  // The concentration for this molecule spikes due o it's placement in the microtubule. The decreased volume of the microtubule creates a greater concentraction and allows for a greater rate of reaction.
  species Kif3a in Cytoplasm_2 = 0;
  // PKA(c) - is the PKA complex consisting of PKA, CK1 and GSK3β.
  // CK1 and GSK3β are ignored due to their lack of influence within the pathway.
  // It is the activator for SuFu, which allows for GliR to be formed.
  species PKA_c in Cytoplasm_1 = 0; PKA_c is "PKA(c)";
  species Gli_A in Cytoplasm_1 = 0; Gli_A is "Gli(A)";
  species SHh_Target_Genes in Cytoplasm_1 = 0; SHh_Target_Genes is "SHh-Target-Genes";
  species Gli_R in Cytoplasm_1 = 0; Gli_R is "Gli(R)";
  species Gli_FL in Cytoplasm_1 = 1; Gli_FL is "Gli(FL)";
  // The concentration for this molecule spikes due o it's placement in the microtubule. The decreased volume of the microtubule creates a greater concentraction and allows for a greater rate of reaction.
  species Smo_p in Cytoplasm_2 = 0; Smo_p is "Smo(p)";
  // Gli(A-) is Gli(A) that has been used in DNA transcription
  species Gli_A_ in Cytoplasm_1 = 0; Gli_A_ is "Gli(A-)";
  // Gli(R-) is Gli(R) that was used suppressing the SHh target genes.
  species Gli_R_ in Cytoplasm_1 = 0; Gli_R_ is "Gli(R-)";

  // Parameters:
  var SHh_Release; SHh_Release is "SHh Release,";
  var SHh_Reuptake;

  // Assignment rules:
  SHh_Reuptake := piecewise(99999, time > 60, 0);
  SHh_Release := piecewise(0.2, time > 50, 0);

  // Reactions:
  SHh__Release2: => SHh; Cytoplasm_1*Constant_flux__irreversible(SHh_Release); SHh__Release2 is "SHh Release";
  Smo_Inhibition: Smo + Ptc1 => Smo_I; Cytoplasm_1*Smo_Inhibition_k1*Smo*Ptc1;
    Smo_Inhibition_k1 = 0.1;
  Ptc1_Inhibtion: SHh + Smo_I => Ptc1_I + Smo; Cytoplasm_1*Ptc1_Inhibtion_k1*SHh*Smo_I;
    Ptc1_Inhibtion_k1 = 0.1;
  Repression_of_Gli: SuFu_A + Gli_FL => Gli_R + SuFu_A; Cytoplasm_1*Repression_of_Gli_k1*SuFu_A*Gli_FL;
    Repression_of_Gli_k1 = 0.1;
  Activation_of_SuFu: SuFu + PKA_c => SuFu_A; Activation_of_SuFu_k1*SuFu*PKA_c;
    Activation_of_SuFu_k1 = 0.1;
  Creation_of_cAMP: Gpr161 => cAMP + Gpr161; Creation_of_cAMP_k1*Gpr161;
    Creation_of_cAMP_k1 = 0.1;
  Activation_of_PKA: PKA_U + cAMP -> PKA_c; Cytoplasm_1*(Activation_of_PKA_k1*PKA_U*cAMP - Activation_of_PKA_k2*PKA_c);
    Activation_of_PKA_k1 = 0.35; Activation_of_PKA_k2 = 0.27;
  Inhibition_of_PKA: PKA_U + Smo -> PKA_I + Smo_p; Inhibition_of_PKA_k1*PKA_U*Smo - Inhibition_of_PKA_k2*PKA_I*Smo_p;
    Inhibition_of_PKA_k1 = 0.1; Inhibition_of_PKA_k2 = 0.1;
  Creation_of___arrestin___Kif3a: Smo_p => __arrestin + Kif3a + Smo; Creation_of___arrestin___Kif3a_k1*Smo_p; Creation_of___arrestin___Kif3a is "Creation of β-arrestin & Kif3a";
    Creation_of___arrestin___Kif3a_k1 = 0.1;
  Suppression_of_Gpr161: __arrestin + Gpr161 => Gpr161_I; Cytoplasm_2*Suppression_of_Gpr161_k1*__arrestin*Gpr161; Suppression_of_Gpr161 is "Suppression of PIP3";
    Suppression_of_Gpr161_k1 = 0.1;
  Activation_of_Genes: Gli_A => SHh_Target_Genes + Gli_A_; Cytoplasm_1*Activation_of_Genes_k1*Gli_A;
    Activation_of_Genes_k1 = 0.1;
  cAMP_Removal_Degradation: cAMP => ; Cytoplasm_1*cAMP_Removal_Degradation_k1*cAMP; cAMP_Removal_Degradation is "cAMP Removal/Degradation";
    cAMP_Removal_Degradation_k1 = 0.1;
  Repression_of_Genes: Gli_R + SHh_Target_Genes => Gli_R_; Cytoplasm_1*Repression_of_Genes_k1*Gli_R*SHh_Target_Genes;
    Repression_of_Genes_k1 = 1;
  Activation_of_Gli: Gli_FL + Kif3a => Gli_A; Activation_of_Gli_k1*Gli_FL*Kif3a;
    Activation_of_Gli_k1 = 0.1;
  // When Ptc1 is inhibited it enters a vesicle and is degraded via ubiquetination, however this was a simpler way ofcoding the same degredation reaction, by using an accurate rate it should make little difference
  Ptc1_I__Degredation: Ptc1_I => ; Cytoplasm_1*Ptc1_I__Degredation_k1*Ptc1_I; Ptc1_I__Degredation is "Ptc1(I) Degredation";
    Ptc1_I__Degredation_k1 = 0.1;
  // This degredation is due to ubiquinition not because of Gli(A) this was simply a more efficient way to code the degredation reaction.
  SuFu_Degradation_down_Active_Path: SuFu + Gli_A => Gli_A; SuFu_Degradation_down_Active_Path_k1*SuFu*Gli_A;
    SuFu_Degradation_down_Active_Path_k1 = 0.1;
  Transcription_of_protein: SHh_Target_Genes => Gli_FL + Ptc1; Cytoplasm_1*Transcription_of_protein_k1*SHh_Target_Genes; Transcription_of_protein is "Transcription of protein.";
    Transcription_of_protein_k1 = 6.944e-5;
  SHh_Reuptake_0: SHh => ; Cytoplasm_1*SHh_Reuptake*SHh;
  __arrestin_reuptake: __arrestin => ; Cytoplasm_2*__arrestin_reuptake_k1*__arrestin; __arrestin_reuptake is "β-arrestin reuptake";
    __arrestin_reuptake_k1 = 0.04;
  Repression_of_SuFu_A__during_Gli_A: SuFu_A + Smo_p => SuFu + Smo_p; Repression_of_SuFu_A__during_Gli_A_k1*SuFu_A*Smo_p; Repression_of_SuFu_A__during_Gli_A is "Repression of SuFu(A) during Gli(A)";
    Repression_of_SuFu_A__during_Gli_A_k1 = 0.1;
  PIP3_reactivation: Gpr161_I => Gpr161; Cytoplasm_2*PIP3_reactivation_k1*Gpr161_I;
    PIP3_reactivation_k1 = 0.02;

  // Unit definitions:
  unit volume = 1e-3 litre;
  unit substance = 1e-3 mole;
end
